Simulations: Version=201
  DataStore
  Folder Replacements
    Plant Oats
    Plant Maize
      Cultivar opv
        Command:
          [Phenology].Juvenile.Target.FixedValue = 210
          [Phenology].Photosensitive.Target.XYPairs.X = 0, 12.5, 24
          [Phenology].Photosensitive.Target.XYPairs.Y = 0, 0, 0
          [Phenology].FlagLeafToFlowering.Target.FixedValue = 1
          [Phenology].FloweringToGrainFilling.Target.FixedValue = 170
          [Phenology].GrainFilling.Target.FixedValue = 770
          [Phenology].Maturing.Target.FixedValue = 1
          [Phenology].MaturityToHarvestRipe.Target.FixedValue = 100
          [Rachis].DMDemands.Structural.DMDemandFunction.MaximumOrganWt.FixedValue = 25
          [Leaf].Photosynthesis.RUE.FixedValue = 0.9
      Cultivar OPV_untreated
        Command:
          [Phenology].Juvenile.Target.FixedValue = 210
          [Phenology].Photosensitive.Target.XYPairs.X = 0, 12.5, 24
          [Phenology].Photosensitive.Target.XYPairs.Y = 0, 0, 0
          [Phenology].FlagLeafToFlowering.Target.FixedValue = 1
          [Phenology].FloweringToGrainFilling.Target.FixedValue = 170
          [Phenology].GrainFilling.Target.FixedValue = 770
          [Phenology].Maturing.Target.FixedValue = 1
          [Phenology].MaturityToHarvestRipe.Target.FixedValue = 100
          [Rachis].DMDemands.Structural.DMDemandFunction.MaximumOrganWt.FixedValue = 25
          [Grain].MaximumNConc.InitialPhase.InitialNconc.FixedValue=0.045
          [Leaf].Photosynthesis.RUE.FixedValue = 1.2
      Cultivar OPVPH4edited
        Command:
          [Phenology].Juvenile.Target.FixedValue = 210
          [Phenology].Photosensitive.Target.XYPairs.X = 0, 12.5, 24
          [Phenology].Photosensitive.Target.XYPairs.Y = 0, 0, 0
          [Phenology].FlagLeafToFlowering.Target.FixedValue = 1
          [Phenology].FloweringToGrainFilling.Target.FixedValue = 170
          [Phenology].GrainFilling.Target.FixedValue = 770
          [Phenology].Maturing.Target.FixedValue = 1
          [Phenology].MaturityToHarvestRipe.Target.FixedValue = 100
          [Rachis].DMDemands.Structural.DMDemandFunction.MaximumOrganWt.FixedValue = 25
          [Grain].MaximumNConc.InitialPhase.InitialNconc.FixedValue=0.045
          [Leaf].Photosynthesis.RUE.FixedValue = 1.6
    Weather: FileName=C:/Users/rmagala/OneDrive/simulations/urbana_mp_128yrs.met
    Plant Soybean
    Nutrient
      OrganicPool SurfaceResidue
        Memo
          This pool is used to provide the information about potential flows of Carbon and nutrients from the surface organic matter model to the soil nutrient model.  The potential daily flows of C and nutrients is provided to this pool at run time. Matter not decomposed is returned to the surface organic matter model.  Such an approach was also captured in the APSIM SoilN model ([probert_apsims_1998]). This implementation is currently used to reproduce original functionality and should be refactored at some time in the future.
        Constant InitialCarbon: FixedValue=0
        Constant InitialNitrogen: FixedValue=0
        Constant InitialPhosphorus: FixedValue=0
        OrganicFlow Decomposition: DestinationNames=[Microbial, Humic]; DestinationFraction=[0.9, 0.1]
          Memo
            The soil nutrient model will attempt to decompose all potentially decomposable surface organic materials.
          Constant Rate: FixedValue=1
          Constant CO2Efficiency: FixedValue=0.4
          Constant N2OFraction: FixedValue=0
    Clock: Start=1904-01-01; End=2005-12-31
  Folder contnous corn
    Memo Notes Phase 2
      ## Notes about phase 2 1904-1955
      The three rotation main plots were each divided in fourths in the north-south and wesi-east direction, and a manure,
      lime, and phosphate treatment was added to the south plots. There was no difference between the two north plots (NW and NE).

      Manure was applied before corn was grown. Roughly 4 tons of cured manure were applied annually to the CC plots and applied every other year to the C-0
      plots.

      Six tons of manure were applied to the C-O-H plots every 3 years, again when corn was grown. Barnyard manure was obtained from the Department of Animal Sciences stockpile and contained mostly (greater than 90%) cattle and some horse or poultry manure.

      It included some **bedding material**, since much of the stockpiled waste came from the University’s dairy operation. Phosphate was applied with manure on all plots until 1909. From then on, manure was still applied every year on the CC plots. Phosphate was applied every other year to the CC and C-0 plots and every third year to the C-O-H plots.

      # Introduction of Hybrids

      In 1937 corn hybrids were introduced to the plots. Until 1955 several hybrids were used each year. Between 1955 and 1989 only one hybrid was seeded at a time (except in 1964), with varieties being changed about every eight years. The frequency of hybrid replacement increased after 1990.

      # Source
      Aref, S., & Wander, M. M. (1997). Long-term trends of corn yield and soil organic matter in different crop sequences and soil fertility treatments on the Morrow Plots. Advances in agronomy, 62, 153-197. [Read more here](https://www.sciencedirect.com/science/article/pii/S0065211308605684?via%3Dihub/ "Read more here")

      # other source
      Nafger et al (2011)
      [online article](https://acsess.onlinelibrary.wiley.com/doi/full/10.2134/agronj2010.0213s/ "online article")
    Simulation 3NC
      Clock: Start=1904-01-01; End=2005-12-31
      Summary SummaryFile
      Weather: FileName=C:/Users/rmagala/OneDrive/simulations/iem_126yrs.met
      SoilArbitrator Soil Arbitrator
      Zone Field: Area=1; Slope=0; AspectAngle=0; Altitude=50
        Report MaizeR: EventNames=[maize].Harvesting
          VariableNames:
            [Clock].Today
            [Clock].Today.Year as year
            [Maize].Phenology.CurrentStageName
            [Maize].AboveGround.Wt as Abiomas
            [Maize].Grain.Wt * 10 as grainwt
            [Maize].Total.Wt * 10 as maizeyield
            sum([Nutrient].FOM.C)  from 01-jan to [Clock].Today as FOM.c
            [Maize].BelowGround.Wt as BBiomass
            sum([Soil].Nutrient.TotalC)/1000 from 01-jan to [clock].Today as soc
            [SurfaceOrganicMatter].C as Total_surfaceCArbon
            [SurfaceOrganicMatter].wt as surface_organic_matter
            sum([Nutrient].Catm) as Soil_Respiration
            sum([Soil].Nutrient.TotalC[3:5])/1000 as Deeplayer_soil_Carbon
            sum([Soil].Nutrient.TotalC[1:3])/1000 as Toplayer_soil_Carbon
            sum of sum([Nutrient].N2Oatm) from 01-jan to [Clock].Today as n20
            sum of sum([Nutrient].N2Oatm[1:6] from 01-jan to [Clock].Today as N20D20cm
            sum of sum([Nutrient].N2Oatm[1:10]) from 01-jan to [Clock].Today asN20
            [Soil].Nutrient.TotalC[1]/1000 as SOC_0_15CM
            sum([Soil].Nutrient.TotalC[1:2])/1000 as SOCD40CM
            [Nutrient].Catm[1] as RespD20cm
            sum([Nutrient].Catm[1:2]) as RespD40cm
            [Soil].Water.Volumetric as DUL
            [Soil].SoilWater.PAW as PAW
            sum of sum([Nutrient].Catm[1:6]) from 01-jan to [Clock].Today as Top_respiration
            sum of sum([Nutrient].Catm[1:10]) from 01-jan to [Clock].Today as whole_respiration
            [Maize].Root.Total.Wt * 10 as rootbiomass
            [Simulation].Name as Plotid
        Report Annual: EventNames=[clock].StartOfYear
          VariableNames:
            [Clock].Today
            [Clock].Today.Year as year
            [Maize].Phenology.CurrentStageName
            [Maize].AboveGround.Wt as Abiomas
            [Maize].Grain.Wt * 10 as grainwt
            [Maize].Total.Wt * 10 as maizeyield
            sum([Nutrient].FOM.C)  from 01-jan to [Clock].Today as FOM.c
            [Maize].BelowGround.Wt as BBiomass
            sum([Soil].Nutrient.TotalC)/1000 from 01-jan to [clock].Today as soc
            [SurfaceOrganicMatter].C as Total_surfaceCArbon
            [SurfaceOrganicMatter].wt as surface_organic_matter
            sum([Nutrient].Catm) as Soil_Respiration
            sum([Soil].Nutrient.TotalC[3:5])/1000 as Deeplayer_soil_Carbon
            sum([Soil].Nutrient.TotalC[1:3])/1000 as Toplayer_soil_Carbon
            sum of sum([Nutrient].N2Oatm) from 01-jan to [Clock].Today as n20
            sum of sum([Nutrient].N2Oatm[1:6] from 01-jan to [Clock].Today as N20D20cm
            sum of sum([Nutrient].N2Oatm[1:10]) from 01-jan to [Clock].Today asN20
            [Soil].Nutrient.TotalC[1]/1000 as SOC_0_15CM
            sum([Soil].Nutrient.TotalC[1:2])/1000 as SOCD40CM
            [Nutrient].Catm[1] as RespD20cm
            sum([Nutrient].Catm[1:2]) as RespD40cm
            [Soil].Water.Volumetric as DUL
            [Soil].SoilWater.PAW as PAW
            sum of sum([Nutrient].Catm[1:6]) from 01-jan to [Clock].Today as Top_respiration
            sum of sum([Nutrient].Catm[1:10]) from 01-jan to [Clock].Today as whole_respiration
            [Maize].Root.Total.Wt * 10 as rootbiomass
            [Soil].NO3.kgha as Nitrates
            [Simulation].Name as Plotid
        Fertiliser
        SurfaceOrganicMatter: InitialResidueName=maize_stubble; InitialResidueType=maize; InitialResidueMass=700; InitialStandingFraction=0; InitialCPR=0; InitialCNR=20
        MicroClimate: a_interception=0; b_interception=1; c_interception=0; d_interception=0; SoilHeatFluxFraction=0.4; MinimumHeightDiffForNewLayer=0; NightInterceptionFraction=0.5; ReferenceHeight=2
        Plant Maize
        Manager Dynamic_tillage_Script
          IncoporationDates = 30-nov
          Years = 1956=820, 1957=1460, 1958=510, 1959=860, 1960=580, 1961=1456, 1962=330, 1964=190, 1965=2220, 1966=776
```csharp
using Models.Soils;
using System;
using Models.Core;
using Models.PMF;
using System.Collections.Generic;
using APSIM.Shared.Utilities;
using Models.Surface;
using Models.Interfaces;



namespace Models
{
    [Serializable]
    public class Script : Model
    {
        [Link] private Clock clock;
        [Link] public Report report;
        [Link] ISummary Summary;
        [Link] public IPlant iplant;
        [Link] SurfaceOrganicMatter SOM;
        
        [Link(IsOptional = true)] private IPlant existingCrop; //not needed now
        [Separator("This script applies tillage within specified dates of the simulation when the crop is ending")]
        //[Description("Crop")]
         //public IPlant Crop{ get; set; }
        [Separator("A component to apply residue removal on one or more dates on every year of the simulation")]
        [Description("Enter date of residue removal (this will be used for every year)")] 
        public string IncoporationDates { get; set; }
        
        [Separator("A component to specify amount of residues on one or more year of the simulation")]
        [Description("Enter one or more residue (kg) removed and years in pairs e.g  2001=1000, 2002=1500(comma seperated) ")] 
        public string[] Years { get; set; }
       

      
       
       // Declare variables to calculate above ground biomass: agb before entering events; harvesting and planting. 
       // By declaring them here within the the public class script they can be acceesed
       private double agb1;
       private double agb2;
       private double agb3;
       private string[] keyValuePairs;
       private string TillageDate;
       private double fraction;
       private int Depth;
       private int year;
       private int EvaluationDate;
            
       [EventSubscribe("Harvesting")]
        private void OnHarvest(object sender, EventArgs e)
        
        {
            //double[] AGB = Apsim.GetAllowableChildModels(this, [Maize].AboveGround.Wt);
             
              
           var Crop = existingCrop;
            
            Model crop = sender as Model;
            if (Crop != null && crop.Name.ToLower() == (Crop as IModel).Name.ToLower())
            {
            agb1  = Crop.AboveGround.Wt * 10;
             Summary.WriteMessage(this, $"Above ground biomass is: {agb1}.", MessageType.Information);
            }
           
           
            
        }
        [EventSubscribe("DoManagement")]
        private void OnDoManagement(object sender, EventArgs e)
       
    {
    
    //SOM.Incorporate(Fraction, Depth);
    //check whether what we are doing is correct
    var TillageDate = DateTime.Parse(IncoporationDates + "-" + clock.Today.Year.ToString());//.ToString("dd/MM/yyyy");
    int EvaluationDate = 1998;
    int year = TillageDate.Year; 
    int Depth;
    if (year >= EvaluationDate){
      Depth = 400;
    }else{
      Depth = 150;
    } 
     
    Dictionary<string, int> myDictionary = new Dictionary<string, int>();
    var Crop = existingCrop;
    foreach (string stringentry in Years)
           {
           char[] delimiter = { '=' };
           string[] keyValuePairs = stringentry.Split(delimiter, StringSplitOptions.RemoveEmptyEntries);
           if (keyValuePairs.Length == 2)
            {
                string key = keyValuePairs[0];
                int value = int.Parse(keyValuePairs[1]);
                myDictionary.Add(key, value);
            }
           } 
          
           if (TillageDate.Date == clock.Today.Date && Crop != null){
          // extract the current year in the tillage date and convert it to string
          
          string yearstring = year.ToString();
          // extract biomass from the dictionary
          if (myDictionary.ContainsKey(yearstring))
          {
          int AboveGroundBiomassRemoved = myDictionary[yearstring];
          // calculate ammount to be removed and incoporated back into the soil
          double fraction = 1-(AboveGroundBiomassRemoved/agb1);
           SOM.Incorporate(fraction, Depth);
           Summary.WriteMessage(this, $" We are getting closer to the Above ground biomass is: {year} and {Depth}.", MessageType.Information);
          }
          else if (TillageDate.Date == clock.Today.Date && Crop != null && year <=1955)
          {
          var fraction = 0.00;
          SOM.Incorporate(fraction, Depth);
          // if not specified that means nothing was removed
          Summary.WriteMessage(this, $" We are getting closer to the Above ground biomass is: {year} and {Depth}.", MessageType.Information);
          }
          else if (TillageDate.Date == clock.Today.Date && Crop != null && year >=1955 && year <1968)
          {
          var fraction = 0.0;
          SOM.Incorporate(fraction, Depth);
          }
          else if (TillageDate.Date == clock.Today.Date && Crop != null && year >1968)
          {
          var fraction = 0.5;
          SOM.Incorporate(fraction, Depth);
          }
          }
       }
    


// residue incorporation phase 2
// else if ((clock.Today.Date >= StartResidueIncoporationDate2.Date) && (clock.Today.Date <= EndStartResidueIncoporationDate2.Date))

        
        
        }
    }
```
        Manager Sow using a variable rule1
          Crop = [Maize]
          StartDate = 25-apr
          EndDate = 10-may
          FixedPlantingDate = 1919 =05-may, 1923  = 02-may, 1925 = 30-apr, 1913 =15-may, 1955 = 02-apr
          MinESW = 100
          MinRain = 15
          RainDays = 3
          CultivarName = opv
          SowingDepth = 50
          RowSpacing = 750
          Population = 1.976
          SwitchCultvar1 = True
          CultivarName2 = OPV_untreated
          RowSpacing2 = 750
          Population2 = 2.976
          NewCultvarStartDate = 01/01/1937 00:00:00
          NewCultvarEndDate = 12/31/1955 00:00:00
          SwitchCultvar2 = True
          CultivarName3 = OPVPH4edited
          RowSpacing3 = 750
          Population3 = 5.976
          Cultvar3StartDate = 01/01/1956 00:00:00
          Cultvar3EndDate = 12/31/2005 00:00:00
```csharp
using APSIM.Numerics;
using System.Collections.Generic;
using Models.Climate;
using System;
using Models.Core;
using Models.PMF;
using Models.Soils;
using Models.Utilities;
using APSIM.Shared.Utilities;
using Models.Interfaces;

namespace Models
{
    [Serializable]
    public class Script : Model
    {
        [Link] private Clock Clock;
        [Link] private Fertiliser Fertiliser;
        [Link] private Summary Summary;
        [Link] private Soil Soil;
        private Accumulator accumulatedRain;
        [Link]
        private ISoilWater waterBalance;
        
        [Description("Crop")]
        public IPlant Crop { get; set; }

        [Description("Start of sowing window (d-mmm)")]
        public string StartDate { get; set; }

        [Description("End of sowing window (d-mmm)")]
        public string EndDate { get; set; }
       [Separator("You can specify to plant at fixed dates")]
       [ Description( "Specify fixed planting dates; year=dates e.g 1950=02-may, 1954=28-apr" )]
        public string[] FixedPlantingDate { get; set; }
        [Description("Minimum extractable soil water for sowing (mm)")]
        public double MinESW { get; set; }

        [Description("Accumulated rainfall required for sowing (mm)")]
        public double MinRain { get; set; }

        [Description("Duration of rainfall accumulation (d)")]
        public int RainDays { get; set; }

        [Display(Type = DisplayType.CultivarName)]
        [Description("Cultivar to be sown")]
        public string CultivarName { get; set; }

        [Description("Sowing depth (mm)")]
        public double SowingDepth { get; set; }

        [Description("Row spacing (mm)")]
        public double RowSpacing { get; set; }

        [Description("Plant population (/m2)")]
        public double Population { get; set; }
        
        [Separator("Optional: only if you want to change cultvar during the simulation")]
        [Description("Switch to another? ")]
        public bool SwitchCultvar1 { get; set; }
        
        [Display(Type = DisplayType.CultivarName)]
        [Description("Select the new cultvar ")]
        public string CultivarName2 { get; set; }
        
        [Description("Row spacing (mm)")]
        public double RowSpacing2 { get; set; }

        [Description("Plant population (/m2)")]
        public double Population2 { get; set; }
        
        [Description("If yes(Ticked), insert starting date (dd/mm/yyyy): ")]
        public DateTime NewCultvarStartDate { get; set; }
        
        [Description("If yes(Ticked), insert starting date (dd/mm/yyyy): ")]
        public DateTime NewCultvarEndDate { get; set; }
        
        [Separator("Optional: if you want to switch to another cultvar again")]
        [Description("Would you like to change cultvar again? ")]
        public bool SwitchCultvar2 { get; set; }
        
        [Display(Type = DisplayType.CultivarName)]
        [Description("Select the new cultvar ")]
        public string CultivarName3 { get; set; }
        
        [Description("Row spacing (mm)")]
        public double RowSpacing3 { get; set; }

        [Description("Plant population (/m2)")]
        public double Population3 { get; set; }
        
        [Description("If yes(Ticked), insert Start date date (dd/mm/yyyy): ")]
        public DateTime Cultvar3StartDate { get; set; }
        
        [Description("If yes(Ticked), insert Start date date (dd/mm/yyyy): ")]
        public DateTime Cultvar3EndDate { get; set; }
        private int EvaluationYear;
        private DateTime DateToCheck;
        private string SowingDate;
        
        [EventSubscribe("StartOfSimulation")]
        private void OnSimulationCommencing(object sender, EventArgs e)
        {
            accumulatedRain = new Accumulator(this, "[Weather].Rain", RainDays);
        }

        [EventSubscribe("DoManagement")]
        private void OnDoManagement(object sender, EventArgs e)
        {
        EvaluationYear  = Clock.Today.Year;
        Dictionary<int, string> myDictionary = new Dictionary<int, string>();
        
        foreach (string stringentry in FixedPlantingDate)
               {
               char[] delimiter = { '=' };
               string[] keyValuePairs = stringentry.Split(delimiter, StringSplitOptions.RemoveEmptyEntries);
               if (keyValuePairs.Length == 2)
                {
                    int key = int.Parse(keyValuePairs[0]);  
                    string value = keyValuePairs[1].Trim();
                    myDictionary.Add(key, value);
                }
               } 
        //
         string year;
        if (myDictionary.ContainsKey(EvaluationYear)){
         
         var SowingDate = myDictionary[EvaluationYear];
         
         var DateToCheck = DateTime.Parse(SowingDate + "-" + Clock.Today.Year.ToString());
         if (myDictionary.ContainsKey(EvaluationYear) && DateUtilities.WithinDates(SowingDate, Clock.Today.Date, SowingDate))
         
          
         //var SowingDate = myDictionary[EvaluationYear];
         //var DateToCheck = DateTime.Parse(SowingDate + "-" + Clock.Today.Year.ToString());
         //if (!DateUtilities.WithinDates(StartDate, DateToCheck, EndDate) && DateUtilities.WithinDates(SowingDate, Clock.Today.Date, SowingDate))
         
         if (SwitchCultvar1 && Clock.Today.Date >= NewCultvarStartDate.Date && Clock.Today.Date <= NewCultvarEndDate.Date)
                    {
                           Crop.Sow(population: Population2,
                                 cultivar: CultivarName2,
                                 depth: SowingDepth,
                                 rowSpacing: RowSpacing2);
                      }
                   else if (SwitchCultvar2 && Clock.Today.Date >= Cultvar3StartDate.Date && Clock.Today.Date <= Cultvar3EndDate.Date)
                  {
                  Crop.Sow(population: Population3,
                                 cultivar: CultivarName3,
                                 depth: SowingDepth,
                                 rowSpacing: RowSpacing3);
                  }
                  else
                  {
                  Crop.Sow(population: Population,
                                 cultivar: CultivarName,
                                 depth: SowingDepth,
                                 rowSpacing: RowSpacing);
                  }
        }
         
             else {
        
            accumulatedRain.Update();
          
            if (DateUtilities.WithinDates(StartDate, Clock.Today, EndDate) &&
                !Crop.IsAlive &&
                MathUtilities.Sum(waterBalance.ESW) > MinESW &&
                accumulatedRain.Sum > MinRain)
                if (SwitchCultvar1 && Clock.Today.Date >= NewCultvarStartDate.Date && Clock.Today.Date <= NewCultvarEndDate.Date)
                    {
                           Crop.Sow(population: Population2,
                                 cultivar: CultivarName2,
                                 depth: SowingDepth,
                                 rowSpacing: RowSpacing2);
                      }
                   else if (SwitchCultvar2 && Clock.Today.Date >= Cultvar3StartDate.Date && Clock.Today.Date <= Cultvar3EndDate.Date)
                  {
                  Crop.Sow(population: Population3,
                                 cultivar: CultivarName3,
                                 depth: SowingDepth,
                                 rowSpacing: RowSpacing3);
                  }
                  else
                  {
                  Crop.Sow(population: Population,
                                 cultivar: CultivarName,
                                 depth: SowingDepth,
                                 rowSpacing: RowSpacing);
                  }
            }
        }
    }
}
```
        Manager HarvestingMaize
          Crop = [Maize]
```csharp
using APSIM.Shared.Utilities;
using Models.Utilities;
using Models.Soils;
using Models.PMF;
using Models.Core;
using System;

namespace Models
{
    [Serializable] 
    public class Script : Model
    {
        [Description("Crop")]
        public IPlant Crop { get; set; }
        
        [EventSubscribe("DoManagement")]
        private void OnDoManagement(object sender, EventArgs e)
        {
            if (Crop.IsReadyForHarvesting)
            {
                Crop.Harvest();
                Crop.EndCrop();
            }
        }
    }
}
```
        Soil Flanagan242965t: SoilType=Flanagan:242965; State=IL; Country=USA; ApsoilNumber=0; Latitude=40.104167; Longitude=-88.226111
          DataSource=SSURGO (https://sdmdataaccess.nrcs.usda.gov/) through R package soilDB, R package apsimx function ssurgo2sp. Timestamp 2022-03-14 16:13:27
          Comments=cokey = 20882360 - acres percent = 95 - component percent = 95 - taxonomic classification name = Fine, smectitic, mesic Aquic Argiudolls - drainage class = Somewhat poorly drained - elevation = 223 - slope = 0.9 - geomdesc = Talf
          Physical
            Thickness  ParticleSizeSand  ParticleSizeSilt  ParticleSizeClay  Rocks     BD     AirDry  LL15   DUL    SAT    KS
            150        9                 66.8              24.2              0         1.45   0.074   0.149  0.399  0.453  792.288
            150        8.4               64.8              26.8              0         1.34   0.074   0.149  0.389  0.494  792.288
            100        5.6               58.7              35.7              0         1.287  0.074   0.149  0.349  0.46   792.288
            200        5.2               54.8              40                0         1.35   0.176   0.176  0.426  0.434  792.288
            200        7.6               57.6              34.8              0         1.413  0.221   0.221  0.388  0.408  243.648
            200        12.7              60.9              26.4              0         1.377  0.221   0.221  0.388  0.423  243.648
            200        12.7              60.9              26.4              0         1.505  0.193   0.193  0.366  0.423  792.288
            200        26.7              57.1              16.2              0         1.608  0.152   0.152  0.307  0.34   792.288
            200        26.4              55.6              18                0.196025  1.608  0.116   0.116  0.254  0.294  243.648
            200        26.4              55.6              18                0.196025  1.608  0.116   0.116  0.254  0.294  243.648
            Rocks source: Calculated
            SoilCrop MaizeSoil
              LL=[0.149, 0.149, 0.149, 0.176, 0.221, 0.221, 0.193, 0.152, 0.116, 0.116]
              KL=[0.06, 0.049, 0.033, 0.04, 0.033, 0.027, 0.022, 0.018, 0.015, 0.012]
              XF=[1, 1, 1, 1, 1, 1, 1, 1, 1, 1]
            SoilCrop SoybeanSoil: same as contnous corn.3NC.Field.Flanagan242965t.Physical.MaizeSoil
            SoilCrop WheatSoil: same as contnous corn.3NC.Field.Flanagan242965t.Physical.MaizeSoil
          Organic: FOMCNRatio=40; CarbonUnits=Total
            Thickness  Carbon  SoilCNRatio  FBiom  FInert  FOM
            150        2.4     13           0.035  0.35    150
            150        1.92    13           0.033  0.608   122.81
            100        1.3     12           0.022  0.81    82.322
            200        1.2     12           0.027  0.816   100.548
            200        1.2     12           0.022  0.824   82.322
            200        0.6     12           0.018  0.833   67.399
            200        0.48    12           0.015  0.841   55.182
            200        0.36    12           0.012  0.49    45.179
            200        0.24    12           0.01   0.858   36.99
            200        0.24    12           0.001  0.867   30.284
          Chemical: PHUnits=Water
            Thickness  PH   CEC
            150        5.1  12.4644
            150        5.3  12.0384
            100        6    12.8321
            200        6.2  13.7284
            200        6.7  12.5008
            200        7.5  9.2497
            200        7.5  8.9797
            200        8.1  6.9243
            200        8.3  7.1148
            200        8.3  7.1148
            CEC source: Calculated
          Water: Thickness=[150, 150, 100, 200, 200, 200, 200, 200, 200, 200]; FilledFromTop=false
            InitialValues=[0.149, 0.149, 0.149, 0.176, 0.221, 0.221, 0.193, 0.152, 0.116, 0.116]
          Nutrient
          WaterBalance SoilWater: SummerDate=1-jun; SummerU=8.55; SummerCona=3.775; WinterDate=1-nov; WinterU=8.55; WinterCona=3.775; DiffusConst=40; DiffusSlope=16; Salb=0.13; CN2Bare=76; CNRed=20; CNCov=0.8; PSIDul=-100; Thickness=[150, 150, 300, 300, 300, 300, 300]; SWCON=[0.3, 0.3, 0.3, 0.3, 0.3, 0.3, 0.3]
          Solute NO3: Thickness=[150, 150, 100, 200, 200, 200, 200, 200, 200, 200]; InitialValues=[4, 7.9, 2, 0.49, 0.485, 0.48, 0.476, 0.471, 0.466, 0.462]; InitialValuesUnits=ppm; WaterTableConcentration=0; D0=0; DepthConstant=0; MaxDepthSoluteAccessible=0; RunoffEffectivenessAtMovingSolute=0; MaxEffectiveRunoff=0
          Solute NH4: Thickness=[150, 150, 100, 200, 200, 200, 200, 200, 200, 200]; InitialValues=[16, 13, 7, 4, 0.049, 0.048, 0.048, 0.047, 0.047, 0.046]; InitialValuesUnits=ppm; WaterTableConcentration=0; D0=0; DepthConstant=0; MaxDepthSoluteAccessible=0; RunoffEffectivenessAtMovingSolute=0; MaxEffectiveRunoff=0
          Solute Urea: Thickness=[150, 150, 100, 200, 200, 200, 200, 200, 200, 200]; InitialValues=[0, 0, 0, 0, 0, 0, 0, 0, 0, 0]; InitialValuesUnits=kg/ha; WaterTableConcentration=0; D0=0; DepthConstant=0; MaxDepthSoluteAccessible=0; RunoffEffectivenessAtMovingSolute=0; MaxEffectiveRunoff=0
          SoilTemperature Temperature
        Memo note on water resting
          The soil water, nutrients and organic matter reseting script here was not used for the actual simulations but for testing and confirming the hypothesis that nitrogen got depleted with time without resetting.
      Manager SowMaizeWithSwitch1
        Rotations = [Simple Rotation]
        Crop = [Maize]
        Year = 1956
        StartDate = 18-apr
        EndDate = 05-may
        MinESW = 100
        MinRain = 15
        RainDays = 3
        CultivarName1 = OPVPH4edited
        SowingDepth = 50
        RowSpacing = 1000
        Population = 2.964
        MustSow = True
        SwitchCultvar1 = True
        CultivarName2 = OPVPH4edited
        RowSpacing2 = 750
        Population2 = 2.964
        NewCultvarStartDate = 01/01/1937 00:00:00
        NewCultvarEndDate = 12/31/1955 00:00:00
        SwitchCultvar2 = True
        CultivarName3 = A_112
        RowSpacing3 = 750
        Population3 = 5.952
        Cultvar3StartDate = 01/01/1956 00:00:00
        Cultvar3EndDate = 12/31/2005 00:00:00
```csharp
using APSIM.Core;
using Models.Interfaces;
using APSIM.Shared.Utilities;
using Models.Utilities;
using Models.Soils;
using Models.PMF;
using Models.Core;
using System;
using Models.Climate;
using APSIM.Numerics;

namespace Models
{
    [Serializable]
    public class Script : Model, IStructureDependency
    {
        [Link] private Clock Clock;
        [Link] private Summary Summary;
        private Accumulator accumulatedRain;
        [Link]
        private ISoilWater waterBalance;
        public IStructure Structure { private get; set; }
        
        [Description("Simple Rotation Manager")]
        public Manager Rotations { get; set; }
        
        [Separator("Sowing Info")]
        
        [Description("Crop")]
        public IPlant Crop { get; set; }
        [Description("wsitch to operation script year")]
        public int Year { get; set; }
        [Description("Start of sowing window (d-mmm)")]
        public string StartDate { get; set; }

        [Description("End of sowing window (d-mmm)")]
        public string EndDate { get; set; }

        [Description("Minimum extractable soil water for sowing (mm)")]
        public double MinESW { get; set; }

        [Description("Accumulated rainfall required for sowing (mm)")]
        public double MinRain { get; set; }

        [Description("Duration of rainfall accumulation (d)")]
        public int RainDays { get; set; }
        
        [Separator("Cultivar  properties")]

        [Display(Type = DisplayType.CultivarName)]
        [Description("Cultivar to be sown")]
        public string CultivarName1 { get; set; }

        [Description("Sowing depth (mm)")]
        public double SowingDepth { get; set; }

        [Description("Row spacing (mm)")]
        public double RowSpacing { get; set; }

        [Description("Plant population (/m2)")]
        public double Population { get; set; }
        
        [Description("Must sow by end date?")]
        public bool MustSow { get; set; }
        
        [Separator("Optional: only if you want to change cultvar during the simulation")]
        [Description("Switch to another? ")]
        public bool SwitchCultvar1 { get; set; }
        
        [Display(Type = DisplayType.CultivarName)]
        [Description("Select the new cultvar ")]
        public string CultivarName2 { get; set; }
        
        [Description("Row spacing (mm)")]
        public double RowSpacing2 { get; set; }

        [Description("Plant population (/m2)")]
        public double Population2 { get; set; }
        
        [Description("If yes(Ticked), insert starting date (dd/mm/yyyy): ")]
        public DateTime NewCultvarStartDate { get; set; }
        
        [Description("If yes(Ticked), insert starting date (dd/mm/yyyy): ")]
        public DateTime NewCultvarEndDate { get; set; }
        
        [Separator("Optional: if you want to switch to another cultvar again")]
        [Description("Would you like to change cultvar again? ")]
        public bool SwitchCultvar2 { get; set; }
        
        [Display(Type = DisplayType.CultivarName)]
        [Description("Select the new cultvar ")]
        public string CultivarName3 { get; set; }
        
        [Description("Row spacing (mm)")]
        public double RowSpacing3 { get; set; }

        [Description("Plant population (/m2)")]
        public double Population3 { get; set; }
        
        [Description("If yes(Ticked), insert Start date date (dd/mm/yyyy): ")]
        public DateTime Cultvar3StartDate { get; set; }
        
        [Description("If yes(Ticked), insert Start date date (dd/mm/yyyy): ")]
        public DateTime Cultvar3EndDate { get; set; }
        

        

        [EventSubscribe("StartOfSimulation")]
        private void OnSimulationCommencing(object sender, EventArgs e)
        {
            accumulatedRain = new Accumulator(this, "[Weather].Rain", RainDays);
        }

        [EventSubscribe("DoManagement")]
        private void OnDoManagement(object sender, EventArgs e)
        {
            accumulatedRain.Update();
                 
                 if (!Crop.IsAlive && Clock.Today.Year < Year &&
                   DateUtilities.WithinDates(StartDate, Clock.Today, EndDate))
               {
                   var rainSum = accumulatedRain.Sum;
                   var eswSum  = MathUtilities.Sum(waterBalance.ESW);
                   if (rainSum > MinRain && eswSum > MinESW ||
                       DateUtilities.DatesEqual(EndDate, Clock.Today) && MustSow )
                   {
                       var thisCrop = Crop.Name.ToLower();
                       var nextCrop = (string)Structure.GetObject("Script.NextCrop")?.Value;
                       if (thisCrop == (nextCrop?.ToLower() ?? thisCrop))
                       if (SwitchCultvar1 && Clock.Today.Date >= NewCultvarStartDate.Date && Clock.Today.Date <= NewCultvarEndDate.Date && Clock.Today.Year < Year )
                    {
                           Crop.Sow(population: Population2,
                                 cultivar: CultivarName2,
                                 depth: SowingDepth,
                                 rowSpacing: RowSpacing2);
                      }
                   else if (SwitchCultvar2 && Clock.Today.Date >= Cultvar3StartDate.Date && Clock.Today.Date <= Cultvar3EndDate.Date && Clock.Today.Year < Year )
                  {
                  Crop.Sow(population: Population3,
                                 cultivar: CultivarName3,
                                 depth: SowingDepth,
                                 rowSpacing: RowSpacing3);
                  }
                  else if (Clock.Today.Year < Year)
                  {
                  Crop.Sow(population: Population,
                                 cultivar: CultivarName1,
                                 depth: SowingDepth,
                                 rowSpacing: RowSpacing);
                  }
                   }
        
               }
           
               
        }
    }
}
```
      Manager Simple Rotation
        Crops = Maize
```csharp
using Models.Soils;
using System.Collections.Generic;
using APSIM.Shared.Utilities;
using Models.PMF;
using Models.Interfaces;
using Models.Core;
using System;

namespace Models
{
    [Serializable]
    public class Script : Model
    {
        [Link] IClock Clock;
        [Link] ISummary Summary;
        
        [Description("Rotation Sequence (comma separated crop names)")]
        public string[] Crops { get; set; }
        
        // Repeating cycle of input crops. Don't loop on this, loop on Crops
        private IEnumerable<string> cropsEnum()
        {
            var counter = 0;
            while (true)
            {
                yield return Crops[counter];
                ++counter;
                if (counter >= Crops.Length)
                    counter = 0;
            }
        }
        
        private IEnumerator<string> cropCycle;
        
        [Description("Next crop to sow in the simple rotation.")]
        public string NextCrop
        { get => cropCycle.Current; }
        
        [EventSubscribe("StartOfSimulation")]
        private void Init(object sender, EventArgs e)
        {
            // TODO: Error if Crops is empty.
            cropCycle = cropsEnum().GetEnumerator();
            // Set to first value.
            cropCycle.MoveNext();
        }

        [EventSubscribe("PlantEnding")]
        private void OnEndCrop(object sender, EventArgs e)
        {
            // Currently assumes only one crop in the ground, so does not check if the  
            // harvested crop is this script's current crop.
            var old = NextCrop;
            cropCycle.MoveNext();
            var _new = NextCrop;
            Summary.WriteMessage(this, $"Rotation finished with {old}, next up: {_new}.", MessageType.Information);
        }
    }
}
```
    Simulation 3NB
      Clock: Start=1904-01-01; End=2005-12-31
      Summary SummaryFile
      Weather
        FileName=D:/My_BOX/Box/PhD thesis/Objective two/morrow plots 20250821/mets/NewMetrrr.met
      SoilArbitrator Soil Arbitrator
      Zone Field: Area=1; Slope=0; AspectAngle=0; Altitude=50
        Report CC_3SNB_NPKafterUTC: EventNames=[clock].StartOfYear
          VariableNames:
            [Clock].Today
            [Report].Name as Plotid
            [Clock].Today.Year as year
            [Maize].Phenology.CurrentStageName
            [Maize].AboveGround.Wt as Abiomas
            [Maize].Grain.Wt * 10 as grainwt
            [Maize].Total.Wt * 10 as maizeyield
            sum([Nutrient].FOM.C)  from 01-jan to [Clock].Today as FOM.c
            [Maize].BelowGround.Wt as BBiomass
            sum([Soil].Nutrient.TotalC)/1000 from 01-jan to [clock].Today as soc
            [SurfaceOrganicMatter].C as Total_surfaceCArbon
            [SurfaceOrganicMatter].wt as surface_organic_matter
            sum([Nutrient].Catm) as Soil_Respiration
            sum([Soil].Nutrient.TotalC[3:5])/1000 as Deeplayer_soil_Carbon
            sum([Soil].Nutrient.TotalC[1:3])/1000 as Toplayer_soil_Carbon
            sum of sum([Nutrient].N2Oatm) from 01-jan to [Clock].Today as n20
            sum of sum([Nutrient].N2Oatm[1:6] from 01-jan to [Clock].Today as N20D20cm
            sum of sum([Nutrient].N2Oatm[1:10]) from 01-jan to [Clock].Today asN20
            [Soil].Nutrient.TotalC[1]/1000 as SOC_0_15CM
            Sum of [Weather].Rain from 01-jan to [Clock].Today as Rain
            Sum of [weather].MinT from 01-jan to [clock].Today as MinT
            Sum of [weather].MaxT from 01-jan to [clock].Today as MaxT
            Sum of [Weather].Radn from 01-jan to [clock].Today as radn
            sum([Soil].Nutrient.TotalC[1:2])/1000 as SOCD40CM
            [Nutrient].Catm[1] as RespD20cm
            sum([Nutrient].Catm[1:2]) as RespD40cm
            [Soil].Water.Volumetric as DUL
            [Soil].SoilWater.PAW as PAW
            [Report].Name as Plotid
            sum of sum([Nutrient].Catm[1:6]) from 01-jan to [Clock].Today as Top_respiration
            sum of sum([Nutrient].Catm[1:10]) from 01-jan to [Clock].Today as whole_respiration
            [Maize].AboveGround.Wt * 10 + [Maize].BelowGround.Wt * 10 as TotalBiomass
        Fertiliser
        SurfaceOrganicMatter: InitialResidueName=maize_stubble; InitialResidueType=maize; InitialResidueMass=700; InitialStandingFraction=0; InitialCPR=0; InitialCNR=80
        MicroClimate: a_interception=0; b_interception=1; c_interception=0; d_interception=0; SoilHeatFluxFraction=0.4; MinimumHeightDiffForNewLayer=0; NightInterceptionFraction=0.5; ReferenceHeight=2
        Plant Maize
        Manager HarvestingMaize: same as contnous corn.3NC.Field.HarvestingMaize
        Soil Flanagan:242965: SoilType=Flanagan:242965; State=IL; Country=USA; ApsoilNumber=0; Latitude=40.104167; Longitude=-88.226111
          DataSource=SSURGO (https://sdmdataaccess.nrcs.usda.gov/) through R package soilDB, R package apsimx function ssurgo2sp. Timestamp 2022-03-14 16:13:27
          Comments=cokey = 20882360 - acres percent = 95 - component percent = 95 - taxonomic classification name = Fine, smectitic, mesic Aquic Argiudolls - drainage class = Somewhat poorly drained - elevation = 223 - slope = 0.9 - geomdesc = Talf
          Physical: same as contnous corn.3NC.Field.Flanagan242965t.Physical
          Organic: FOMCNRatio=40; CarbonUnits=Total
            Thickness  Carbon  SoilCNRatio  FBiom  FInert  FOM
            150        2.05    12           0.03   0.5     160
            150        1.68    12           0.03   0.608   122.81
            100        1.05    12           0.022  0.654   82.322
            200        1.05    12           0.027  0.816   100.548
            200        0.525   12           0.022  0.824   82.322
            200        0.42    12           0.018  0.833   67.399
            200        0.315   12           0.015  0.841   55.182
            200        0.21    12           0.012  0.49    45.179
            200        0.21    12           0.01   0.858   36.99
            200        0.21    12           0.001  0.867   30.284
          Chemical: PHUnits=Water
            Thickness  PH   CEC
            150        5.1  11.6769
            150        5.3  11.4984
            100        6    12.2696
            200        6.2  13.3909
            200        6.7  10.98205
            200        7.5  8.8447
            200        7.5  8.60845
            200        8.1  6.5868
            200        8.3  7.0473
            200        8.3  7.0473
            CEC source: Calculated
          Water: Thickness=[150, 150, 100, 200, 200, 200, 200, 200, 200, 200]; FilledFromTop=false
            InitialValues=[0.149, 0.149, 0.149, 0.176, 0.221, 0.221, 0.193, 0.152, 0.116, 0.116]
          Nutrient
          WaterBalance SoilWater: same as contnous corn.3NC.Field.Flanagan242965t.SoilWater
          Solute NO3: Thickness=[150, 150, 100, 200, 200, 200, 200, 200, 200, 200]; InitialValuesUnits=ppm; WaterTableConcentration=0; D0=0; DepthConstant=0; MaxDepthSoluteAccessible=0; RunoffEffectivenessAtMovingSolute=0; MaxEffectiveRunoff=0
            InitialValues=[0.5, 0.495, 0.485, 0.49, 0.485, 0.48, 0.476, 0.471, 0.466, 0.462]
          Solute NH4: Thickness=[150, 150, 100, 200, 200, 200, 200, 200, 200, 200]; InitialValuesUnits=ppm; WaterTableConcentration=0; D0=0; DepthConstant=0; MaxDepthSoluteAccessible=0; RunoffEffectivenessAtMovingSolute=0; MaxEffectiveRunoff=0
            InitialValues=[0.05, 0.05, 0.049, 0.049, 0.049, 0.048, 0.048, 0.047, 0.047, 0.046]
          Solute Urea: same as contnous corn.3NC.Field.Flanagan242965t.Urea
          SoilTemperature Temperature
        Manager Sow using a variable rule
          Crop = [Maize]
          StartDate = 23-apr
          EndDate = 15-may
          FixedPlantingDate = 1904=20-may, 1955=19-may, 1956=18-may, 1957=3-jun, 1958=14-may, 1959=30-may, 1960=30-may, 1961=16-may, 1962=19-may, 1963=10-may, 1964=8-may, 1965=12-may, 1966=10-may, 1967=17-may, 1968=6-may, 1969=14-may, 1970=11-may, 1971=5-may, 1972=10-may, 1973=10-may, 1974=4-jun, 1975=5-may, 1976=29-apr 1977=12-may, 1978=3-may, 1979=2-may, 1980=2-may, 1981=7-may, 1982=23-apr, 1983=12-may, 1984=11-may, 1985=8=may, 1986=23-apr, 1987=28-apr, 1988=28-apr, 1989=25-apr, 1990=2-may, 1991=25-apr, 1992=6-may, 1993=13-may, 1994=17-may, 1995=31-may, 1996=23-may, 1997=7-may, 1998=15-may, 1999=11-may, 2000=6-may, 2001=27-may, 2002=26-apr, 2003=28-apr, 2004=4-may, 2005=4-apr
          MinESW = 100
          MinRain = 15
          RainDays = 3
          CultivarName = opv
          SowingDepth = 50
          RowSpacing = 750
          Population = 1.976
          SwitchCultvar1 = True
          CultivarName2 = OPVPH4edited
          RowSpacing2 = 750
          Population2 = 2.964
          NewCultvarStartDate = 01/01/1937 00:00:00
          NewCultvarEndDate = 12/31/1955 00:00:00
          SwitchCultvar2 = True
          CultivarName3 = OPVPH4edited
          RowSpacing3 = 750
          Population3 = 5.964
          Cultvar3StartDate = 01/01/1956 00:00:00
          Cultvar3EndDate = 12/31/2005 00:00:00
```csharp
// import libraries in the global namespace
using APSIM.Numerics;
using System.Collections.Generic;
using Models.Climate;
using System;
using Models.Core;
using Models.PMF;
using Models.Soils;
using Models.Utilities;
using APSIM.Shared.Utilities;
using Models.Interfaces;

namespace Models
{
    [Serializable]
    public class Script : Model
    {
        [Link] private Clock Clock;
        [Link] private Fertiliser Fertiliser;
        [Link] private Summary Summary;
        [Link] private Soil Soil;
        private Accumulator accumulatedRain;
        [Link]
        private ISoilWater waterBalance;
        
        [Description("Crop")]
        public IPlant Crop { get; set; }

        [Description("Start of sowing window (d-mmm)")]
        public string StartDate { get; set; }

        [Description("End of sowing window (d-mmm)")]
        public string EndDate { get; set; }
       [Separator("You can specify to plant at fixed dates")]
       [ Description( "Specify fixed planting dates; year=dates e.g 1950=02-may, 1954=28-apr" )]
        public string[] FixedPlantingDate { get; set; }
        [Description("Minimum extractable soil water for sowing (mm)")]
        public double MinESW { get; set; }

        [Description("Accumulated rainfall required for sowing (mm)")]
        public double MinRain { get; set; }

        [Description("Duration of rainfall accumulation (d)")]
        public int RainDays { get; set; }

        [Display(Type = DisplayType.CultivarName)]
        [Description("Cultivar to be sown")]
        public string CultivarName { get; set; }

        [Description("Sowing depth (mm)")]
        public double SowingDepth { get; set; }

        [Description("Row spacing (mm)")]
        public double RowSpacing { get; set; }

        [Description("Plant population (/m2)")]
        public double Population { get; set; }
        
        [Separator("Optional: only if you want to change cultvar during the simulation")]
        [Description("Switch to another? ")]
        public bool SwitchCultvar1 { get; set; }
        
        [Display(Type = DisplayType.CultivarName)]
        [Description("Select the new cultvar ")]
        public string CultivarName2 { get; set; }
        
        [Description("Row spacing (mm)")]
        public double RowSpacing2 { get; set; }

        [Description("Plant population (/m2)")]
        public double Population2 { get; set; }
        
        [Description("If yes(Ticked), insert starting date (dd/mm/yyyy): ")]
        public DateTime NewCultvarStartDate { get; set; }
        
        [Description("If yes(Ticked), insert starting date (dd/mm/yyyy): ")]
        public DateTime NewCultvarEndDate { get; set; }
        
        [Separator("Optional: if you want to switch to another cultvar again")]
        [Description("Would you like to change cultvar again? ")]
        public bool SwitchCultvar2 { get; set; }
        
        [Display(Type = DisplayType.CultivarName)]
        [Description("Select the new cultvar ")]
        public string CultivarName3 { get; set; }
        
        [Description("Row spacing (mm)")]
        public double RowSpacing3 { get; set; }

        [Description("Plant population (/m2)")]
        public double Population3 { get; set; }
        
        [Description("If yes(Ticked), insert Start date date (dd/mm/yyyy): ")]
        public DateTime Cultvar3StartDate { get; set; }
        
        [Description("If yes(Ticked), insert Start date date (dd/mm/yyyy): ")]
        public DateTime Cultvar3EndDate { get; set; }
        private int EvaluationYear;
        
        
        [EventSubscribe("StartOfSimulation")]
        private void OnSimulationCommencing(object sender, EventArgs e)
        {
            accumulatedRain = new Accumulator(this, "[Weather].Rain", RainDays);
        }

        [EventSubscribe("DoManagement")]
        private void OnDoManagement(object sender, EventArgs e)
        {
        EvaluationYear  = Clock.Today.Year;
        // create a dictionary to hold planting dates and the years in pairs
        Dictionary<int, string> myDictionary = new Dictionary<int, string>();
        // seperate the strings that will be entered by the user
        foreach (string stringentry in FixedPlantingDate)
               {
               char[] delimiter = { '=' };
               string[] keyValuePairs = stringentry.Split(delimiter, StringSplitOptions.RemoveEmptyEntries);
               if (keyValuePairs.Length == 2)
                {
                    int key = int.Parse(keyValuePairs[0]);  
                    string value = keyValuePairs[1].Trim();
                    myDictionary.Add(key, value);
                }
               } 
        
         string year;
         
         if (myDictionary.ContainsKey(EvaluationYear))
         { 
         var SowingDate = myDictionary[EvaluationYear];
         DateTime dt = DateTime.Parse(SowingDate);
         DateTime EndDate2 = dt.AddDays(5); // we add 5 and subtract 5 days from the reported date to create an open sowing wiondow
         DateTime StartDate2= dt.AddDays(-5);
         string myStartDateTimeString = StartDate2.ToString("dd-MMM");
         string myEndDateTimeString = EndDate2.ToString("dd-MMM");
         accumulatedRain.Update();
         if (DateUtilities.WithinDates(myStartDateTimeString, Clock.Today, myEndDateTimeString)&& 
                (!Crop.IsAlive) && (MathUtilities.Sum(waterBalance.ESW) > MinESW &&
                accumulatedRain.Sum > MinRain))
         //Summary.WriteMessage(this, $" Accumulated Rains is: {MinRain}.", MessageType.Information);
         if ((SwitchCultvar1) && (Clock.Today.Date >= NewCultvarStartDate.Date) && (Clock.Today.Date <= NewCultvarEndDate.Date))
                    {
                           Crop.Sow(population: Population2,
                                 cultivar: CultivarName2,
                                 depth: SowingDepth,
                                 rowSpacing: RowSpacing2);
                      }
                   else if (SwitchCultvar2 && Clock.Today.Date >= Cultvar3StartDate.Date && Clock.Today.Date <= Cultvar3EndDate.Date)
                  {
                  Crop.Sow(population: Population3,
                                 cultivar: CultivarName3,
                                 depth: SowingDepth,
                                 rowSpacing: RowSpacing3);
                  }
                  else
                  {
                  Crop.Sow(population: Population,
                                 cultivar: CultivarName,
                                 depth: SowingDepth,
                                 rowSpacing: RowSpacing);
                  }
        }
             else if (!myDictionary.ContainsKey(EvaluationYear)){
        
            accumulatedRain.Update();
          
            if (DateUtilities.WithinDates(StartDate, Clock.Today, EndDate) &&
                !Crop.IsAlive &&
                MathUtilities.Sum(waterBalance.ESW) > MinESW &&
                accumulatedRain.Sum > MinRain)
                if (SwitchCultvar1 && Clock.Today.Date >= NewCultvarStartDate.Date && Clock.Today.Date <= NewCultvarEndDate.Date)
                    {
                           Crop.Sow(population: Population2,
                                 cultivar: CultivarName2,
                                 depth: SowingDepth,
                                 rowSpacing: RowSpacing2);
                      }
                   else if (SwitchCultvar2 && Clock.Today.Date >= Cultvar3StartDate.Date && Clock.Today.Date <= Cultvar3EndDate.Date)
                  {
                  Crop.Sow(population: Population3,
                                 cultivar: CultivarName3,
                                 depth: SowingDepth,
                                 rowSpacing: RowSpacing3);
                  }
                  else
                  {
                  Crop.Sow(population: Population,
                                 cultivar: CultivarName,
                                 depth: SowingDepth,
                                 rowSpacing: RowSpacing);
                  }
            }
        }
    }
}
```
        Manager Postharvestillagmaize
          Crop = [Maize]
          Fraction = 0
          Depth = 150
          StartResidueIncoporationDate = 01/01/1905 00:00:00
          EndStartResidueIncoporationDate = 12/31/1955 00:00:00
          Fraction2 = 0
          Depth2 = 150
          StartResidueIncoporationDate2 = 01/01/1956 00:00:00
          EndStartResidueIncoporationDate2 = 01/01/1998 00:00:00
          Fraction3 = 1
          Depth3 = 350
          StartResidueIncoporationDate3 = 01/01/1998 00:00:00
          EndStartResidueIncoporationDate3 = 01/01/2005 00:00:00
```csharp
using Models.Soils;
using System;
using Models.Core;
using Models.PMF;
using APSIM.Shared.Utilities;
using Models.Surface;

namespace Models
{
    [Serializable]
    public class Script : Model
    {
        [Link] private Clock clock;
        [Link] SurfaceOrganicMatter SOM;
        
        [Separator("This script applies tillage within specified dates of the simulation when the crop is ending")]
       
        [Description("Crop")]
        public IPlant Crop { get; set; }
        
         [Separator("Phase 1")]
        [Description("Fraction of Residues To Incorporate (0-1)")]
        public double Fraction { get; set; }

        [Description("Depth of Tillage (mm)")]
        public double Depth { get; set; }
        
       [Separator("Specify dates to start residual removal")] 
       [Description("Start Date to apply the manure (dd/mm/yyyy))")]
       public DateTime StartResidueIncoporationDate { get; set; }
       [Description("End Date to apply the manure (dd/mm/yyyy)")]
       public DateTime EndStartResidueIncoporationDate { get; set; }
       
        [Separator("Phase 2")]
       [Description("Fraction of Residues To Incorporate (0-1)")]
        public double Fraction2 { get; set; }

        [Description("Depth of Tillage (mm)")]
        public double Depth2 { get; set; }
        
       [Separator("Specify dates to start residual removal")] 
       [Description("Start Date to apply the manure (dd/mm/yyyy))")]
       public DateTime StartResidueIncoporationDate2 { get; set; }
       [Description("End Date to apply the manure (dd/mm/yyyy)")]
       public DateTime EndStartResidueIncoporationDate2 { get; set; }
       
       [Separator("Phase 3")]
       [Description("Fraction of Residues To Incorporate (0-1)")]
        public double Fraction3 { get; set; }

        [Description("Depth of Tillage (mm)")]
        public double Depth3 { get; set; }
        
       [Separator("Specify dates to start residual removal")] 
       [Description("Start Date to apply the manure (dd/mm/yyyy))")]
       public DateTime StartResidueIncoporationDate3 { get; set; }
       [Description("End Date to apply the manure (dd/mm/yyyy)")]
       public DateTime EndStartResidueIncoporationDate3 { get; set; }
       [EventSubscribe("PlantEnding")]
        private void OnEndCrop(object sender, EventArgs e)
        {
         
            Model crop = sender as Model;
            if (Crop != null && crop.Name.ToLower() == (Crop as IModel).Name.ToLower())
            if ((clock.Today.Date >= StartResidueIncoporationDate.Date) && (clock.Today.Date <= EndStartResidueIncoporationDate.Date))
            {
            SOM.Incorporate(Fraction, Depth);
            }
            else if ((clock.Today.Date >= StartResidueIncoporationDate2.Date) && (clock.Today.Date <= EndStartResidueIncoporationDate2.Date))
            {
             SOM.Incorporate(Fraction2, Depth2);
            }
            else if ((clock.Today.Date >= StartResidueIncoporationDate3.Date) && (clock.Today.Date <= EndStartResidueIncoporationDate3.Date))
            {
             SOM.Incorporate(Fraction3, Depth3);
            }
        }
    }
}
```
        Manager Fertilize in two phases
          Crop = [Maize]
          FertiliserType = UreaN
          Amount = 224
          StartFertilizing = 01/01/1956 00:00:00
          EndFertilizing = 12/31/1967 00:00:00
          FertiliserType2 = UreaN
          Amount2 = 224
          StartFertilizing2 = 01/01/1968 00:00:00
          EndFertilizing2 = 12/31/2005 00:00:00
```csharp
using Models.Soils;
using System;
using Models.Core;
using Models.PMF;
namespace Models
{
    [Serializable]
    public class Script : Model
    {
        [Link] Clock Clock;
        [Link] Fertiliser Fertiliser;
        
        [Separator("This script is for applying fertilizers only at specified dates (fertilizers will be applying during sowing)")]
        
        [Description("Crop to be fertilised")]
        public IPlant Crop { get; set; }
        
        [Separator("First phase of fertilizer application")]

        [Description("Type of fertiliser to apply? ")] 
        [Display(Type = DisplayType.FertiliserType)]public string FertiliserType { get; set; }
    
        [Description("Amount of fertiliser to be applied (kg/ha)")]
        public double Amount { get; set; }
       [Separator("Specify dates for the application of this fertilizer")] 
       [Description("Start Date to apply the specified fertilizers (dd/mm/yyyy))")]
       public DateTime StartFertilizing { get; set; }
       [Description("End Date to apply the specified fertilizers (dd/mm/yyyy)")]
       public DateTime EndFertilizing { get; set; }
       
       [Separator("Second phase of fertilizer application")]
       
       [Description("Type of fertiliser to apply? ")] 
        [Display(Type = DisplayType.FertiliserType)]public string FertiliserType2 { get; set; }
    
        [Description("Amount of fertiliser to be applied (kg/ha)")]
        public double Amount2 { get; set; }
       [Separator("Specify dates for the application of this fertilizer")] 
       [Description("Start Date to apply the specified fertilizers (dd/mm/yyyy))")]
       public DateTime StartFertilizing2 { get; set; }
       [Description("End Date to apply the specified fertilizers (dd/mm/yyyy)")]
       public DateTime EndFertilizing2 { get; set; }
        
        [EventSubscribe("Sowing")]
        private void OnSowing(object sender, EventArgs e)
        {
            Model crop = sender as Model;
            if (Crop != null && crop.Name.ToLower() == (Crop as IModel).Name.ToLower() )
            if (Clock.Today.Date >= StartFertilizing.Date && Clock.Today.Date <= EndFertilizing.Date )
            {
            Fertiliser.Apply(amount: Amount, type: FertiliserType);
          } 
          else if (Clock.Today.Date >= StartFertilizing2.Date && Clock.Today.Date <= EndFertilizing2.Date )
            {
            Fertiliser.Apply(amount: Amount2, type: FertiliserType2);
          } 
        }
       
    }
}
```
        Report Annual: same as contnous corn.3NC.Field.Annual
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