Simulations: Version=174
  DataStore
  Folder Replacements
    Plant Oats
      Cultivar Stampede1
        Command:
          [Phenology].MinimumLeafNumber.FixedValue = 9
          [Phenology].VrnSensitivity.FixedValue = 0
          [Phenology].PpSensitivity.FixedValue = 10
          [Structure].Phyllochron.BasePhyllochron.FixedValue = 80
          [Leaf].CohortParameters.GrowthDuration.AgeFactor.XYPairs.Y = 1,1,0.1
          [Leaf].Photosynthesis.RUE.FixedValue = 3
    Weather
      FileName=D:\My_BOX\Box\PhD thesis\Objective two\morrow plots 20250821\mets\urbana_Plot4_7493_1893_2020.met
    Plant Soybean
    Nutrient
      OrganicPool SurfaceResidue
        Memo
          This pool is used to provide the information about potential flows of Carbon and nutrients from the surface organic matter model to the soil nutrient model.  The potential daily flows of C and nutrients is provided to this pool at run time. Matter not decomposed is returned to the surface organic matter model.  Such an approach was also captured in the APSIM SoilN model ([probert_apsims_1998]). This implementation is currently used to reproduce original functionality and should be refactored at some time in the future.
        Constant InitialCarbon: FixedValue=0
        Constant InitialNitrogen: FixedValue=0
        Constant InitialPhosphorus: FixedValue=0
        OrganicFlow Decomposition: DestinationNames=[Microbial, Humic]; DestinationFraction=[0.9, 0.1]
          Memo
            The soil nutrient model will attempt to decompose all potentially decomposable surface organic materials.
          Constant Rate: FixedValue=1
          Constant CO2Efficiency: FixedValue=0.4
          Constant N2OFraction: FixedValue=0
    Report MaizeR: EventNames=[maize].Harvesting
      VariableNames:
        [Clock].Today
        [Clock].Today.Year as year
        [Maize].Phenology.CurrentStageName
        [Maize].AboveGround.Wt as Abiomas
        [Maize].Grain.Wt * 10 as grainwt
        [Maize].Total.Wt * 10 as maizeyield
        sum([Nutrient].FOM.C)  from 01-jan to [Clock].Today as FOM.c
        [Maize].BelowGround.Wt as BBiomass
        sum([Soil].Nutrient.TotalC)/1000 from 01-jan to [clock].Today as soc
        [SurfaceOrganicMatter].C as Total_surfaceCArbon
        [SurfaceOrganicMatter].wt as surface_organic_matter
        sum([Nutrient].Catm) as Soil_Respiration
        sum([Soil].Nutrient.TotalC[3:5])/1000 as Deeplayer_soil_Carbon
        sum([Soil].Nutrient.TotalC[1:3])/1000 as Toplayer_soil_Carbon
        sum of sum([Nutrient].N2Oatm) from 01-jan to [Clock].Today as n20
        sum of sum([Nutrient].N2Oatm[1:6] from 01-jan to [Clock].Today as N20D20cm
        sum of sum([Nutrient].N2Oatm[1:10]) from 01-jan to [Clock].Today asN20
        [Soil].Nutrient.TotalC[1]/1000 as SOC_0_15CM
        sum([Soil].Nutrient.TotalC[1:2])/1000 as SOCD40CM
        [Nutrient].Catm[1] as RespD20cm
        sum([Nutrient].Catm[1:2]) as RespD40cm
        [Soil].Water.Volumetric as DUL
        [Soil].SoilWater.PAW as PAW
        sum of sum([Nutrient].Catm[1:6]) from 01-jan to [Clock].Today as Top_respiration
        sum of sum([Nutrient].Catm[1:10]) from 01-jan to [Clock].Today as whole_respiration
        [Maize].Root.Total.Wt * 10 as rootbiomass
        [Simulation].Name as Plotid
    Plant Maize
      Cultivar OPVPH4edited_untreated
        Command:
          [Phenology].Juvenile.Target.FixedValue = 211
          [Phenology].Photosensitive.Target.XYPairs.X = 0, 12.5, 24
          [Phenology].Photosensitive.Target.XYPairs.Y = 0, 0, 0
          [Phenology].FlagLeafToFlowering.Target.FixedValue = 1
          [Phenology].FloweringToGrainFilling.Target.FixedValue = 170
          [Phenology].GrainFilling.Target.FixedValue = 812
          [Phenology].Maturing.Target.FixedValue = 1
          [Phenology].MaturityToHarvestRipe.Target.FixedValue = 1
          [Rachis].DMDemands.Structural.DMDemandFunction.MaximumOrganWt.FixedValue = 36
          [Grain].MaximumGrainsPerCob.FixedValue =  770
          [Leaf].Photosynthesis.RUE.FixedValue = 1.8
      Cultivar OPVPH_P2_untreated
        Command:
          [Phenology].Juvenile.Target.FixedValue = 211
          [Phenology].Photosensitive.Target.XYPairs.X = 0, 12.5, 24
          [Phenology].Photosensitive.Target.XYPairs.Y = 0, 0, 0
          [Phenology].FlagLeafToFlowering.Target.FixedValue = 1
          [Phenology].FloweringToGrainFilling.Target.FixedValue = 170
          [Phenology].GrainFilling.Target.FixedValue = 812
          [Phenology].Maturing.Target.FixedValue = 1
          [Phenology].MaturityToHarvestRipe.Target.FixedValue = 1
          [Rachis].DMDemands.Structural.DMDemandFunction.MaximumOrganWt.FixedValue = 36
          [Grain].MaximumGrainsPerCob.FixedValue =  720
          [Leaf].Photosynthesis.RUE.FixedValue = 1.32
      Cultivar OPV_untreated
        Command:
          [Phenology].Juvenile.Target.FixedValue = 211
          [Phenology].Photosensitive.Target.XYPairs.X = 0, 12.5, 24
          [Phenology].Photosensitive.Target.XYPairs.Y = 0, 0, 0
          [Phenology].FlagLeafToFlowering.Target.FixedValue = 1
          [Phenology].FloweringToGrainFilling.Target.FixedValue = 170
          [Phenology].GrainFilling.Target.FixedValue = 815
          [Phenology].Maturing.Target.FixedValue = 1
          [Phenology].MaturityToHarvestRipe.Target.FixedValue = 1
          [Rachis].DMDemands.Structural.DMDemandFunction.MaximumOrganWt.FixedValue = 36
          [Grain].MaximumGrainsPerCob.FixedValue =  770
          [Leaf].Photosynthesis.RUE.FixedValue = 0.9
      Cultivar OPVPH4edited
        Command:
          [Phenology].Juvenile.Target.FixedValue = 211
          [Phenology].Photosensitive.Target.XYPairs.X = 0, 12.5, 24
          [Phenology].Photosensitive.Target.XYPairs.Y = 0, 0, 0
          [Phenology].FlagLeafToFlowering.Target.FixedValue = 1
          [Phenology].FloweringToGrainFilling.Target.FixedValue = 170
          [Phenology].GrainFilling.Target.FixedValue = 815
          [Phenology].Maturing.Target.FixedValue = 1
          [Phenology].MaturityToHarvestRipe.Target.FixedValue = 1
          [Rachis].DMDemands.Structural.DMDemandFunction.MaximumOrganWt.FixedValue = 36
          [Grain].MaximumGrainsPerCob.FixedValue =  770
          [Leaf].Photosynthesis.RUE.FixedValue = 1.25
      Cultivar OPVPH_P2
        Command:
          [Phenology].Juvenile.Target.FixedValue = 211
          [Phenology].Photosensitive.Target.XYPairs.X = 0, 12.5, 24
          [Phenology].Photosensitive.Target.XYPairs.Y = 0, 0, 0
          [Phenology].FlagLeafToFlowering.Target.FixedValue = 1
          [Phenology].FloweringToGrainFilling.Target.FixedValue = 170
          [Phenology].GrainFilling.Target.FixedValue = 812
          [Phenology].Maturing.Target.FixedValue = 1
          [Phenology].MaturityToHarvestRipe.Target.FixedValue = 1
          [Rachis].DMDemands.Structural.DMDemandFunction.MaximumOrganWt.FixedValue = 36
          [Grain].MaximumGrainsPerCob.FixedValue =  720
          [Leaf].Photosynthesis.RUE.FixedValue = 1.2
      Cultivar OPV
        Command:
          [Phenology].Juvenile.Target.FixedValue = 211
          [Phenology].Photosensitive.Target.XYPairs.X = 0, 12.5, 24
          [Phenology].Photosensitive.Target.XYPairs.Y = 0, 0, 0
          [Phenology].FlagLeafToFlowering.Target.FixedValue = 1
          [Phenology].FloweringToGrainFilling.Target.FixedValue = 170
          [Phenology].GrainFilling.Target.FixedValue = 815
          [Phenology].Maturing.Target.FixedValue = 1
          [Phenology].MaturityToHarvestRipe.Target.FixedValue = 1
          [Rachis].DMDemands.Structural.DMDemandFunction.MaximumOrganWt.FixedValue = 36
          [Grain].MaximumGrainsPerCob.FixedValue =  770
          [Leaf].Photosynthesis.RUE.FixedValue = 0.90
      Cultivar OPVPH2
        Command:
          [Phenology].Juvenile.Target.FixedValue = 211
          [Phenology].Photosensitive.Target.XYPairs.X = 0, 12.5, 24
          [Phenology].Photosensitive.Target.XYPairs.Y = 0, 0, 0
          [Phenology].FlagLeafToFlowering.Target.FixedValue = 1
          [Phenology].FloweringToGrainFilling.Target.FixedValue = 170
          [Phenology].GrainFilling.Target.FixedValue = 812
          [Phenology].Maturing.Target.FixedValue = 1
          [Phenology].MaturityToHarvestRipe.Target.FixedValue = 1
          [Rachis].DMDemands.Structural.DMDemandFunction.MaximumOrganWt.FixedValue = 36
          [Grain].MaximumGrainsPerCob.FixedValue =  720
          [Leaf].Photosynthesis.RUE.FixedValue = 1.0
      Cultivar OPVPH4
        Command:
          [Phenology].Juvenile.Target.FixedValue = 211
          [Phenology].Photosensitive.Target.XYPairs.X = 0, 12.5, 24
          [Phenology].Photosensitive.Target.XYPairs.Y = 0, 0, 0
          [Phenology].FlagLeafToFlowering.Target.FixedValue = 1
          [Phenology].FloweringToGrainFilling.Target.FixedValue = 170
          [Phenology].GrainFilling.Target.FixedValue = 815
          [Phenology].Maturing.Target.FixedValue = 1
          [Phenology].MaturityToHarvestRipe.Target.FixedValue = 1
          [Rachis].DMDemands.Structural.DMDemandFunction.MaximumOrganWt.FixedValue = 36
          [Grain].MaximumGrainsPerCob.FixedValue =  770
          [Maize].Root.SpecificRootLength.FixedValue  = 135
          [Leaf].Photosynthesis.RUE.FixedValue = 2
    Clock: Start=1901-01-01; End=2005-12-31
      Memo
        We are starting the clock in 1903 to allign with rotation sequencing and to equilbrate water conditions
    Memo
      Replacement Cultivar names were not changed but OPV does not necessarily mean open-pollinated
  Memo Manure application memo
    # Applying manure on the morrow plots
    Roughly __4 tonnes__ of manure were applied to contnous corn every year, **4 tonnes** every other year to **corn plots** in the **corn oats rotation** and __6 tonnes every__ three years  in the corn **oats hay rotation** agin every corn years after three years:
    **** **Source:Aref and Wander, 1998)**

    Manure consisted of **90%** cattles and some horse or poutry manure

    Manure was applied to all the south plots in **Phase 2**

    In **Phase 3**, all **B** plots that received with or without history of manure now received the NPK. Manure was no longer added to the **SB plots**

    Crop reisudes were now returned to the B plots after Havrevst
  Folder corn oats and soybean
    Memo Notes
      ## Notes about phase 2 1904-1955
      The three rotation main plots were each divided in fourths in the north-south and wesi-east direction, and a manure,
      lime, and phosphate treatment was added to the south plots. There was no difference between the two north plots (NW and NE).

      Manure was applied before corn was grown. Roughly 4 tons of cured manure were applied annually to the CC plots and applied every other year to the C-0
      plots.

      Six tons of manure were applied to the C-O-H plots every 3 years, again when corn was grown. Barnyard manure was obtained from the Department of Animal Sciences stockpile and contained mostly (greater than 90%) cattle and some horse or poultry manure.

      It included some **bedding material**, since much of the stockpiled waste came from the University’s dairy operation. Phosphate was applied with manure on all plots until 1909. From then on, manure was still applied every year on the CC plots. Phosphate was applied every other year to the CC and C-0 plots and every third year to the C-O-H plots.

      All residues were removed from all the plots

      # Introduction of Hybrids

      In 1937 corn hybrids were introduced to the plots. Until 1955 several hybrids were used each year. Between 1955 and 1989 only one hybrid was seeded at a time (except in 1964), with varieties being changed about every eight years. The frequency of hybrid replacement increased after 1990.

      # Source
      Aref, S., & Wander, M. M. (1997). Long-term trends of corn yield and soil organic matter in different crop sequences and soil fertility treatments on the Morrow Plots. Advances in agronomy, 62, 153-197. [Read more here](https://www.sciencedirect.com/science/article/pii/S0065211308605684?via%3Dihub/ "Read more here")
    Simulation 4NC
      Clock: Start=1904-01-01; End=2005-12-31
      Summary SummaryFile
      Weather
        FileName=C:/Users/rmagala/Box/simulations/objective_2/illnois/DATA/NewMetrrr.met
      SoilArbitrator Soil Arbitrator
      Zone Field11: Area=1; Slope=0; AspectAngle=0; Altitude=50
        Report CO_4NC_none: EventNames=[Clock].StartOfYear
          VariableNames:
            [Clock].Today
            [Clock].Today.Year as year
            [Clock].Today.Month as month
            [Maize].IsReadyForHarvesting as maizeHarvest
            [Oats].IsReadyForHarvesting as Oatsharvest
            [Maize].Grain.Wt * 10 as MaizeYield
            [Maize].AboveGround.Wt as MaizeBiomass
            [Oats].Grain.Wt * 10 as OatsYield
            [Oats].AboveGround.Wt as SoyBiomass
            [Soybean].Grain.Wt * 10 as SoybeanYield
            [Soybean].AboveGround.Wt * 10  as SoyBiomass
            [SurfaceOrganicMatter].Wt
            [SurfaceOrganicMatter].Cover
            sum([Nutrient].FOM.C) as FOM.c
            sum([Soil].Nutrient.TotalC[1:3])/1000 from 01-jan to [clock].Today as soc
            [SurfaceOrganicMatter].C as Total_surfaceCArbon
            [SurfaceOrganicMatter].wt as surface_organic_matter
            sum([Nutrient].Catm) as Soil_Respiration
            sum([Soil].Nutrient.TotalC[3:5])/1000 as Deeplayer_soil_Carbon
            sum([Soil].Nutrient.TotalC[1:2])/1000 as Toplayer_soil_Carbon
            sum of sum([Nutrient].Catm[1:6]) from 01-jan to [Clock].Today as Top_respiration
            sum of sum([Nutrient].Catm[1:10]) from 01-jan to [Clock].Today as Whole_repsiration
            sum of sum([Nutrient].N2Oatm) from 01-jan to [Clock].Today as n20
            sum of sum([Nutrient].N2Oatm[1:6]) from 01-jan to [Clock].Today aas TopN2O
            [Soil].Nutrient.TotalC[1]/1000 from [clock].StartOfSimulation to [clock].Today as SOC_0_15CM
            [Soil].Water.Volumetric as DUL
            [Soil].SoilWater.PAW as PAW
            [Report].Name as Plotid
        SurfaceOrganicMatter: InitialResidueName=maize; InitialResidueType=maize; InitialResidueMass=1250; InitialStandingFraction=0; InitialCPR=0; InitialCNR=60
        Fertiliser
        Plant Maize
        Plant Soybean
        Plant Oats
        MicroClimate: a_interception=0; b_interception=1; c_interception=0; d_interception=0; SoilHeatFluxFraction=0.4; MinimumHeightDiffForNewLayer=0; NightInterceptionFraction=0.5; ReferenceHeight=2
        Manager Simple Rotation
          Crops = Maize, Maize, Oats, Maize, Oats, Maize, Oats, Maize, Oats, Maize, Oats, Maize, Oats, Maize, Oats, Maize, Oats, Maize, Oats, Maize, Oats, Maize, Oats, Maize, Oats, Maize, Oats, Maize, Oats, Maize, Oats, Maize, Oats, Maize, Oats, Maize, Oats, Maize, Oats, Maize, Oats, Maize, Oats, Maize, Oats, Maize, Oats, Maize, Oats, Maize, Oats, Maize, Oats, Maize, Oats, Maize, Oats, Maize, Oats, Maize, Oats, Maize, Oats, Maize, Soybean, Maize, Soybean, Maize, Soybean, Maize, Soybean, Maize, Soybean, Maize, Soybean, Maize, Soybean, Maize, Soybean, Maize, Soybean, Maize, Soybean, Maize, Soybean, Maize, Soybean, Maize, Soybean, Maize, Soybean, Maize, Soybean, Maize, Soybean, Maize, Soybean, Maize, Soybean, Maize, Soybean, Maize, Soybean
```csharp
using Models.Soils;
using System.Collections.Generic;
using APSIM.Shared.Utilities;
using Models.PMF;
using Models.Interfaces;
using Models.Core;
using System;

namespace Models
{
    [Serializable]
    public class Script : Model
    {
        [Link] IClock Clock;
        [Link] ISummary Summary;
        
        [Description("Rotation Sequence (comma separated crop names)")]
        public string[] Crops { get; set; }
        
        // Repeating cycle of input crops. Don't loop on this, loop on Crops
        private IEnumerable<string> cropsEnum()
        {
            var counter = 0;
            while (true)
            {
                yield return Crops[counter];
                ++counter;
                if (counter >= Crops.Length)
                    counter = 0;
            }
        }
        
        private IEnumerator<string> cropCycle;
        
        [Description("Next crop to sow in the simple rotation.")]
        public string NextCrop
        { get => cropCycle.Current; }
        
        [EventSubscribe("StartOfSimulation")]
        private void Init(object sender, EventArgs e)
        {
            // TODO: Error if Crops is empty.
            cropCycle = cropsEnum().GetEnumerator();
            // Set to first value.
            cropCycle.MoveNext();
        }

        [EventSubscribe("PlantEnding")]
        private void OnEndCrop(object sender, EventArgs e)
        {
            // Currently assumes only one crop in the ground, so does not check if the  
            // harvested crop is this script's current crop.
            var old = NextCrop;
            cropCycle.MoveNext();
            var _new = NextCrop;
            Summary.WriteMessage(this, $"Rotation finished with {old}, next up: {_new}.", MessageType.Information);
        }
    }
}
```
        Manager HarvestMaize
          Crop = [Maize]
          Date = 03-oct
```csharp
using APSIM.Shared.Utilities;
using Models.Utilities;
using Models.Soils;
using Models.PMF;
using Models.Core;
using System;

namespace Models
{
    [Serializable] 
    public class Script : Model
    {
        [Link] IClock Clock;
        
        [Separator("Harvesting script that forces harvesting")]
        [Description("Crop")]
        public IPlant Crop { get; set; }
        
        [Description("Date to force harvesting by if crop is not ready (d-mmm)")]
        public string Date { get; set; }
        
        [EventSubscribe("DoManagement")]
        private void OnDoManagement(object sender, EventArgs e)
        {
            if (Crop.IsReadyForHarvesting || 
                (DateUtilities.DatesAreEqual(Date, Clock.Today) && Crop.IsAlive))
            {
                Crop.Harvest();
                Crop.EndCrop();
            }
        }
    }
}
```
        Manager SowSoy
          Rotations = [Simple Rotation]
          Crop = [Soybean]
          StartDate = 18-apr
          EndDate = 05-may
          MinESW = 200
          MinRain = 30
          RainDays = 3
          CultivarName = Pioneer92MGI_MG26
          SowingDepth = 50
          RowSpacing = 750
          Population = 20
          MustSow = True
```csharp
using Models.Interfaces;
using APSIM.Shared.Utilities;
using Models.Utilities;
using Models.Soils;
using Models.PMF;
using Models.Core;
using System;
using Models.Climate;

namespace Models
{
    [Serializable]
    public class Script : Model
    {
        [Link] private Clock Clock;
        [Link] private Summary Summary;
        private Accumulator accumulatedRain;
        [Link]
        private ISoilWater waterBalance;
        
        [Description("Simple Rotation Manager")]
        public Manager Rotations { get; set; }
        
        [Separator("Sowing Info")]
        
        [Description("Crop")]
        public IPlant Crop { get; set; }

        [Description("Start of sowing window (d-mmm)")]
        public string StartDate { get; set; }

        [Description("End of sowing window (d-mmm)")]
        public string EndDate { get; set; }

        [Description("Minimum extractable soil water for sowing (mm)")]
        public double MinESW { get; set; }

        [Description("Accumulated rainfall required for sowing (mm)")]
        public double MinRain { get; set; }

        [Description("Duration of rainfall accumulation (d)")]
        public int RainDays { get; set; }

        [Display(Type = DisplayType.CultivarName)]
        [Description("Cultivar to be sown")]
        public string CultivarName { get; set; }

        [Description("Sowing depth (mm)")]
        public double SowingDepth { get; set; }

        [Description("Row spacing (mm)")]
        public double RowSpacing { get; set; }

        [Description("Plant population (/m2)")]
        public double Population { get; set; }
        
        [Description("Must sow by end date?")]
        public bool MustSow { get; set; }
        
        
        [EventSubscribe("StartOfSimulation")]
        private void OnSimulationCommencing(object sender, EventArgs e)
        {
            accumulatedRain = new Accumulator(this, "[Weather].Rain", RainDays);
        }

        [EventSubscribe("DoManagement")]
        private void OnDoManagement(object sender, EventArgs e)
        {
            accumulatedRain.Update();
            if (!Crop.IsAlive &&
                   DateUtilities.WithinDates(StartDate, Clock.Today, EndDate))
               {
                   var rainSum = accumulatedRain.Sum;
                   var eswSum  = MathUtilities.Sum(waterBalance.ESW);
                   if (rainSum > MinRain && eswSum > MinESW ||
                       DateUtilities.DatesEqual(EndDate, Clock.Today) && MustSow)
                   {
                       var thisCrop = Crop.Name.ToLower();
                       var nextCrop = (string)Rotations?.FindByPath("Script.NextCrop")?.Value;
                       if (thisCrop == (nextCrop?.ToLower() ?? thisCrop))
                           Crop.Sow(population: Population,
                                 cultivar: CultivarName,
                                 depth: SowingDepth,
                                 rowSpacing: RowSpacing);
                   }
               }
        }
    }
}
```
        Manager HarvestSoy
          Crop = [Soybean]
          Date = 27-sep
          script: same as in corn oats and soybean.4NC.Field11.HarvestMaize
        Manager SowOats
          Rotations = [Simple Rotation]
          Crop = [Oats]
          StartDate = 1-May
          EndDate = 15-May
          MinESW = 200
          MinRain = 30
          RainDays = 3
          CultivarName = Stampede
          SowingDepth = 50
          RowSpacing = 750
          Population = 200
          MustSow = True
          script: same as in corn oats and soybean.4NC.Field11.SowSoy
        Manager HarvestOats
          Crop = [Oats]
          Date = 19-Oct
          script: same as in corn oats and soybean.4NC.Field11.HarvestMaize
        Manager SowMaizeWithSwitch1
          Rotations = [Simple Rotation]
          Crop = [Maize]
          Year = 1956
          StartDate = 18-apr
          EndDate = 05-may
          MinESW = 100
          MinRain = 15
          RainDays = 3
          CultivarName1 = OPV_untreated
          SowingDepth = 50
          RowSpacing = 1000
          Population = 2.964
          MustSow = True
          SwitchCultvar1 = True
          CultivarName2 = OPV_untreated
          RowSpacing2 = 750
          Population2 = 2.964
          NewCultvarStartDate = 01/01/1937 00:00:00
          NewCultvarEndDate = 12/31/1955 00:00:00
          SwitchCultvar2 = True
          CultivarName3 = OPVPH4edited_untreated
          RowSpacing3 = 750
          Population3 = 5.952
          Cultvar3StartDate = 01/01/1956 00:00:00
          Cultvar3EndDate = 12/31/2005 00:00:00
```csharp
using Models.Interfaces;
using APSIM.Shared.Utilities;
using Models.Utilities;
using Models.Soils;
using Models.PMF;
using Models.Core;
using System;
using Models.Climate;

namespace Models
{
    [Serializable]
    public class Script : Model
    {
        [Link] private Clock Clock;
        [Link] private Summary Summary;
        private Accumulator accumulatedRain;
        [Link]
        private ISoilWater waterBalance;
        
        [Description("Simple Rotation Manager")]
        public Manager Rotations { get; set; }
        
        [Separator("Sowing Info")]
        
        [Description("Crop")]
        public IPlant Crop { get; set; }
        [Description("wsitch to operation script year")]
        public int Year { get; set; }
        [Description("Start of sowing window (d-mmm)")]
        public string StartDate { get; set; }

        [Description("End of sowing window (d-mmm)")]
        public string EndDate { get; set; }

        [Description("Minimum extractable soil water for sowing (mm)")]
        public double MinESW { get; set; }

        [Description("Accumulated rainfall required for sowing (mm)")]
        public double MinRain { get; set; }

        [Description("Duration of rainfall accumulation (d)")]
        public int RainDays { get; set; }
        
        [Separator("Cultivar  properties")]

        [Display(Type = DisplayType.CultivarName)]
        [Description("Cultivar to be sown")]
        public string CultivarName1 { get; set; }

        [Description("Sowing depth (mm)")]
        public double SowingDepth { get; set; }

        [Description("Row spacing (mm)")]
        public double RowSpacing { get; set; }

        [Description("Plant population (/m2)")]
        public double Population { get; set; }
        
        [Description("Must sow by end date?")]
        public bool MustSow { get; set; }
        
        [Separator("Optional: only if you want to change cultvar during the simulation")]
        [Description("Switch to another? ")]
        public bool SwitchCultvar1 { get; set; }
        
        [Display(Type = DisplayType.CultivarName)]
        [Description("Select the new cultvar ")]
        public string CultivarName2 { get; set; }
        
        [Description("Row spacing (mm)")]
        public double RowSpacing2 { get; set; }

        [Description("Plant population (/m2)")]
        public double Population2 { get; set; }
        
        [Description("If yes(Ticked), insert starting date (dd/mm/yyyy): ")]
        public DateTime NewCultvarStartDate { get; set; }
        
        [Description("If yes(Ticked), insert starting date (dd/mm/yyyy): ")]
        public DateTime NewCultvarEndDate { get; set; }
        
        [Separator("Optional: if you want to switch to another cultvar again")]
        [Description("Would you like to change cultvar again? ")]
        public bool SwitchCultvar2 { get; set; }
        
        [Display(Type = DisplayType.CultivarName)]
        [Description("Select the new cultvar ")]
        public string CultivarName3 { get; set; }
        
        [Description("Row spacing (mm)")]
        public double RowSpacing3 { get; set; }

        [Description("Plant population (/m2)")]
        public double Population3 { get; set; }
        
        [Description("If yes(Ticked), insert Start date date (dd/mm/yyyy): ")]
        public DateTime Cultvar3StartDate { get; set; }
        
        [Description("If yes(Ticked), insert Start date date (dd/mm/yyyy): ")]
        public DateTime Cultvar3EndDate { get; set; }
        
        [EventSubscribe("StartOfSimulation")]
        private void OnSimulationCommencing(object sender, EventArgs e)
        {
            accumulatedRain = new Accumulator(this, "[Weather].Rain", RainDays);
        }

        [EventSubscribe("DoManagement")]
        private void OnDoManagement(object sender, EventArgs e)
        {
            accumulatedRain.Update();
                 
                 if (!Crop.IsAlive && Clock.Today.Year < Year &&
                   DateUtilities.WithinDates(StartDate, Clock.Today, EndDate))
               {
                   var rainSum = accumulatedRain.Sum;
                   var eswSum  = MathUtilities.Sum(waterBalance.ESW);
                   if (rainSum > MinRain && eswSum > MinESW ||
                       DateUtilities.DatesEqual(EndDate, Clock.Today) && MustSow )
                   {
                       var thisCrop = Crop.Name.ToLower();
                       var nextCrop = (string)Rotations?.FindByPath("Script.NextCrop")?.Value;
                       if (thisCrop == (nextCrop?.ToLower() ?? thisCrop))
                       if (SwitchCultvar1 && Clock.Today.Date >= NewCultvarStartDate.Date && Clock.Today.Date <= NewCultvarEndDate.Date && Clock.Today.Year < Year )
                    {
                           Crop.Sow(population: Population2,
                                 cultivar: CultivarName2,
                                 depth: SowingDepth,
                                 rowSpacing: RowSpacing2);
                      }
                   else if (SwitchCultvar2 && Clock.Today.Date >= Cultvar3StartDate.Date && Clock.Today.Date <= Cultvar3EndDate.Date && Clock.Today.Year < Year )
                  {
                  Crop.Sow(population: Population3,
                                 cultivar: CultivarName3,
                                 depth: SowingDepth,
                                 rowSpacing: RowSpacing3);
                  }
                  else if (Clock.Today.Year < Year)
                  {
                  Crop.Sow(population: Population,
                                 cultivar: CultivarName1,
                                 depth: SowingDepth,
                                 rowSpacing: RowSpacing);
                  }
                   }
        
               }
           
               
        }
    }
}
```
        Soil Flanagan:242965: SoilType=Flanagan:242965; State=IL; Country=USA; ApsoilNumber=0; Latitude=40.104167; Longitude=-88.226111
          DataSource=SSURGO (https://sdmdataaccess.nrcs.usda.gov/) through R package soilDB, R package apsimx function ssurgo2sp. Timestamp 2022-03-01 10:48:06
          Comments=cokey = 20882360 - acres percent = 95 - component percent = 95 - taxonomic classification name = Fine, smectitic, mesic Aquic Argiudolls - drainage class = Somewhat poorly drained - elevation = 223 - slope = 0.9 - geomdesc = Talf
          Physical
            Thickness  ParticleSizeClay  ParticleSizeSand  ParticleSizeSilt  Rocks     BD     AirDry  LL15   DUL    SAT    KS
            150        26.5              6.4               67.1              0         1.39   0.074   0.149  0.399  0.442  792.288
            150        26.5              6.4               67.1              0         1.39   0.074   0.149  0.399  0.442  792.288
            100        30.9              3.6               65.5              0         1.179  0.074   0.149  0.319  0.471  792.288
            200        34.3              2.8               62.9              0.100062  1.26   0.176   0.176  0.356  0.439  792.288
            200        40.2              1.8               58                0         1.449  0.221   0.221  0.388  0.439  243.648
            200        33.4              2.7               63.9              0         1.476  0.221   0.221  0.388  0.439  243.648
            200        27.7              9.4               62.9              0         1.589  0.193   0.193  0.366  0.395  792.288
            200        13.6              15.3              71.1              0         1.476  0.152   0.152  0.307  0.414  792.288
            200        13.6              15.3              71.1              0         1.476  0.116   0.116  0.254  0.394  243.648
            200        9                 48                43                0         1.476  0.116   0.116  0.254  0.394  243.648
            Rocks source: Calculated
            SoilCrop OatsSoil
              LL=[0.149, 0.149, 0.149, 0.176, 0.221, 0.221, 0.193, 0.152, 0.116, 0.116]
              KL=[0.06, 0.049, 0.033, 0.04, 0.033, 0.027, 0.022, 0.018, 0.015, 0.012]
              XF=[1, 1, 1, 1, 1, 1, 1, 1, 1, 1]
            SoilCrop MaizeSoil: same as corn oats and soybean.4NC.Field11.Flanagan:242965.Physical.OatsSoil
            SoilCrop SoybeanSoil: same as corn oats and soybean.4NC.Field11.Flanagan:242965.Physical.OatsSoil
            SoilCrop WheatSoil: same as corn oats and soybean.4NC.Field11.Flanagan:242965.Physical.OatsSoil
            SoilCrop WhiteCloverSoil: same as corn oats and soybean.4NC.Field11.Flanagan:242965.Physical.OatsSoil
          Organic: FOMCNRatio=40; CarbonUnits=Total
            Thickness  Carbon  SoilCNRatio  FBiom  FInert  FOM
            150        2.69    12           0.045  0.4     150
            150        2.08    12           0.033  0.608   122.81
            100        1.3     12           0.022  0.654   82.322
            200        0.65    12           0.027  0.816   100.548
            200        0.65    12           0.022  0.824   82.322
            200        0.53    12           0.018  0.833   67.399
            200        0.39    12           0.015  0.841   55.182
            200        0.26    12           0.012  0.49    45.179
            200        0.26    12           0.01   0.858   36.99
            200        0.26    12           0.001  0.867   30.284
            Memo
              Initial Carbon was 2.6. changed
          Chemical: Thickness=[150, 150, 100, 200, 200, 200, 200, 200, 200, 200]; PH=[5.8, 5.8, 5.7, 5.7, 6, 6.6, 7.2, 8.1, 8.1, 8.1]; PHUnits=Water
          Water: Thickness=[150, 150, 100, 200, 200, 200, 200, 200, 200, 200]; InitialPAWmm=0; RelativeTo=LL15; FilledFromTop=false
            InitialValues=[0.149, 0.149, 0.149, 0.176, 0.221, 0.221, 0.193, 0.152, 0.116, 0.116]
          CERESSoilTemperature Temperature
          Nutrient
          WaterBalance SoilWater: SummerDate=1-Jun; SummerU=8.55; SummerCona=3.775; WinterDate=1-Nov; WinterU=8.55; WinterCona=3.775; DiffusConst=40; DiffusSlope=16; Salb=0.13; CN2Bare=76; CNRed=20; CNCov=0.8; PSIDul=-100; Thickness=[150, 150, 300, 300, 300, 300, 300]; SWCON=[0.3, 0.3, 0.3, 0.3, 0.3, 0.3, 0.3]
          Solute NO3: Thickness=[150, 150, 100, 200, 200, 200, 200, 200, 200, 200]; InitialValuesUnits=ppm; WaterTableConcentration=0; D0=0; DepthConstant=0; MaxDepthSoluteAccessible=0; RunoffEffectivenessAtMovingSolute=0; MaxEffectiveRunoff=0
            InitialValues=[0.5, 0.495025, 0.485223, 0.490099, 0.485223, 0.480395, 0.475615, 0.470882, 0.466197, 0.461558]
          Solute NH4: Thickness=[150, 150, 100, 200, 200, 200, 200, 200, 200, 200]; InitialValuesUnits=ppm; WaterTableConcentration=0; D0=0; DepthConstant=0; MaxDepthSoluteAccessible=0; RunoffEffectivenessAtMovingSolute=0; MaxEffectiveRunoff=0
            InitialValues=[0.05, 0.0495025, 0.0485223, 0.0490099, 0.0485223, 0.0480395, 0.0475615, 0.0470882, 0.0466197, 0.0461558]
          Solute Urea: Thickness=[150, 150, 100, 200, 200, 200, 200, 200, 200, 200]; InitialValues=[0, 0, 0, 0, 0, 0, 0, 0, 0, 0]; InitialValuesUnits=kg/ha; WaterTableConcentration=0; D0=0; DepthConstant=0; MaxDepthSoluteAccessible=0; RunoffEffectivenessAtMovingSolute=0; MaxEffectiveRunoff=0
        Manager PostharvestillageOats
          Crop = [Oats]
          Fraction = 0
          Depth = 150
          StartResidueIncoporationDate = 01/01/1905 00:00:00
          EndStartResidueIncoporationDate = 12/31/1955 00:00:00
          Fraction2 = 0
          Depth2 = 150
          StartResidueIncoporationDate2 = 01/01/1956 00:00:00
          EndStartResidueIncoporationDate2 = 01/01/1967 00:00:00
          Fraction3 = 1
          Depth3 = 150
          StartResidueIncoporationDate3 = 01/01/1968 00:00:00
          EndStartResidueIncoporationDate3 = 01/01/1998 00:00:00
```csharp
using Models.Soils;
using System;
using Models.Core;
using Models.PMF;
using APSIM.Shared.Utilities;
using Models.Surface;

namespace Models
{
    [Serializable]
    public class Script : Model
    {
        [Link] private Clock clock;
        [Link] SurfaceOrganicMatter SOM;
        
        [Separator("This script applies tillage within specified dates of the simulation when the crop is ending")]
       
        [Description("Crop")]
        public IPlant Crop { get; set; }
        
         [Separator("Phase 1")]
        [Description("Fraction of Residues To Incorporate (0-1)")]
        public double Fraction { get; set; }

        [Description("Depth of Tillage (mm)")]
        public double Depth { get; set; }
        
       [Separator("Specify dates to start residual removal")] 
       [Description("Start Date to apply the manure (dd/mm/yyyy))")]
       public DateTime StartResidueIncoporationDate { get; set; }
       [Description("End Date to apply the manure (dd/mm/yyyy)")]
       public DateTime EndStartResidueIncoporationDate { get; set; }
       
        [Separator("Phase 2")]
       [Description("Fraction of Residues To Incorporate (0-1)")]
        public double Fraction2 { get; set; }

        [Description("Depth of Tillage (mm)")]
        public double Depth2 { get; set; }
        
       [Separator("Specify dates to start residual removal")] 
       [Description("Start Date to apply the manure (dd/mm/yyyy))")]
       public DateTime StartResidueIncoporationDate2 { get; set; }
       [Description("End Date to apply the manure (dd/mm/yyyy)")]
       public DateTime EndStartResidueIncoporationDate2 { get; set; }
       
       [Separator("Phase 3")]
       [Description("Fraction of Residues To Incorporate (0-1)")]
        public double Fraction3 { get; set; }

        [Description("Depth of Tillage (mm)")]
        public double Depth3 { get; set; }
        
       [Separator("Specify dates to start residual removal")] 
       [Description("Start Date to apply the manure (dd/mm/yyyy))")]
       public DateTime StartResidueIncoporationDate3 { get; set; }
       [Description("End Date to apply the manure (dd/mm/yyyy)")]
       public DateTime EndStartResidueIncoporationDate3 { get; set; }
       [EventSubscribe("PlantEnding")]
        private void OnEndCrop(object sender, EventArgs e)
        {
         
            Model crop = sender as Model;
            if (Crop != null && crop.Name.ToLower() == (Crop as IModel).Name.ToLower())
            if ((clock.Today.Date >= StartResidueIncoporationDate.Date) && (clock.Today.Date <= EndStartResidueIncoporationDate.Date))
            {
            SOM.Incorporate(Fraction, Depth);
            }
            else if ((clock.Today.Date >= StartResidueIncoporationDate2.Date) && (clock.Today.Date <= EndStartResidueIncoporationDate2.Date))
            {
             SOM.Incorporate(Fraction2, Depth2);
            }
            else if ((clock.Today.Date >= StartResidueIncoporationDate3.Date) && (clock.Today.Date <= EndStartResidueIncoporationDate3.Date))
            {
             SOM.Incorporate(Fraction3, Depth3);
            }
        }
    }
}
```
        Manager PostharvestillageMaize1
          IncoporationDates = 30-sep
          Years = 1956=820, 1957=1460, 1958=510, 1959=860, 1960=580, 1961=1456, 1962=330, 1964=190, 1965=2220, 1966=776
```csharp
using Models.Soils;
using System;
using Models.Core;
using Models.PMF;
using System.Collections.Generic;
using APSIM.Shared.Utilities;
using Models.Surface;
using Models.Interfaces;



namespace Models
{
    [Serializable]
    public class Script : Model
    {
        [Link] private Clock clock;
        [Link] public Report report;
        [Link] ISummary Summary;
        [Link] public IPlant iplant;
        [Link] SurfaceOrganicMatter SOM;
        
        [Link(IsOptional = true)] private IPlant existingCrop; //not needed now
        [Separator("This script applies tillage within specified dates of the simulation when the crop is ending")]
       
        //[Description("Crop")]
        //private IPlant Crop{ get; set; }
        [Separator("A component to apply residue removal on one or more dates on every year of the simulation")]
        [Description("Enter date of residue removal (this will be used for every year)")] 
        public string IncoporationDates { get; set; }
        
        [Separator("A component to specify amount of residues on one or more year of the simulation")]
        [Description("Enter one or more residue (kg) removed and years in pairs e.g  2001=1000, 2002=1500(comma seperated) ")] 
        public string[] Years { get; set; }
       

      
       
       // Declare variables to calculate above ground biomass: agb before entering events; harvesting and planting. 
       // By declaring them here within the the public class script they can be acceesed
       private double agb1;
       private double agb2;
       private double agb3;
       private string[] keyValuePairs;
       private string TillageDate;
       private double fraction;
       private int Depth;
       private int year;
       private int EvaluationDate;
            
       [EventSubscribe("Harvesting")]
        private void OnHarvest(object sender, EventArgs e)
        
        {
            //double[] AGB = Apsim.GetAllowableChildModels(this, [Maize].AboveGround.Wt);
             
              
            var Crop = existingCrop;
            
            Model crop = sender as Model;
            if (Crop != null && crop.Name.ToLower() == (Crop as IModel).Name.ToLower())
            {
            agb1  = Crop.AboveGround.Wt * 10;
            // keep track of the biomass being calculated
             //Summary.WriteMessage(this, $"Above ground biomass is: {agb1}.", MessageType.Information);
            }
           
           
            
        }
        [EventSubscribe("DoManagement")]
private void OnDoManagement(object sender, EventArgs e)
{
    //SOM.Incorporate(Fraction, Depth);
   
    var TillageDate = DateTime.Parse(IncoporationDates + "-" + clock.Today.Year.ToString());//.ToString("dd/MM/yyyy");
    int EvaluationDate = 1998;
    int year = TillageDate.Year; 
    int Depth;
    if (year >= EvaluationDate){
      Depth = 350;
    }else{
      Depth = 150;
    } 
     
    Dictionary<string, int> myDictionary = new Dictionary<string, int>();
    foreach (string stringentry in Years)
           {
           char[] delimiter = { '=' };
           string[] keyValuePairs = stringentry.Split(delimiter, StringSplitOptions.RemoveEmptyEntries);
           if (keyValuePairs.Length == 2)
            {
                string key = keyValuePairs[0];
                int value = int.Parse(keyValuePairs[1]);
                myDictionary.Add(key, value);
            }
           } 
          
           if (TillageDate.Date == clock.Today.Date){
          // extract the current year in the tillage date and convert it to string
          
          string yearstring = year.ToString();
          // extract biomass from the dictionary
          if (myDictionary.ContainsKey(yearstring))
          {
          int AboveGroundBiomassRemoved = myDictionary[yearstring];
          // calculate ammount to be removed and incoporated back into the soil
          double fraction = 1-(AboveGroundBiomassRemoved/agb1);
           SOM.Incorporate(fraction, Depth);
           Summary.WriteMessage(this, $" The script excuted successfully tiilage fraction is: {fraction} at {Depth}.", MessageType.Information);
          }
          else 
          {
          var fraction = 1;
          SOM.Incorporate(fraction, Depth);
          // if not specified that means nothing was removed
          Summary.WriteMessage(this, $"The script excuted successfully tiilage fraction is: {fraction} at {Depth}.", MessageType.Information);
          }
          }
       
    
}

// residue incorporation phase 2
// else if ((clock.Today.Date >= StartResidueIncoporationDate2.Date) && (clock.Today.Date <= EndStartResidueIncoporationDate2.Date))

        
        
        }
    }
```
        Report CO_4NC_none_yield
          VariableNames:
            [Clock].Today
            [Clock].Today.Year as year
            [Clock].Today.Month as month
            [Maize].IsReadyForHarvesting as maizeHarvest
            [Oats].IsReadyForHarvesting as Oatsharvest
            [Maize].Grain.Wt * 10 as MaizeYield
            [Maize].AboveGround.Wt as MaizeBiomass
            [Oats].Grain.Wt * 10 as OatsYield
            [Oats].AboveGround.Wt as SoyBiomass
            [Soybean].Grain.Wt * 10 as SoybeanYield
            [Soybean].AboveGround.Wt * 10  as SoyBiomass
            [SurfaceOrganicMatter].Wt
            [SurfaceOrganicMatter].Cover
            sum([Nutrient].FOM.C) as FOM.c
            sum([Soil].Nutrient.TotalC[1:3])/1000 from 01-jan to [clock].Today as soc
            [SurfaceOrganicMatter].C as Total_surfaceCArbon
            [SurfaceOrganicMatter].wt as surface_organic_matter
            sum([Nutrient].Catm) as Soil_Respiration
            sum([Soil].Nutrient.TotalC[3:5])/1000 as Deeplayer_soil_Carbon
            sum([Soil].Nutrient.TotalC[1:2])/1000 as Toplayer_soil_Carbon
            sum of sum([Nutrient].Catm[1:6]) from 01-jan to [Clock].Today as Top_respiration
            sum of sum([Nutrient].Catm[1:10]) from 01-jan to [Clock].Today as Whole_repsiration
            sum of sum([Nutrient].N2Oatm) from 01-jan to [Clock].Today as n20
            sum of sum([Nutrient].N2Oatm[1:6]) from 01-jan to [Clock].Today aas TopN2O
            [Soil].Nutrient.TotalC[1]/1000 from [clock].StartOfSimulation to [clock].Today as SOC_0_15CM
            [Soil].Water.Volumetric as DUL
            [Soil].SoilWater.PAW as PAW
            [Report].Name as Plotid
          EventNames:
            [Maize].Harvesting
            [Oats].Harvesting
            [Soybean].Harvesting
        Report Annual: EventNames=[clock].StartOfYear
          VariableNames:
            [Clock].Today
            [Clock].Today.Year as year
            [Maize].Phenology.CurrentStageName
            [Maize].AboveGround.Wt as Abiomas
            [Maize].Grain.Wt * 10 as grainwt
            [Maize].Total.Wt * 10 as maizeyield
            sum([Nutrient].FOM.C)  from 01-jan to [Clock].Today as FOM.c
            [Maize].BelowGround.Wt as BBiomass
            sum([Soil].Nutrient.TotalC)/1000 from 01-jan to [clock].Today as soc
            [SurfaceOrganicMatter].C as Total_surfaceCArbon
            [SurfaceOrganicMatter].wt as surface_organic_matter
            sum([Nutrient].Catm) as Soil_Respiration
            sum([Soil].Nutrient.TotalC[3:5])/1000 as Deeplayer_soil_Carbon
            sum([Soil].Nutrient.TotalC[1:3])/1000 as Toplayer_soil_Carbon
            sum of sum([Nutrient].N2Oatm) from 01-jan to [Clock].Today as n20
            sum of sum([Nutrient].N2Oatm[1:6] from 01-jan to [Clock].Today as N20D20cm
            sum of sum([Nutrient].N2Oatm[1:10]) from 01-jan to [Clock].Today asN20
            [Soil].Nutrient.TotalC[1]/1000 as SOC_0_15CM
            sum([Soil].Nutrient.TotalC[1:2])/1000 as SOCD40CM
            [Nutrient].Catm[1] as RespD20cm
            sum([Nutrient].Catm[1:2]) as RespD40cm
            [Soil].Water.Volumetric as DUL
            [Soil].SoilWater.PAW as PAW
            sum of sum([Nutrient].Catm[1:6]) from 01-jan to [Clock].Today as Top_respiration
            sum of sum([Nutrient].Catm[1:10]) from 01-jan to [Clock].Today as whole_respiration
            [Maize].Root.Total.Wt * 10 as rootbiomass
            [Soil].NO3.kgha as Nitrates
            [Simulation].Name as Plotid
        Report MaizeR: same as Replacements.MaizeR
        Operations
          1955-05-19  [Maize].Sow(population: 3.952, cultivar: OPVPH4edited, depth: 50, rowSpacing: 750)
          1957-06-03  [Maize].Sow(population: 3.952, cultivar: OPVPH4edited, depth: 50, rowSpacing: 750)
          1959-05-29  [Maize].Sow(population: 3.952, cultivar: OPVPH4edited, depth: 50, rowSpacing: 750)
          1961-05-16  [Maize].Sow(population: 3.952, cultivar: OPVPH4edited, depth: 50, rowSpacing: 750)
          1963-05-10  [Maize].Sow(population: 3.952, cultivar: OPVPH4edited, depth: 50, rowSpacing: 750)
          1965-05-12  [Maize].Sow(population: 3.952, cultivar: OPVPH4edited, depth: 50, rowSpacing: 750)
          1967-05-17  [Maize].Sow(population: 3.952, cultivar: OPVPH4edited, depth: 50, rowSpacing: 750)
          1969-05-14  [Maize].Sow(population: 3.952, cultivar: OPVPH4edited, depth: 50, rowSpacing: 750)
          1971-05-05  [Maize].Sow(population: 3.952, cultivar: OPVPH4edited, depth: 50, rowSpacing: 750)
          1973-05-10  [Maize].Sow(population: 3.952, cultivar: OPVPH4edited, depth: 50, rowSpacing: 750)
          1975-05-05  [Maize].Sow(population: 3.952, cultivar: OPVPH4edited, depth: 50, rowSpacing: 750)
          1977-05-12  [Maize].Sow(population: 3.952, cultivar: OPVPH4edited, depth: 50, rowSpacing: 750)
          1979-05-02  [Maize].Sow(population: 3.952, cultivar: OPVPH4edited, depth: 50, rowSpacing: 750)
          1981-05-07  [Maize].Sow(population: 3.952, cultivar: OPVPH4edited, depth: 50, rowSpacing: 750)
          1983-05-12  [Maize].Sow(population: 3.952, cultivar: OPVPH4edited, depth: 50, rowSpacing: 750)
          1985-05-08  [Maize].Sow(population: 3.952, cultivar: OPVPH4edited, depth: 50, rowSpacing: 750)
          1987-04-28  [Maize].Sow(population: 3.952, cultivar: OPVPH4edited, depth: 50, rowSpacing: 750)
          1989-04-25  [Maize].Sow(population: 3.952, cultivar: OPVPH4edited, depth: 50, rowSpacing: 750)
          1991-04-25  [Maize].Sow(population: 3.952, cultivar: OPVPH4edited, depth: 50, rowSpacing: 750)
          1993-05-13  [Maize].Sow(population: 3.952, cultivar: OPVPH4edited, depth: 50, rowSpacing: 750)
          1995-05-31  [Maize].Sow(population: 3.952, cultivar: OPVPH4edited, depth: 50, rowSpacing: 750)
          1997-05-07  [Maize].Sow(population: 3.952, cultivar: OPVPH4edited, depth: 50, rowSpacing: 750)
    Simulation 4NB
      Clock: Start=1904-01-01; End=2005-12-31
      Summary SummaryFile
      Weather
        FileName=C:/Users/rmagala/Box/simulations/objective_2/illnois/DATA/NewMetrrr.met
      SoilArbitrator Soil Arbitrator
      Zone Field11: Area=1; Slope=0; AspectAngle=0; Altitude=335.28
        Report CO_4NB_NPKafterUTC: same as corn oats and soybean.4NC.Field11.CO_4NC_none
        Report CO_4NB_NPKafterUTC1
          VariableNames:
            [Clock].Today
            [Clock].Today.Year as year
            [Clock].Today.Month as month
            [Maize].IsReadyForHarvesting as maizeHarvest
            [Oats].IsReadyForHarvesting as Oatsharvest
            [Maize].Grain.Wt * 10 as MaizeYield
            [Maize].AboveGround.Wt*10 as MaizeBiomass
            [Oats].Grain.Wt * 10 as OatsYield
            [Oats].AboveGround.Wt as SoyBiomass
            [Soybean].Grain.Wt * 10 as SoybeanYield
            [Soybean].AboveGround.Wt * 10  as SoyBiomass
            [SurfaceOrganicMatter].Wt
            [SurfaceOrganicMatter].Cover
            sum([Nutrient].FOM.C) as FOM.c
            sum([Soil].Nutrient.TotalC[1:3])/1000 from 01-jan to [clock].Today as soc
            [SurfaceOrganicMatter].C as Total_surfaceCArbon
            [SurfaceOrganicMatter].wt as surface_organic_matter
            sum([Nutrient].Catm) as Soil_Respiration
            sum([Soil].Nutrient.TotalC[3:5])/1000 as Deeplayer_soil_Carbon
            sum([Soil].Nutrient.TotalC[1:2])/1000 as Toplayer_soil_Carbon
            sum of sum([Nutrient].Catm[1:6]) from 01-jan to [Clock].Today as Top_respiration
            sum of sum([Nutrient].Catm[1:10]) from 01-jan to [Clock].Today as Whole_repsiration
            sum of sum([Nutrient].N2Oatm) from 01-jan to [Clock].Today as n20
            sum of sum([Nutrient].N2Oatm[1:6]) from 01-jan to [Clock].Today aas TopN2O
            [Soil].Nutrient.TotalC[1]/1000 from [clock].StartOfSimulation to [clock].Today as SOC_0_15CM
            [Soil].Water.Volumetric as DUL
            [Soil].SoilWater.PAW as PAW
            [Report].Name as Plotid
          EventNames:
            [Oats].Harvesting
            [Maize].Harvesting
            [Soybean].Harvesting
        SurfaceOrganicMatter: InitialResidueName=maize; InitialResidueType=maize; InitialResidueMass=500; InitialStandingFraction=0; InitialCPR=0; InitialCNR=47.5
        Fertiliser
        Plant Maize
        Plant Soybean
        Plant Oats
        MicroClimate: a_interception=0; b_interception=1; c_interception=0; d_interception=0; SoilHeatFluxFraction=0.4; MinimumHeightDiffForNewLayer=0; NightInterceptionFraction=0.5; ReferenceHeight=2
        Manager Simple Rotation
          Crops = Maize, Oats, Maize, Oats, Maize, Oats, Maize, Oats, Maize, Oats, Maize, Oats, Maize, Oats, Maize, Oats, Maize, Oats, Maize, Oats, Maize, Oats, Maize, Oats, Maize, Oats, Maize, Oats, Maize, Oats, Maize, Oats, Maize, Oats, Maize, Oats, Maize, Oats, Maize, Oats, Maize, Oats, Maize, Oats, Maize, Oats, Maize, Oats, Maize, Oats, Maize, Oats, Maize, Oats, Maize, Oats, Maize, Oats, Maize, Oats, Maize, Oats, Maize, Soybean, Maize, Soybean, Maize, Soybean, Maize, Soybean, Maize, Soybean, Maize, Soybean, Maize, Soybean, Maize, Soybean, Maize, Soybean, Maize, Soybean, Maize, Soybean, Maize, Soybean, Maize, Soybean, Maize, Soybean, Maize, Soybean, Maize, Soybean, Maize, Soybean, Maize, Soybean, Maize, Soybean, Maize, Soybean
          script: same as in corn oats and soybean.4NC.Field11.Simple Rotation
        Manager HarvestMaize: same as corn oats and soybean.4NC.Field11.HarvestMaize
        Manager HarvestSoy: same as corn oats and soybean.4NC.Field11.HarvestSoy
        Manager HarvestOats
          Crop = [Oats]
          Date = 19-Oct
```csharp
using APSIM.Shared.Utilities;
using Models.Utilities;
using Models.Soils;
using Models.PMF;
using Models.Core;
using System;

namespace Models
{
    [Serializable] 
    public class Script : Model
    {
        [Link] IClock Clock;
        [Link] ISummary Summary;
        [Separator("Harvesting script that forces harvesting")]
        [Description("Crop")]
        public IPlant Crop { get; set; }
        
        [Description("Date to force harvesting by if crop is not ready (d-mmm)")]
        public string Date { get; set; }
        
        [EventSubscribe("DoManagement")]
        private void OnDoManagement(object sender, EventArgs e)
        {
            if (Crop.IsReadyForHarvesting || 
                (DateUtilities.DatesAreEqual(Date, Clock.Today) && Crop.IsAlive))
                
            {
            //var cp = Crop.AboveGround.Wt *1000;
                Crop.Harvest();
                Crop.EndCrop();
                //Summary.WriteMessage(this, $"Above ground biomass is: {cp} .", MessageType.Information);
            }
        }
    }
}
```
        Soil Flanagan:242965: SoilType=Flanagan:242965; State=IL; Country=USA; ApsoilNumber=0; Latitude=40.104167; Longitude=-88.226111
          DataSource=SSURGO (https://sdmdataaccess.nrcs.usda.gov/) through R package soilDB, R package apsimx function ssurgo2sp. Timestamp 2022-03-01 10:48:06
          Comments=cokey = 20882360 - acres percent = 95 - component percent = 95 - taxonomic classification name = Fine, smectitic, mesic Aquic Argiudolls - drainage class = Somewhat poorly drained - elevation = 223 - slope = 0.9 - geomdesc = Talf
          Physical: same as corn oats and soybean.4NC.Field11.Flanagan:242965.Physical
          Organic: FOMCNRatio=40; CarbonUnits=Total
            Thickness  Carbon  SoilCNRatio  FBiom  FInert  FOM
            150        2.275   12           0.03   0.45    160
            150        1.84    12           0.028  0.638   122.81
            100        1.7     12           0.022  0.654   82.322
            200        1.24    12           0.027  0.816   100.548
            200        0.58    12           0.022  0.824   82.322
            200        0.28    12           0.018  0.833   67.399
            200        0.22    12           0.015  0.841   55.182
            200        0.174   12           0.012  0.49    45.179
            200        0.116   12           0.01   0.858   36.99
            200        0.116   12           0.001  0.967   30.284
          Chemical: Thickness=[150, 150, 100, 200, 200, 200, 200, 200, 200, 200]; PH=[5.8, 5.8, 5.7, 5.7, 6, 6.6, 7.2, 8.1, 8.1, 8.1]; PHUnits=Water
          Water: Thickness=[150, 150, 100, 200, 200, 200, 200, 200, 200, 200]; InitialPAWmm=0; RelativeTo=LL15; FilledFromTop=false
            InitialValues=[0.149, 0.149, 0.149, 0.176, 0.221, 0.221, 0.193, 0.152, 0.116, 0.116]
          CERESSoilTemperature Temperature
          Nutrient
          WaterBalance SoilWater: same as corn oats and soybean.4NC.Field11.Flanagan:242965.SoilWater
          Solute NO3: Thickness=[150, 150, 100, 200, 200, 200, 200, 200, 200, 200]; InitialValuesUnits=ppm; WaterTableConcentration=0; D0=0; DepthConstant=0; MaxDepthSoluteAccessible=0; RunoffEffectivenessAtMovingSolute=0; MaxEffectiveRunoff=0
            InitialValues=[0.5, 0.495, 0.485, 0.49, 0.485, 0.48, 0.476, 0.471, 0.466, 0.462]
          Solute NH4: Thickness=[150, 150, 100, 200, 200, 200, 200, 200, 200, 200]; InitialValuesUnits=ppm; WaterTableConcentration=0; D0=0; DepthConstant=0; MaxDepthSoluteAccessible=0; RunoffEffectivenessAtMovingSolute=0; MaxEffectiveRunoff=0
            InitialValues=[8.2, 0.05, 0.049, 0.049, 0.049, 0.048, 0.048, 0.047, 0.047, 0.046]
          Solute Urea: same as corn oats and soybean.4NC.Field11.Flanagan:242965.Urea
        Manager SowOatsWithSwitch
          Rotations = [Simple Rotation]
          Crop = [Oats]
          StartDate = 1-May
          EndDate = 15-May
          MinESW = 200
          MinRain = 30
          RainDays = 3
          CultivarName = Stampede
          SowingDepth = 30
          RowSpacing = 750
          Population = 100
          MustSow = True
          SwitchCultvar1 = True
          CultivarName2 = Stampede
          RowSpacing2 = 750
          Population2 = 50
          NewCultvarStartDate = 01/01/1937 00:00:00
          NewCultvarEndDate = 12/31/1938 00:00:00
          SwitchCultvar2 = True
          CultivarName3 = Stampede1
          RowSpacing3 = 750
          Population3 = 100
          Cultvar3StartDate = 01/01/1937 00:00:00
          Cultvar3EndDate = 12/31/1967 00:00:00
          SwitchCultvar3 = True
          CultivarName4 = Taipan
          RowSpacing4 = 750
          Population4 = 5.999
          Cultvar4StartDate = 01/01/1968 00:00:00
          Cultvar4EndDate = 12/31/2005 00:00:00
```csharp
using Models.Interfaces;
using APSIM.Shared.Utilities;
using Models.Utilities;
using Models.Soils;
using Models.PMF;
using Models.Core;
using System;
using Models.Climate;

namespace Models
{
    [Serializable]
    public class Script : Model
    {
        [Link] private Clock Clock;
        [Link] private Summary Summary;
        private Accumulator accumulatedRain;
        [Link]
        private ISoilWater waterBalance;
        
        [Description("Simple Rotation Manager")]
        public Manager Rotations { get; set; }
        
        [Separator("Sowing Info")]
        
        [Description("Crop")]
        public IPlant Crop { get; set; }

        [Description("Start of sowing window (d-mmm)")]
        public string StartDate { get; set; }

        [Description("End of sowing window (d-mmm)")]
        public string EndDate { get; set; }

        [Description("Minimum extractable soil water for sowing (mm)")]
        public double MinESW { get; set; }

        [Description("Accumulated rainfall required for sowing (mm)")]
        public double MinRain { get; set; }

        [Description("Duration of rainfall accumulation (d)")]
        public int RainDays { get; set; }
        
        [Separator("Cultivar  properties")]

        [Display(Type = DisplayType.CultivarName)]
        [Description("Cultivar to be sown")]
        public string CultivarName { get; set; }

        [Description("Sowing depth (mm)")]
        public double SowingDepth { get; set; }

        [Description("Row spacing (mm)")]
        public double RowSpacing { get; set; }

        [Description("Plant population (/m2)")]
        public double Population { get; set; }
        
        [Description("Must sow by end date?")]
        public bool MustSow { get; set; }
        
        [Separator("Optional: only if you want to change cultvar during the simulation")]
        [Description("Switch to another? ")]
        public bool SwitchCultvar1 { get; set; }
        
        [Display(Type = DisplayType.CultivarName)]
        [Description("Select the new cultvar ")]
        public string CultivarName2 { get; set; }
        
        [Description("Row spacing (mm)")]
        public double RowSpacing2 { get; set; }

        [Description("Plant population (/m2)")]
        public double Population2 { get; set; }
        
        [Description("If yes(Ticked), insert starting date (dd/mm/yyyy): ")]
        public DateTime NewCultvarStartDate { get; set; }
        
        [Description("If yes(Ticked), insert starting date (dd/mm/yyyy): ")]
        public DateTime NewCultvarEndDate { get; set; }
        
        [Separator("Optional: if you want to switch to another cultvar again")]
        [Description("Would you like to change cultvar again? ")]
        public bool SwitchCultvar2 { get; set; }
        
        [Display(Type = DisplayType.CultivarName)]
        [Description("Select the new cultvar ")]
        public string CultivarName3 { get; set; }
        
        [Description("Row spacing (mm)")]
        public double RowSpacing3 { get; set; }

        [Description("Plant population (/m2)")]
        public double Population3 { get; set; }
        
        [Description("If yes(Ticked), insert Start date date (dd/mm/yyyy): ")]
        public DateTime Cultvar3StartDate { get; set; }
        
        [Description("If yes(Ticked), insert end date date (dd/mm/yyyy): ")]
        public DateTime Cultvar3EndDate { get; set; }
        
        [Separator("Optional: if you want to switch to another cultvar again")]
        [Description("Would you like to change cultvar again? ")]
        public bool SwitchCultvar3 { get; set; }
        
        [Display(Type = DisplayType.CultivarName)]
        [Description("Select the new cultvar ")]
        public string CultivarName4 { get; set; }
        
        [Description("Row spacing (mm)")]
        public double RowSpacing4 { get; set; }

        [Description("Plant population (/m2)")]
        public double Population4 { get; set; }
        
        [Description("If yes(Ticked), insert Start date date (dd/mm/yyyy): ")]
        public DateTime Cultvar4StartDate { get; set; }
        
        [Description("If yes(Ticked), insert Start date date (dd/mm/yyyy): ")]
        public DateTime Cultvar4EndDate { get; set; }
        
        
        [EventSubscribe("StartOfSimulation")]
        private void OnSimulationCommencing(object sender, EventArgs e)
        {
            accumulatedRain = new Accumulator(this, "[Weather].Rain", RainDays);
        }

        [EventSubscribe("DoManagement")]
        private void OnDoManagement(object sender, EventArgs e)
        {
            accumulatedRain.Update();
                 
                 if (!Crop.IsAlive &&
                   DateUtilities.WithinDates(StartDate, Clock.Today, EndDate))
               {
                   var rainSum = accumulatedRain.Sum;
                   var eswSum  = MathUtilities.Sum(waterBalance.ESW);
                   if (rainSum > MinRain && eswSum > MinESW ||
                       DateUtilities.DatesEqual(EndDate, Clock.Today) && MustSow )
                   {
                       var thisCrop = Crop.Name.ToLower();
                       var nextCrop = (string)Rotations?.FindByPath("Script.NextCrop")?.Value;
                       if (thisCrop == (nextCrop?.ToLower() ?? thisCrop))
                       if (SwitchCultvar1 && Clock.Today.Date >= NewCultvarStartDate.Date && Clock.Today.Date <= NewCultvarEndDate.Date)
                    {
                           Crop.Sow(population: Population2,
                                 cultivar: CultivarName2,
                                 depth: SowingDepth,
                                 rowSpacing: RowSpacing2);
                      }
                   else if (SwitchCultvar2 && Clock.Today.Date >= Cultvar3StartDate.Date && Clock.Today.Date <= Cultvar3EndDate.Date)
                  {
                  Crop.Sow(population: Population3,
                                 cultivar: CultivarName3,
                                 depth: SowingDepth,
                                 rowSpacing: RowSpacing3);
                  }
                  else if (SwitchCultvar3 && Clock.Today.Date >= Cultvar4StartDate.Date && Clock.Today.Date <= Cultvar4EndDate.Date)
                  {
                  Crop.Sow(population: Population4,
                                 cultivar: CultivarName4,
                                 depth: SowingDepth,
                                 rowSpacing: RowSpacing4);
                  }
                  else
                  {
                  Crop.Sow(population: Population,
                                 cultivar: CultivarName,
                                 depth: SowingDepth,
                                 rowSpacing: RowSpacing);
                  }
                   }
        
               }
           
               
        }
    }
}
```
        Manager SowsoybeanWithSwitch
          Rotations = [Simple Rotation]
          Crop = [Soybean]
          StartDate = 18-apr
          EndDate = 05-may
          MinESW = 200
          MinRain = 30
          RainDays = 3
          CultivarName = PioneerP22T69R_MG22
          SowingDepth = 50
          RowSpacing = 750
          Population = 25
          MustSow = True
          SwitchCultvar1 = True
          CultivarName2 = PioneerP22T69R_MG22
          RowSpacing2 = 750
          Population2 = 38
          NewCultvarStartDate = 01/01/1996 00:00:00
          NewCultvarEndDate = 12/31/2005 00:00:00
          SwitchCultvar2 = False
          CultivarName3 = Warrigal
          RowSpacing3 = 750
          Population3 = 3.952
          Cultvar3StartDate = 01/01/1955 00:00:00
          Cultvar3EndDate = 12/31/1967 00:00:00
          SwitchCultvar3 = False
          CultivarName4 = OPVPH4
          RowSpacing4 = 750
          Population4 = 6.999
          Cultvar4StartDate = 01/01/1968 00:00:00
          Cultvar4EndDate = 12/31/2005 00:00:00
          script: same as in corn oats and soybean.4NB.Field11.SowOatsWithSwitch
        Manager SowMaizeWithSwitch1
          Rotations = [Simple Rotation]
          Crop = [Maize]
          StartDate = 18-apr
          EndDate = 05-may
          MinESW = 100
          MinRain = 15
          RainDays = 3
          CultivarName = OPV_untreated
          SowingDepth = 50
          RowSpacing = 750
          Population = 1.964
          MustSow = True
          SwitchCultvar1 = True
          CultivarName2 = OPVPH4edited
          RowSpacing2 = 750
          Population2 = 2.964
          NewCultvarStartDate = 01/01/1937 00:00:00
          NewCultvarEndDate = 12/31/1945 00:00:00
          SwitchCultvar2 = True
          CultivarName3 = OPVPH4
          RowSpacing3 = 750
          Population3 = 4.928
          Cultvar3StartDate = 01/01/1945 00:00:00
          Cultvar3EndDate = 12/31/1967 00:00:00
          SwitchCultvar3 = True
          CultivarName4 = OPVPH4
          RowSpacing4 = 750
          Population4 = 5.928
          Cultvar4StartDate = 01/01/1968 00:00:00
          Cultvar4EndDate = 12/31/1998 00:00:00
          SwitchCultvar4 = True
          CultivarName5 = OPVPH4
          RowSpacing5 = 750
          Population5 = 6.197
          Cultvar5StartDate = 01/01/1999 00:00:00
          Cultvar5EndDate = 12/31/2005 00:00:00
```csharp
using Models.Interfaces;
using APSIM.Shared.Utilities;
using Models.Utilities;
using Models.Soils;
using Models.PMF;
using Models.Core;
using System;
using Models.Climate;

namespace Models
{
    [Serializable]
    public class Script : Model
    {
        [Link] private Clock Clock;
        [Link] private Summary Summary;
        private Accumulator accumulatedRain;
        [Link]
        private ISoilWater waterBalance;
        
        [Description("Simple Rotation Manager")]
        public Manager Rotations { get; set; }
        
        [Separator("Sowing Info")]
        
        [Description("Crop")]
        public IPlant Crop { get; set; }

        [Description("Start of sowing window (d-mmm)")]
        public string StartDate { get; set; }

        [Description("End of sowing window (d-mmm)")]
        public string EndDate { get; set; }

        [Description("Minimum extractable soil water for sowing (mm)")]
        public double MinESW { get; set; }

        [Description("Accumulated rainfall required for sowing (mm)")]
        public double MinRain { get; set; }

        [Description("Duration of rainfall accumulation (d)")]
        public int RainDays { get; set; }
        
        [Separator("Cultivar  properties")]

        [Display(Type = DisplayType.CultivarName)]
        [Description("Cultivar to be sown")]
        public string CultivarName { get; set; }

        [Description("Sowing depth (mm)")]
        public double SowingDepth { get; set; }

        [Description("Row spacing (mm)")]
        public double RowSpacing { get; set; }

        [Description("Plant population (/m2)")]
        public double Population { get; set; }
        
        [Description("Must sow by end date?")]
        public bool MustSow { get; set; }
        
        [Separator("Optional: only if you want to change cultvar during the simulation")]
        [Description("Switch to another? ")]
        public bool SwitchCultvar1 { get; set; }
        
        [Display(Type = DisplayType.CultivarName)]
        [Description("Select the new cultvar ")]
        public string CultivarName2 { get; set; }
        
        [Description("Row spacing (mm)")]
        public double RowSpacing2 { get; set; }

        [Description("Plant population (/m2)")]
        public double Population2 { get; set; }
        
        [Description("If yes(Ticked), insert starting date (dd/mm/yyyy): ")]
        public DateTime NewCultvarStartDate { get; set; }
        
        [Description("If yes(Ticked), insert starting date (dd/mm/yyyy): ")]
        public DateTime NewCultvarEndDate { get; set; }
        
        [Separator("Optional: if you want to switch to another cultvar again")]
        [Description("Would you like to change cultvar again? ")]
        public bool SwitchCultvar2 { get; set; }
        
        [Display(Type = DisplayType.CultivarName)]
        [Description("Select the new cultvar ")]
        public string CultivarName3 { get; set; }
        
        [Description("Row spacing (mm)")]
        public double RowSpacing3 { get; set; }

        [Description("Plant population (/m2)")]
        public double Population3 { get; set; }
        
        [Description("If yes(Ticked), insert Start date date (dd/mm/yyyy): ")]
        public DateTime Cultvar3StartDate { get; set; }
        
        [Description("If yes(Ticked), insert end date date (dd/mm/yyyy): ")]
        public DateTime Cultvar3EndDate { get; set; }
        
        [Separator("Optional: if you want to switch to another cultvar again")]
        [Description("Would you like to change cultvar again? ")]
        public bool SwitchCultvar3 { get; set; }
        
        [Display(Type = DisplayType.CultivarName)]
        [Description("Select the new cultvar ")]
        public string CultivarName4 { get; set; }
        
        [Description("Row spacing (mm)")]
        public double RowSpacing4 { get; set; }

        [Description("Plant population (/m2)")]
        public double Population4 { get; set; }
        
        [Description("If yes(Ticked), insert Start date date (dd/mm/yyyy): ")]
        public DateTime Cultvar4StartDate { get; set; }
        
        [Description("If yes(Ticked), insert Start date date (dd/mm/yyyy): ")]
        public DateTime Cultvar4EndDate { get; set; }
        [Description("Would you like to change cultvar again? ")]
        public bool SwitchCultvar4 { get; set; }
        
        [Display(Type = DisplayType.CultivarName)]
        [Description("Select the new cultvar ")]
        public string CultivarName5 { get; set; }
        
        [Description("Row spacing (mm)")]
        public double RowSpacing5 { get; set; }

        [Description("Plant population (/m2)")]
        public double Population5 { get; set; }
        
        [Description("If yes(Ticked), insert Start date date (dd/mm/yyyy): ")]
        public DateTime Cultvar5StartDate { get; set; }
        
        [Description("If yes(Ticked), insert Start date date (dd/mm/yyyy): ")]
        public DateTime Cultvar5EndDate { get; set; }
        
        [EventSubscribe("StartOfSimulation")]
        private void OnSimulationCommencing(object sender, EventArgs e)
        {
            accumulatedRain = new Accumulator(this, "[Weather].Rain", RainDays);
        }

        [EventSubscribe("DoManagement")]
        private void OnDoManagement(object sender, EventArgs e)
        {
            accumulatedRain.Update();
                 
                 if (!Crop.IsAlive &&
                   DateUtilities.WithinDates(StartDate, Clock.Today, EndDate))
               {
                   var rainSum = accumulatedRain.Sum;
                   var eswSum  = MathUtilities.Sum(waterBalance.ESW);
                   if (rainSum > MinRain && eswSum > MinESW ||
                       DateUtilities.DatesEqual(EndDate, Clock.Today) && MustSow )
                   {
                       var thisCrop = Crop.Name.ToLower();
                       var nextCrop = (string)Rotations?.FindByPath("Script.NextCrop")?.Value;
                       if (thisCrop == (nextCrop?.ToLower() ?? thisCrop))
                       if (SwitchCultvar1 && Clock.Today.Date >= NewCultvarStartDate.Date && Clock.Today.Date <= NewCultvarEndDate.Date)
                    {
                           Crop.Sow(population: Population2,
                                 cultivar: CultivarName2,
                                 depth: SowingDepth,
                                 rowSpacing: RowSpacing2);
                      }
                   else if (SwitchCultvar2 && Clock.Today.Date >= Cultvar3StartDate.Date && Clock.Today.Date <= Cultvar3EndDate.Date)
                  {
                  Crop.Sow(population: Population3,
                                 cultivar: CultivarName3,
                                 depth: SowingDepth,
                                 rowSpacing: RowSpacing3);
                  }
                  else if ((SwitchCultvar3) && (Clock.Today.Date >= Cultvar4StartDate.Date) && (Clock.Today.Date <= Cultvar4EndDate.Date))
                  {
                  Crop.Sow(population: Population4,
                                 cultivar: CultivarName4,
                                 depth: SowingDepth,
                                 rowSpacing: RowSpacing4);
                  }
                  else if ((SwitchCultvar4) && (Clock.Today.Date >= Cultvar5StartDate.Date) && (Clock.Today.Date <= Cultvar5EndDate.Date))
                  {
                  double pop = 8;
                  Crop.Sow(population: pop,
                                 cultivar: CultivarName5,
                                 depth: SowingDepth,
                                 rowSpacing: RowSpacing5);
                  }
                  
                  else
                  {
                  Crop.Sow(population: Population,
                                 cultivar: CultivarName,
                                 depth: SowingDepth,
                                 rowSpacing: RowSpacing);
                  }
                   }
        
               }
           
               
        }
    }
}
```
        Manager Fertilize in two phases
          Crop = [Maize]
          FertiliserType = UreaNO3
          Amount = 180
          StartFertilizing = 01/01/1955 00:00:00
          EndFertilizing = 12/31/1967 00:00:00
          FertiliserType2 = UreaNO3
          Amount2 = 224
          StartFertilizing2 = 01/01/1968 00:00:00
          EndFertilizing2 = 12/31/2005 00:00:00
```csharp
using Models.Soils;
using System;
using Models.Core;
using Models.PMF;
namespace Models
{
    [Serializable]
    public class Script : Model
    {
        [Link] Clock Clock;
        [Link] Fertiliser Fertiliser;
        
        [Separator("This script is for applying fertilizers only at specified dates (fertilizers will be applying during sowing)")]
        
        [Description("Crop to be fertilised")]
        public IPlant Crop { get; set; }
        
        [Separator("First phase of fertilizer application")]

        [Description("Type of fertiliser to apply? ")] 
        public Fertiliser.Types FertiliserType { get; set; }
    
        [Description("Amount of fertiliser to be applied (kg/ha)")]
        public double Amount { get; set; }
       [Separator("Specify dates for the application of this fertilizer")] 
       [Description("Start Date to apply the specified fertilizers (dd/mm/yyyy))")]
       public DateTime StartFertilizing { get; set; }
       [Description("End Date to apply the specified fertilizers (dd/mm/yyyy)")]
       public DateTime EndFertilizing { get; set; }
       
       [Separator("Second phase of fertilizer application")]
       
       [Description("Type of fertiliser to apply? ")] 
        public Fertiliser.Types FertiliserType2 { get; set; }
    
        [Description("Amount of fertiliser to be applied (kg/ha)")]
        public double Amount2 { get; set; }
       [Separator("Specify dates for the application of this fertilizer")] 
       [Description("Start Date to apply the specified fertilizers (dd/mm/yyyy))")]
       public DateTime StartFertilizing2 { get; set; }
       [Description("End Date to apply the specified fertilizers (dd/mm/yyyy)")]
       public DateTime EndFertilizing2 { get; set; }
        
        [EventSubscribe("Sowing")]
        private void OnSowing(object sender, EventArgs e)
        {
            Model crop = sender as Model;
            if (Crop != null && crop.Name.ToLower() == (Crop as IModel).Name.ToLower() )
            if ((Clock.Today.Date >= StartFertilizing.Date) && (Clock.Today.Date <= EndFertilizing.Date ))
            {
            Fertiliser.Apply(Amount: Amount, Type: FertiliserType);
          } 
          else if ((Clock.Today.Date >= StartFertilizing2.Date) && (Clock.Today.Date <= EndFertilizing2.Date ))
            {
            Fertiliser.Apply(Amount: Amount2, Type: FertiliserType2);
          } 
        }
       
    }
}
```
        Manager Fertilize oats
          Crop = [Oats]
          FertiliserType = UreaN
          Amount = 60
          StartFertilizing = 01/01/1937 00:00:00
          EndFertilizing = 12/31/1967 00:00:00
          FertiliserType2 = UreaN
          Amount2 = 80
          StartFertilizing2 = 01/01/1968 00:00:00
          EndFertilizing2 = 12/31/2005 00:00:00
```csharp
using Models.Soils;
using System;
using Models.Core;
using Models.PMF;
namespace Models
{
    [Serializable]
    public class Script : Model
    {
        [Link] Clock Clock;
        [Link] Fertiliser Fertiliser;
        
        [Separator("This script is for applying fertilizers only at specified dates (fertilizers will be applying during sowing)")]
        
        [Description("Crop to be fertilised")]
        public IPlant Crop { get; set; }
        
        [Separator("First phase of fertilizer application")]

        [Description("Type of fertiliser to apply? ")] 
        public Fertiliser.Types FertiliserType { get; set; }
    
        [Description("Amount of fertiliser to be applied (kg/ha)")]
        public double Amount { get; set; }
       [Separator("Specify dates for the application of this fertilizer")] 
       [Description("Start Date to apply the specified fertilizers (dd/mm/yyyy))")]
       public DateTime StartFertilizing { get; set; }
       [Description("End Date to apply the specified fertilizers (dd/mm/yyyy)")]
       public DateTime EndFertilizing { get; set; }
       
       [Separator("Second phase of fertilizer application")]
       
       [Description("Type of fertiliser to apply? ")] 
        public Fertiliser.Types FertiliserType2 { get; set; }
    
        [Description("Amount of fertiliser to be applied (kg/ha)")]
        public double Amount2 { get; set; }
       [Separator("Specify dates for the application of this fertilizer")] 
       [Description("Start Date to apply the specified fertilizers (dd/mm/yyyy))")]
       public DateTime StartFertilizing2 { get; set; }
       [Description("End Date to apply the specified fertilizers (dd/mm/yyyy)")]
       public DateTime EndFertilizing2 { get; set; }
        
        [EventSubscribe("Sowing")]
        private void OnSowing(object sender, EventArgs e)
        {
            Model crop = sender as Model;
            if (Crop != null && crop.Name.ToLower() == (Crop as IModel).Name.ToLower() )
            if (Clock.Today.Date >= StartFertilizing.Date && Clock.Today.Date <= EndFertilizing.Date )
            {
            Fertiliser.Apply(Amount: Amount, Type: FertiliserType);
          } 
          else if (Clock.Today.Date >= StartFertilizing2.Date && Clock.Today.Date <= EndFertilizing2.Date )
            {
            Fertiliser.Apply(Amount: Amount2, Type: FertiliserType2);
          } 
        }
       
    }
}
```
        Memo
          intial carbon 0-150 was 2.278, i changed it 2.362

          initial carbon in 150- 300  was 2 1.840 I changed it to 2.00
        Manager Dynamic_tillage_Script
          IncoporationDates = 30-nov
          Years = 1956=820, 1957=1460, 1958=510, 1959=860, 1960=580, 1961=1456, 1962=330, 1964=190, 1965=2220, 1966=776
```csharp
using Models.Soils;
using System;
using Models.Core;
using Models.PMF;
using System.Collections.Generic;
using APSIM.Shared.Utilities;
using Models.Surface;
using Models.Interfaces;



namespace Models
{
    [Serializable]
    public class Script : Model
    {
        [Link] private Clock clock;
        [Link] public Report report;
        [Link] ISummary Summary;
        [Link] public IPlant iplant;
        [Link] SurfaceOrganicMatter SOM;
        
        [Link(IsOptional = true)] private IPlant existingCrop; //not needed now
        [Separator("This script applies tillage within specified dates of the simulation when the crop is ending")]
        //[Description("Crop")]
         //public IPlant Crop{ get; set; }
        [Separator("A component to apply residue removal on one or more dates on every year of the simulation")]
        [Description("Enter date of residue removal (this will be used for every year)")] 
        public string IncoporationDates { get; set; }
        
        [Separator("A component to specify amount of residues on one or more year of the simulation")]
        [Description("Enter one or more residue (kg) removed and years in pairs e.g  2001=1000, 2002=1500(comma seperated) ")] 
        public string[] Years { get; set; }
       

      
       
       // Declare variables to calculate above ground biomass: agb before entering events; harvesting and planting. 
       // By declaring them here within the the public class script they can be acceesed
       private double agb1;
       private double agb2;
       private double agb3;
       private string[] keyValuePairs;
       private string TillageDate;
       private double fraction;
       private int Depth;
       private int year;
       private int EvaluationDate;
            
       [EventSubscribe("Harvesting")]
        private void OnHarvest(object sender, EventArgs e)
        
        {
            //double[] AGB = Apsim.GetAllowableChildModels(this, [Maize].AboveGround.Wt);
               
           var Crop = existingCrop;
            
            Model crop = sender as Model;
            if (Crop != null && crop.Name.ToLower() == (Crop as IModel).Name.ToLower())
            {
            agb1  = Crop.AboveGround.Wt * 10;
             Summary.WriteMessage(this, $"Above ground biomass is: {agb1}.", MessageType.Information);
            }   
        }
        [EventSubscribe("DoManagement")]
        private void OnDoManagement(object sender, EventArgs e)
       
    {
    
    //SOM.Incorporate(Fraction, Depth);
    //check whether what we are doing is correct
    var TillageDate = DateTime.Parse(IncoporationDates + "-" + clock.Today.Year.ToString());//.ToString("dd/MM/yyyy");
    int EvaluationDate = 1998;
    int year = TillageDate.Year; 
    int Depth;
    if (year >= EvaluationDate){
      Depth = 400;
    }else{
      Depth = 150;
    } 
     
    Dictionary<string, int> myDictionary = new Dictionary<string, int>();
    var Crop = existingCrop;
    foreach (string stringentry in Years)
           {
           char[] delimiter = { '=' };
           string[] keyValuePairs = stringentry.Split(delimiter, StringSplitOptions.RemoveEmptyEntries);
           if (keyValuePairs.Length == 2)
            {
                string key = keyValuePairs[0];
                int value = int.Parse(keyValuePairs[1]);
                myDictionary.Add(key, value);
            }
           } 
          
           if (TillageDate.Date == clock.Today.Date && Crop != null){
          // extract the current year in the tillage date and convert it to string
          
          string yearstring = year.ToString();
          // extract biomass from the dictionary
          if (myDictionary.ContainsKey(yearstring))
          {
          int AboveGroundBiomassRemoved = myDictionary[yearstring];
          // calculate ammount to be removed and incoporated back into the soil
          double fraction = 1-(AboveGroundBiomassRemoved/agb1);
           SOM.Incorporate(fraction, Depth);
           Summary.WriteMessage(this, $" We are getting closer to the Above ground biomass is: {year} and {Depth}.", MessageType.Information);
          }
          else if (TillageDate.Date == clock.Today.Date && Crop != null && year <=1955)
          {
          var fraction = 0.01;
          SOM.Incorporate(fraction, Depth);
          // if not specified that means nothing was removed
          Summary.WriteMessage(this, $" We are getting closer to the Above ground biomass is: {year} and {Depth}.", MessageType.Information);
          }
          else if (TillageDate.Date == clock.Today.Date && Crop != null && year >=1955)
          {
          var fraction = 0.8;
          SOM.Incorporate(fraction, Depth);
          }
          }
       }
    


// residue incorporation phase 2
// else if ((clock.Today.Date >= StartResidueIncoporationDate2.Date) && (clock.Today.Date <= EndStartResidueIncoporationDate2.Date))

        
        
        }
    }
```
        Report MaizeR: same as Replacements.MaizeR
      Report Annual: same as corn oats and soybean.4NC.Field11.Annual
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