Simulations: Version=206
  DataStore
  Folder Replacements
    Plant Maize
      Cultivar P1197
        Command:
          [Phenology].Juvenile.Target.FixedValue = 270
          [Phenology].Photosensitive.Target.XYPairs.Y = 0,0,0
          [Phenology].FlagLeafToFlowering.Target.FixedValue = 1
          [Phenology].FloweringToGrainFilling.Target.FixedValue = 170
          [Phenology].GrainFilling.Target.FixedValue = 640
          [Phenology].Maturing.Target.FixedValue=50
          [Phenology].MaturityToHarvestRipe.Target.FixedValue=50
          [Maize].Grain.MaximumGrainsPerCob.FixedValue = 640
          [Maize].Grain.MaximumPotentialGrainSize.FixedValue = 0.32
          [Maize].Root.SpecificRootLength.FixedValue = 135
          [Maize].Root.RootFrontVelocity.PotentialRootFrontVelocity.PreFlowering.RootFrontVelocity.FixedValue=22
          [Grain].MaximumNConc.InitialPhase.InitialNconc.FixedValue=0.03
      Cultivar B_110___edited
        Command:
          [Phenology].Juvenile.Target.FixedValue=211
          [Phenology].Photosensitive.Target.XYPairs.X=0, 12.5, 24
          [Phenology].Photosensitive.Target.XYPairs.Y=0, 0, 2
          [Phenology].FlagLeafToFlowering.Target.FixedValue=1
          [Phenology].FloweringToGrainFilling.Target.FixedValue=170
          [Phenology].GrainFilling.Target.FixedValue=815
          [Phenology].Maturing.Target.FixedValue=1
          [Phenology].MaturityToHarvestRipe.Target.FixedValue=1
          [Rachis].DMDemands.Structural.DMDemandFunction.MaximumOrganWt.FixedValue=36
          [Leaf].Photosynthesis.RUE.FixedValue=1.95
          [Grain].MaximumGrainsPerCob.FixedValue=770
    Manager Sow using a variable rule
      Crop = [Maize]
      StartDate = 1-may
      EndDate = 15-may
      MinESW = 100
      MinRain = 5
      RainDays = 7
      CultivarName = B_110___edited
      SowingDepth = 25
      RowSpacing = 750
      Population = 8.65
```csharp
using APSIM.Numerics;
using Models.Climate;
using System.Linq;
using System;
using Models.Core;
using Models.PMF;
using Models.Soils;
using Models.Utilities;
using APSIM.Shared.Utilities;
using Models.Interfaces;

namespace Models
{
    [Serializable]
    public class Script : Model
    {
        [Link] private Clock Clock;
        [Link] private Fertiliser Fertiliser;
        [Link] private Summary Summary;
        [Link] private Soil Soil;
        private Accumulator accumulatedRain;
        [Link]
        private ISoilWater waterBalance;
        
        [Description("Crop")]
        public IPlant Crop { get; set; }

        [Description("Start of sowing window (d-mmm)")]
        public string StartDate { get; set; }

        [Description("End of sowing window (d-mmm)")]
        public string EndDate { get; set; }

        [Description("Minimum extractable soil water for sowing (mm)")]
        public double MinESW { get; set; }

        [Description("Accumulated rainfall required for sowing (mm)")]
        public double MinRain { get; set; }

        [Description("Duration of rainfall accumulation (d)")]
        public int RainDays { get; set; }

        [Display(Type = DisplayType.CultivarName)]
        [Description("Cultivar to be sown")]
        public string CultivarName { get; set; }

        [Description("Sowing depth (mm)")]
        public double SowingDepth { get; set; }

        [Description("Row spacing (mm)")]
        public double RowSpacing { get; set; }

        [Description("Plant population (/m2)")]
        public double Population { get; set; }
        
        
        [EventSubscribe("StartOfSimulation")]
        private void OnSimulationCommencing(object sender, EventArgs e)
        {
            accumulatedRain = new Accumulator(this, "[Weather].Rain", RainDays);
        }

        [EventSubscribe("DoManagement")]
        private void OnDoManagement(object sender, EventArgs e)
        {
            accumulatedRain.Update();
            
            if (DateUtilities.WithinDates(StartDate, Clock.Today, EndDate) &&
                !Crop.IsAlive &&
                MathUtilities.Sum(waterBalance.ESW) > MinESW &&
                accumulatedRain.Sum > MinRain)
            {
                Crop.Sow(population: Population, cultivar: CultivarName, depth: SowingDepth, rowSpacing: RowSpacing);    
            }
        }
    }
}
```
    Manager Tillage
      Fraction = 0.98
      Depth = 150
      AppplyTillageOption = yes
```csharp
using Models.Soils;
using System;
using Models.Core;
using Models.PMF;
using APSIM.Shared.Utilities;
using Models.Surface;

namespace Models
{
    [Serializable]
    public class Script : Model
    {
        [Link] Clock Clock;
        [Link] SurfaceOrganicMatter SOM;
        [Link(IsOptional = true)] private IPlant existingCrop;
        [Link] ISummary Summary;
        [Separator("Applies tillage to an existing crop when it is ending")]
        //[Description("Crop")]
        //public IPlant Crop { get; set; }
        
        [Description("Fraction of Residues To Incorporate (0-1)")]
        public double Fraction { get; set; }
        
        [Description("Depth of Tillage (mm)")]
        public double Depth { get; set; }
        
        
        public enum ApplyTillage { yes, no }
        [Description("Do you want to till the land?")] 
        public ApplyTillage AppplyTillageOption { get; set; }

        [EventSubscribe("PlantEnding")]
        private void OnEndCrop(object sender, EventArgs e)
        {
            Model existingCrop = sender as Model;
            if (existingCrop != null && existingCrop.Name.ToLower() == (existingCrop as IModel).Name.ToLower()&& ApplyTillage.yes ==AppplyTillageOption)
            
            {
           
            SOM.Incorporate(Fraction, Depth);
            
           }
           
           
             Summary.WriteMessage(this, $"Tillage is applied to: {existingCrop.Name}", MessageType.Information);
        }
    }
}
```
    Manager SowMaize
      Rotations = [Simple Rotation]
      Crop = [Maize]
      StartDate = 1-May
      EndDate = 15-May
      MinESW = 200
      MinRain = 5
      RainDays = 7
      CultivarName = A_112
      SowingDepth = 50
      RowSpacing = 750
      Population = 8.65
      MustSow = True
```csharp
using APSIM.Core;
using Models.Interfaces;
using APSIM.Shared.Utilities;
using Models.Utilities;
using Models.Soils;
using Models.PMF;
using Models.Core;
using System;
using Models.Climate;
using APSIM.Numerics;
using System.ComponentModel;           // for [Description]
using Models.Core.Attributes;          // for [Display], [Separator]

namespace Models
{
    [Serializable]
    public class Script : Model, IStructureDependency
    {
        [Link] private Clock Clock;
        [Link] private Summary Summary;
        private Accumulator accumulatedRain;

        [Link] private ISoilWater waterBalance;

        // IStructureDependency requirement
        public IStructure Structure { private get; set; }

        [Description("Simple Rotation Manager")]
        public Manager Rotations { get; set; }

        [Separator("Sowing Info")]

        [Description("Crop")]
        public IPlant Crop { get; set; }

        [Description("Start of sowing window (d-mmm)")]
        public string StartDate { get; set; }

        [Description("End of sowing window (d-mmm)")]
        public string EndDate { get; set; }

        [Description("Minimum extractable soil water for sowing (mm)")]
        public double MinESW { get; set; }

        [Description("Accumulated rainfall required for sowing (mm)")]
        public double MinRain { get; set; }

        [Description("Duration of rainfall accumulation (d)")]
        public int RainDays { get; set; }

        [Display(Type = DisplayType.CultivarName)]
        [Description("Cultivar to be sown")]
        public string CultivarName { get; set; }

        [Description("Sowing depth (mm)")]
        public double SowingDepth { get; set; }

        [Description("Row spacing (mm)")]
        public double RowSpacing { get; set; }

        [Description("Plant population (/m2)")]
        public double Population { get; set; }

        [Description("Must sow by end date?")]
        public bool MustSow { get; set; }

        [EventSubscribe("StartOfSimulation")]
        private void OnSimulationCommencing(object sender, EventArgs e)
        {
            accumulatedRain = new Accumulator(this, "[Weather].Rain", RainDays);
        }

        [EventSubscribe("DoManagement")]
        private void OnDoManagement(object sender, EventArgs e)
        {
            accumulatedRain.Update();

            if (!Crop.IsAlive &&
                DateUtilities.WithinDates(StartDate, Clock.Today, EndDate))
            {
                var rainSum = accumulatedRain.Sum;
                var eswSum  = MathUtilities.Sum(waterBalance.ESW);

                if ((rainSum > MinRain && eswSum > MinESW) ||
                    (DateUtilities.DatesEqual(EndDate, Clock.Today) && MustSow))
                {
                    var thisCrop = Crop.Name.ToLower();

                    // Use this class's Structure (avoid Rotations.Structure getter issue)
                    var nextCrop = (string)Structure.GetObject("Script.NextCrop")?.Value;

                    if (thisCrop == (nextCrop?.ToLower() ?? thisCrop))
                        Crop.Sow(population: Population,
                                 cultivar: CultivarName,
                                 depth: SowingDepth,
                                 rowSpacing: RowSpacing);
                }
            }
        }
    }
}
```
    Manager Simple Rotation
      Crops = Maize, Soybean, Maize, Soybean, Maize
```csharp
using Models.Soils;
using System.Collections.Generic;
using APSIM.Shared.Utilities;
using Models.PMF;
using Models.Interfaces;
using Models.Core;
using System;

namespace Models
{
    [Serializable]
    public class Script : Model
    {
        [Link] IClock Clock;
        [Link] ISummary Summary;
        
        [Description("Rotation Sequence (comma separated crop names)")]
        public string[] Crops { get; set; }
        
        // Repeating cycle of input crops. Don't loop on this, loop on Crops
        private IEnumerable<string> cropsEnum()
        {
            var counter = 0;
            while (true)
            {
                yield return Crops[counter];
                ++counter;
                if (counter >= Crops.Length)
                    counter = 0;
            }
        }
        
        private IEnumerator<string> cropCycle;
        
        [Description("Next crop to sow in the simple rotation.")]
        public string NextCrop
        { get => cropCycle.Current; }
        
        [EventSubscribe("StartOfSimulation")]
        private void Init(object sender, EventArgs e)
        {
            // TODO: Error if Crops is empty.
            cropCycle = cropsEnum().GetEnumerator();
            // Set to first value.
            cropCycle.MoveNext();
        }

        [EventSubscribe("PlantEnding")]
        private void OnEndCrop(object sender, EventArgs e)
        {
            // Currently assumes only one crop in the ground, so does not check if the  
            // harvested crop is this script's current crop.
            var old = NextCrop;
            cropCycle.MoveNext();
            var _new = NextCrop;
            Summary.WriteMessage(this, $"Rotation finished with {old}, next up: {_new}.", MessageType.Information);
        }
    }
}
```
    Weather
      FileName=D:/My_BOX/Box/research temporal/analysis B/new_analysis/Iem_IA0200.met
    Report Annual: EventNames=[clock].StartOfYear
      VariableNames:
        [Clock].Today
        [Clock].Today.Year as year
        [Maize].Phenology.CurrentStageName
        [Maize].AboveGround.Wt as Abiomas
        [Maize].Grain.Wt * 10 as grainwt
        [Maize].Total.Wt * 10 as maizeyield
        sum([Nutrient].FOM.C)  from 01-jan to [Clock].Today as FOM.c
        [Maize].BelowGround.Wt as BBiomass
        sum([Soil].Nutrient.TotalC)/1000 from 01-jan to [clock].Today as soc
        [SurfaceOrganicMatter].C as Total_surfaceCArbon
        [SurfaceOrganicMatter].wt as surface_organic_matter
        sum([Nutrient].Catm) as Soil_Respiration
        sum([Soil].Nutrient.TotalC[3:5])/1000 as Deeplayer_soil_Carbon
        sum([Soil].Nutrient.TotalC[1:3])/1000 as Toplayer_soil_Carbon
        sum of sum([Nutrient].N2Oatm) from 01-jan to [Clock].Today as n20
        sum of sum([Nutrient].N2Oatm[1:6] from 01-jan to [Clock].Today as N20D20cm
        sum of sum([Nutrient].N2Oatm[1:10]) from 01-jan to [Clock].Today asN20
        [Soil].Nutrient.TotalC[1]/1000 as SOC_0_15CM
        sum([Soil].Nutrient.TotalC[1:2])/1000 as SOCD40CM
        [Nutrient].Catm[1] as RespD20cm
        sum([Nutrient].Catm[1:2]) as RespD40cm
        [Soil].Water.Volumetric as DUL
        [Soil].SoilWater.PAW as PAW
        sum of sum([Nutrient].Catm[1:6]) from 01-jan to [Clock].Today as Top_respiration
        sum of sum([Nutrient].Catm[1:10]) from 01-jan to [Clock].Today as whole_respiration
        [Maize].Root.Total.Wt * 10 as rootbiomass
        [Soil].NO3.kgha as Nitrates
        [Simulation].Name as Plotid
    Report MaizeR: EventNames=[maize].Harvesting
      VariableNames:
        [Clock].Today
        [Clock].Today.Year as year
        [Maize].Phenology.CurrentStageName
        [Maize].AboveGround.Wt as Abiomas
        [Maize].Grain.Wt * 10 as grainwt
        [Maize].Total.Wt * 10 as maizeyield
        sum([Nutrient].FOM.C)  from 01-jan to [Clock].Today as FOM.c
        [Maize].BelowGround.Wt as BBiomass
        sum([Soil].Nutrient.TotalC)/1000 from 01-jan to [clock].Today as soc
        [SurfaceOrganicMatter].C as Total_surfaceCArbon
        [SurfaceOrganicMatter].wt as surface_organic_matter
        sum([Nutrient].Catm) as Soil_Respiration
        sum([Soil].Nutrient.TotalC[3:5])/1000 as Deeplayer_soil_Carbon
        sum([Soil].Nutrient.TotalC[1:3])/1000 as Toplayer_soil_Carbon
        sum of sum([Nutrient].N2Oatm) from 01-jan to [Clock].Today as n20
        sum of sum([Nutrient].N2Oatm[1:6] from 01-jan to [Clock].Today as N20D20cm
        sum of sum([Nutrient].N2Oatm[1:10]) from 01-jan to [Clock].Today asN20
        [Soil].Nutrient.TotalC[1]/1000 as SOC_0_15CM
        sum([Soil].Nutrient.TotalC[1:2])/1000 as SOCD40CM
        [Nutrient].Catm[1] as RespD20cm
        sum([Nutrient].Catm[1:2]) as RespD40cm
        [Soil].Water.Volumetric as DUL
        [Soil].SoilWater.PAW as PAW
        sum of sum([Nutrient].Catm[1:6]) from 01-jan to [Clock].Today as Top_respiration
        sum of sum([Nutrient].Catm[1:10]) from 01-jan to [Clock].Today as whole_respiration
        [Maize].Root.Total.Wt * 10 as rootbiomass
        [Simulation].Name as Plotid
    Report yield: EventNames=[Maize].Harvesting
      VariableNames:
        [Clock].Today
        [Simulation].Name as Plotid
        [Clock].Today.Year as year
        [Maize].Phenology.CurrentStageName
        [Maize].AboveGround.Wt as Abiomas
        [Maize].Grain.Wt * 10 as grainwt
        [Maize].Total.Wt * 10 as maizeyield
        [Maize].Total.Wt * 10 as total_biomass
        [Maize].BelowGround.Wt as BBiomass
    Report carbon: EventNames=1-jan
      VariableNames:
        [Clock].Today
        [Report].Name as Plotid
        [Clock].Today.Year as year
        sum([Nutrient].FOM.C)  from 01-jan to [Clock].Today as FOM.c
        sum([Nutrient].TotalOrganicN[1])  from 01-jan to [Clock].Today as TON
        sum([Soil].Nutrient.TotalC)/1000 from 01-jan to [clock].Today as soc
        [SurfaceOrganicMatter].C as Total_surfaceCArbon
        [SurfaceOrganicMatter].wt as surface_organic_matter
        sum([Nutrient].Catm) as Soil_Respiration
        sum([Soil].Nutrient.TotalC[3:5])/1000 as Deeplayer_soil_Carbon
        sum([Soil].Nutrient.TotalC[1:3])/1000 as Toplayer_soil_Carbon
        sum of sum([Nutrient].N2Oatm[1:3]) from [carbon].DayAfterLastOutput to [Clock].Today as n20
        sum of sum([Nutrient].N2Oatm[1:6] from 01-jan to [Clock].Today as N20D20cm
        sum of sum([Nutrient].N2Oatm[1:9]) from 01-jan to [Clock].Today as N20
        [Soil].Nutrient.TotalC[1]/1000 from [carbon].DayAfterLastOutput to [clock].Today as SOC_0_15CM // soil carbon in the first layer
        [Soil].Nutrient.TotalC[2]/1000 from [clock].StartOfSimulation to [clock].Today as SOC_1_2
        SOC_1_2 + SOC_0_15CM as soccx
        sum([Soil].Nutrient.TotalC[:1])/1000 as SOCD40CM
        sum of [Nutrient].Catm[1] from 1-jan to today as RespD20cm
        sum of [Nutrient].Catm[1] from 1-jan to today as RespD40cm
        [Soil].Water.Volumetric as DUL
        [Soil].SoilWater.PAW as PAW
        sum of ([Nutrient].Catm[1]) from 01-jan to [Clock].Today as Top_respiration
        sum of sum([Nutrient].Catm[1:9]) from 01-jan to [Clock].Today as whole_respiration
        [Maize].Root.Total.Wt * 10 as RootBiomass
        [Soil].Nutrient.TotalC[7] as deepC
        [Soil].Nutrient.TotalC[8] as deepC8
        [Soil].Nutrient.TotalC[9] as deepC9
        [Soil].Nutrient.TotalC[10] as deepC10
        mean of [Maize].LAI  from [carbon].DayAfterLastOutput to [Clock].Today as lai
        [Soil].Nutrient.TotalC[1]/1000 as carbo
        [Soil].SoilTemperature.Value[1] as tmp1
        [Soil].SoilTemperature.Value[2] as tmp2
        [Soil].SoilTemperature.Value[1] + [Soil].SoilTemperature.Value[2] as tmp
        // from mineralization report
        // convert to Mg
        sum of [Nutrient].Catm[1]/1000 from [carbon].DayAfterLastOutput  to [Clock].Today as top_carbon_mineralization
        sum of [Nutrient].Catm[2]/1000 from 1-jan to [Clock].Today as layer2_mineralization
        sum of [Nutrient].MineralisedN[1]  from [carbon].DayAfterLastOutput  to today as top_mineralized_N
        [Soil].Nutrient.TotalC[1]/1000 from 01-jan to [clock].Today as SOC1
        [Nutrient].Organic.C[1]/1000 as org_c
        [Nutrient].Microbial.C[1]/1000 as microbial_carbon
        [Nutrient].FOM.C[1] as FOM_C_kg
        [Weather].Rain as rain
        // Surface Organic Matter Carbon and Nitrogen
        [SurfaceOrganicMatter].C as SurfaceOrganicMatter_Carbon
        [SurfaceOrganicMatter].N as SurfaceOrganicMatter_Nitrogen
    Clock: Start=2011-01-01; End=2016-12-31
  Simulation 1101
    Clock: Start=2000-01-01; End=2016-12-31
    Summary SummaryFile
    Weather
      FileName=D:/My_BOX/Box/research temporal/analysis B/new_analysis/Iem_IA0200.met
    SoilArbitrator Soil Arbitrator
    Zone Field1: Area=1; Slope=2; AspectAngle=0; Altitude=50
      Report Carbon_end: EventNames=[Clock].EndOfSimulation
        VariableNames:
          diff of ([Soil].Nutrient.TotalC[1])/1000 from [Clock].StartOfSimulation to [Clock].EndOfSimulation as changeincarbon
          diff of sum([Soil].Nutrient.TotalC[1:2])/1000 from [Clock].StartOfSimulation to [Clock].EndOfSimulation as changeincarbon2
          changeincarbon + changeincarbon2 as to_carb
          (-1 * to_carb *(44/12))*1000 as co_eq
      Report MaizeR: EventNames=[Maize].Harvesting
        VariableNames:
          [Clock].Today
          [Clock].Today.Year as Year
          [Maize].AboveGround.Wt*10  as M_AGB
          [Maize].AboveGround.N as MAIZE_AGB_NITROGEN
          [Maize].Grain.Total.Wt * 10 as Maize_Yield
          [Maize].Grain.Total.Wt * 10 as mYield
      Report Annual: EventNames=[Clock].EndOfYear
        VariableNames:
          // Time
          [Clock].Today as Date
          [Clock].Today.Year as an_Year
          [Clock].Today.Year as year
          [Simulation].Name as Plotid
          [Soil].Nutrient.TotalC[1]/1000 as SOC_0_15CM
          // Carbon
          [Soil].Nutrient.TotalC[1]/1000 as SOC1
          sum([Soil].Nutrient.TotalC[1:2])/1000 as SOC2
          sum of sum([Nutrient].Catm[1:10]) from 01-jan to [Clock].Today as Whole_repsiration
          sum of sum([Nutrient].Catm[1:6]) from 01-jan to [Clock].Today  as  Top_respiration
          sum([Soil].Nutrient.TotalC[1:2])/1000 as TPC
          // Nitrogen
          [NO3].Flow[1] as flowNitrate
          sum of Sum( [Soil].NO3.ppm[1:2]) from 01-jan to [Clock].Today as NConc
          [Soil].NO3.ppm[1] as N03Ncon
          [Soil].NO3.ppm[2] as N03Ncon2
          [Soil].NO3.ppm[3] *0.8 as N03Ncon3
          Sum of [Soil].SoilWater.LeachNO3 from 01-jan to [Clock].Today as CumuAnnualLeach
          sum([Soil].NO3.kgha) as NO3Total
          sum of sum([Nutrient].N2Oatm[1:6]) from 01-Mar to [Clock].Today as TopN2O
          sum of sum([Nutrient].N2Oatm[1:8]) from 01-Mar to [Clock].Today as  n20
          sum([Soil].Nutrient.NO3.kgha[1:2]) as MineralN
          sum of [Soil].SoilWater.LeachNO3 from [Annual].DayAfterLastOutput to [clock].Today as LeachNO3
          // Water
          sum of ([Soil].SoilWater.Runoff) from 01-jan to [Clock].Today as runoff
          sum of [Soil].SoilWater.Drainage from [Annual].DayAfterLastOutput to [clock].Today as drainaged_run_off
          SOC1 + SOC2 as total_carbon
          // Calculate Nitrate Loss. 0.01 converts to kg per hectare
          runoff * (N03Ncon + N03Ncon2 + N03Ncon3) *0.01  as Nloss
          // calculalate carbon dioxide equivalent
           n20 *(44/28) *165 as no2_eq
           TopN2O *(44/28) *165 as top_no2_eq
           // Weather and soil water
          sum of [weather].rain from 01-jan to [clock].Today as mean_rain
          sum of [weather].MaxT  from 01-jan to [Clock].Today as mean_maxt
          sum  of [weather].MinT from 01-jan to [Clock].Today as mean_mint
          sum  of [weather].Radn from 01-jan to [Clock].Today as total_radn
          mean  of [Water].PAW[1] from 01-jan to [Clock].Today as PAWC1
          mean  of [Water].PAW[2] from 01-jan to [Clock].Today as PAWC2
          mean  of [Soil].SoilWater.SW[1] from 01-jan to [Clock].Today as SW1
          mean  of [Soil].SoilWater.SW[2] from 01-jan to [Clock].Today as SW2
          mean  of [Soil].SoilWater.SW[3] from 01-jan to [Clock].Today as SW3
      SurfaceOrganicMatter: InitialResidueName=grass; InitialResidueType=grass; InitialResidueMass=800; InitialStandingFraction=0; InitialCPR=0; InitialCNR=80
      Fertiliser
      Plant Maize
      MicroClimate: a_interception=0; b_interception=1; c_interception=0; d_interception=0; SoilHeatFluxFraction=0.4; MinimumHeightDiffForNewLayer=0; NightInterceptionFraction=0.5; ReferenceHeight=2
      Manager HarvestMaize
        Crop = [Maize]
        Date = 25-Sep
```csharp
using APSIM.Shared.Utilities;
using Models.Utilities;
using Models.Soils;
using Models.PMF;
using Models.Core;
using System;

namespace Models
{
    [Serializable] 
    public class Script : Model
    {
        [Link] IClock Clock;
        
        [Separator("Harvesting script that forces harvesting")]
        [Description("Crop")]
        public IPlant Crop { get; set; }
        
        [Description("Date to force harvesting by if crop is not ready (d-mmm)")]
        public string Date { get; set; }
        
        [EventSubscribe("DoManagement")]
        private void OnDoManagement(object sender, EventArgs e)
        {
            if (Crop.IsReadyForHarvesting || 
                (DateUtilities.DatesAreEqual(Date, Clock.Today) && Crop.IsAlive))
            {
                Crop.Harvest();
                Crop.EndCrop();
            }
        }
    }
}
```
      Soil Muscatune:244911: SoilType=Shaffton:67263817; Site=11; State=IL; Country=USA; ApsoilNumber=0; Latitude=41.763; Longitude=-90.6808
        DataSource=SSURGO https://SDMDataAccess.nrcs.usda.gov/Tabular/SDMTabularService.asmx through PyAPSIMX function Replace_Soilprofile. Date downloaded: 2022-12-27 02:49:44.558240
        Comments=cockey = 22743816 Shaffton loam, 0 to 2 percent slopes Component percentage: 95%
        Physical
          Thickness  ParticleSizeSand  ParticleSizeSilt  ParticleSizeClay  Rocks  BD       AirDry     LL15       DUL       SAT       KS
          200        1.7002            66.3125           32                0      1.32     0.0575     0.115      0.406941  0.481887  792.45
          100        2.01345           66.2372           31.759            0      1.33224  0.08873    0.110913   0.387198  0.477269  792.45
          200        2.32671           66.1619           31.5181           0      1.34447  0.0854601  0.106825   0.367455  0.472652  792.45
          200        2.63997           66.0866           31.2771           0      1.35671  0.102738   0.102738   0.347712  0.468034  792.45
          200        2.95322           66.0113           31.0361           0      1.36708  0.0986502  0.0986502  0.329708  0.464122  792.45
          250        2.81824           67.7725           29.3975           0      1.36895  0.093031   0.093031   0.327968  0.463416  792.45
          300        2.60467           69.8551           27.5145           0      1.38877  0.0871437  0.0871437  0.321469  0.455936  792.45
          300        2.32539           71.5934           26.0573           0      1.38923  0.0818731  0.0818731  0.319199  0.455762  792.45
          350        1.98345           73.0001           25.0068           0      1.41046  0.0771934  0.0771934  0.313231  0.44775   792.45
          250        1.6415            74.4069           23.9563           0      1.41092  0.0725138  0.0725138  0.312366  0.447576  792.45
          Rocks source: Calculated
          SoilCrop MaizeSoil
            LL=[0.115, 0.110913, 0.106825, 0.102738, 0.0986502, 0.093031, 0.0871437, 0.0818731, 0.0771934, 0.0725138]
            KL=[0.08, 0.0654985, 0.0536256, 0.0439049, 0.0359463, 0.0294304, 0.0240955, 0.0197278, 0.0161517, 0.0132239]
            XF=[1, 1, 1, 1, 1, 1, 1, 1, 1, 1]
          SoilCrop SoybeanSoil: same as 1101.Field1.Muscatune:244911.Physical.MaizeSoil
          SoilCrop WheatSoil: same as 1101.Field1.Muscatune:244911.Physical.MaizeSoil
          SoilCrop TropicalPastureSoil: same as 1101.Field1.Muscatune:244911.Physical.MaizeSoil
        Organic: FOMCNRatio=40; CarbonUnits=Total
          Thickness  Carbon  SoilCNRatio  FBiom  FInert    FOM
          200        2.445   12           0.03   0.511478  150
          100        1.7     12           0.035  0.668     122.81
          200        1.183   12           0.03   0.846767  100.548
          200        0.823   12           0.025  0.855277  82.3217
          200        0.572   12           0.02   0.863873  67.3993
          250        0.398   12           0.017  0.872555  55.1819
          300        0.277   12           0.014  0.881324  45.1791
          300        0.192   12           0.011  0.890182  36.9895
          350        0.134   12           0.009  0.899128  30.2845
          250        0.093   12           0.007  0.908165  24.7948
        Chemical: PHUnits=Water
          Thickness  PH     CEC
          200        6.2    14.1592
          100        5.866  12.4407
          200        5.531  11.2322
          200        5.3    10.3786
          200        5.3    9.7717
          250        5.3    8.93317
          300        5.3    8.14351
          300        5.3    7.54614
          350        5.535  7.11089
          250        6.118  6.71579
          CEC source: Calculated
        Water: Thickness=[200, 100, 200, 200, 200, 250, 300, 300, 350, 250]; FilledFromTop=true
          InitialValues=[0.406941, 0.387198, 0.367455, 0.347712, 0.329708, 0.327968, 0.321469, 0.319199, 0.313231, 0.312366]
        Nutrient
        WaterBalance SoilWater: SummerDate=1-jun; SummerU=8.55; SummerCona=3.775; WinterDate=1-nov; WinterU=8.55; WinterCona=3.775; DiffusConst=40; DiffusSlope=16; Salb=0.13; CN2Bare=76; CNRed=20; CNCov=0.8; DischargeWidth=160; CatchmentArea=10000; PSIDul=-100; Thickness=[200, 100, 200, 200, 200, 250, 300, 300, 350, 250]
          SWCON=[0.152205, 0.185154, 0.218778, 0.253098, 0.285504, 0.288136, 0.290212, 0.294941, 0.295102, 0.29676]
        Solute NO3: Thickness=[200, 200, 200, 200, 200, 200, 200, 200, 200, 200]; InitialValuesUnits=ppm; WaterTableConcentration=0; D0=0; DepthConstant=0; MaxDepthSoluteAccessible=0; RunoffEffectivenessAtMovingSolute=0; MaxEffectiveRunoff=0
          InitialValues=[3.66, 5.81, 1.235, 1.096, 0.889, 0.683, 0.476, 0.269, 0.145, 0.145]
        Solute NH4: Thickness=[200, 200, 200, 200, 200, 200, 200, 200, 200, 200]; InitialValuesUnits=ppm; WaterTableConcentration=0; D0=0; DepthConstant=0; MaxDepthSoluteAccessible=0; RunoffEffectivenessAtMovingSolute=0; MaxEffectiveRunoff=0
          InitialValues=[3.66, 5.811, 1.235, 1.096, 0.889, 0.683, 0.476, 0.269, 0.145, 0.145]
        Solute Urea: Thickness=[200, 200, 200, 200, 200, 200, 200, 200, 200, 200]; InitialValues=[0, 0, 0, 0, 0, 0, 0, 0, 0, 0]; InitialValuesUnits=kg/ha; WaterTableConcentration=0; D0=0; DepthConstant=0; MaxDepthSoluteAccessible=0; RunoffEffectivenessAtMovingSolute=0; MaxEffectiveRunoff=0
        SoilTemperature
      Manager Tillage
        Fraction = 0.95
        Depth = 350
        AppplyTillageOption = yes
        script: same as in Replacements.Tillage
      Report gyield: same as Replacements.yield
      Manager Sow using a variable rule: same as Replacements.Sow using a variable rule
      Manager fertilize in phases
        Crop =
        FertiliserType = UreaNO3
        Amount = 245
```csharp
using Models.Soils;
using System;
using System.Linq;
using Models.Core;
using Models.PMF;
namespace Models
{
    [Serializable]
    public class Script : Model
    {
        [Link] Clock Clock;
        [Link] Fertiliser Fertiliser;
        
        [Description("Crop to be fertilised")]
        public IPlant Crop { get; set; }

        [Description("Type of fertiliser to apply? ")] 
        [Display(Type = DisplayType.FertiliserType)]public string FertiliserType { get; set; }
    
        [Description("Amount of fertiliser to be applied (kg/ha)")]
        public double Amount { get; set; }
        
        [EventSubscribe("Sowing")]
        private void OnSowing(object sender, EventArgs e)
        {
            Model crop = sender as Model;
            if (Crop != null && crop.Name.ToLower() == (Crop as IModel).Name.ToLower())
                Fertiliser.Apply(amount: Amount, type: FertiliserType);
        }
    }
}
```
      Report yield: same as Replacements.yield
      Report carbon: same as Replacements.carbon
    Memo
      When working with perennial crops that are harvested or grazed frequently, often an output that plots the accumulation of growth during a year is wanted. That output should be zeroed between years. If simulating a site in the Southern Hemisphere, usually the end of the year will be in June or July (winter). Here this is achieved as "CumulativeAnnualNetGrowth" using reporting at the end of the month (see in MonthlyReporting) and:

      		Sum of ([Ryegrass].NetGrowthWt + [WhiteClover].NetGrowthWt)
      			from 1-Jul to [Clock].Today as CumulativeAnnualNetGrowth

      with the output shown as the orange line below. Note that here it is necessary to calculate the output summing ryegrass and white clover. For comparison, the pattern of accumulation is plotted against the annual total (green line) and that was specified in AnnualReporting using:

      		Sum of ([Ryegrass].NetGrowthWt + [WhiteClover].NetGrowthWt)
      			from [AnnualReporting].DayAfterLastOutput to [Clock].Today
      			as SumYearlyNetGrowth
  Simulation 3092
    Clock: Start=2000-01-01; End=2016-12-31
    Summary SummaryFile
    Weather
      FileName=D:/My_BOX/Box/research temporal/analysis B/new_analysis/Iem_IA0200.met
    SoilArbitrator Soil Arbitrator
    Zone Field1: Area=1; Slope=2; AspectAngle=0; Altitude=50
      Report Carbon: same as 1101.Field1.Carbon_end
      Report MaizeR: EventNames=[Maize].Harvesting
        VariableNames:
          [Clock].Today
          [Clock].Today.Year as Year
          [Maize].AboveGround.Wt*10  as M_AGB
          [Maize].AboveGround.N as MAIZE_AGB_NITROGEN
          [Maize].Grain.Total.Wt * 10 as Maize_Yield
          [Maize].Grain.Total.Wt * 10 as mYield
      Report Annual: same as 1101.Field1.Annual
      SurfaceOrganicMatter: InitialResidueName=grass; InitialResidueType=grass; InitialResidueMass=800; InitialStandingFraction=0; InitialCPR=0; InitialCNR=80
      Fertiliser
      Plant Maize
      MicroClimate: a_interception=0; b_interception=1; c_interception=0; d_interception=0; SoilHeatFluxFraction=0.4; MinimumHeightDiffForNewLayer=0; NightInterceptionFraction=0.5; ReferenceHeight=2
      Plant Soybean
      Manager HarvestMaize: same as 1101.Field1.HarvestMaize
      Soil Muscatune:244911: SoilType=Shaffton:67263817; Site=11; State=IL; Country=USA; ApsoilNumber=0; Latitude=41.763; Longitude=-90.6808
        DataSource=SSURGO https://SDMDataAccess.nrcs.usda.gov/Tabular/SDMTabularService.asmx through PyAPSIMX function Replace_Soilprofile. Date downloaded: 2022-12-27 02:49:44.558240
        Comments=cockey = 22743816 Shaffton loam, 0 to 2 percent slopes Component percentage: 95%
        Physical
          Thickness  ParticleSizeSand  ParticleSizeSilt  ParticleSizeClay  Rocks  BD     AirDry  LL15   DUL    SAT    KS
          200        1.7               66.312            32                0      1.36   0.065   0.131  0.407  0.467  792.45
          100        2.013             66.237            31.759            0      1.373  0.101   0.126  0.387  0.462  792.45
          200        2.327             66.162            31.518            0      1.385  0.097   0.121  0.367  0.457  792.45
          200        2.64              66.087            31.277            0      1.398  0.117   0.117  0.348  0.453  792.45
          200        2.953             66.011            31.036            0      1.409  0.112   0.112  0.33   0.448  792.45
          250        2.818             67.772            29.397            0      1.41   0.106   0.106  0.328  0.448  792.45
          300        2.605             69.855            27.514            0      1.431  0.099   0.099  0.321  0.44   792.45
          300        2.325             71.593            26.057            0      1.431  0.093   0.093  0.319  0.44   792.45
          350        1.983             73                25.007            0      1.453  0.088   0.088  0.313  0.432  792.45
          250        1.642             74.407            23.956            0      1.454  0.082   0.082  0.312  0.431  792.45
          Rocks source: Calculated
          SoilCrop MaizeSoil
            LL=[0.131, 0.126, 0.121, 0.117, 0.112, 0.106, 0.099, 0.093, 0.088, 0.082]
            KL=[0.08, 0.065, 0.054, 0.044, 0.036, 0.029, 0.024, 0.02, 0.016, 0.013]
            XF=[1, 1, 1, 1, 1, 1, 1, 1, 1, 1]
          SoilCrop SoybeanSoil: same as 3092.Field1.Muscatune:244911.Physical.MaizeSoil
          SoilCrop WheatSoil: same as 3092.Field1.Muscatune:244911.Physical.MaizeSoil
          SoilCrop TropicalPastureSoil: same as 3092.Field1.Muscatune:244911.Physical.MaizeSoil
        Organic: FOMCNRatio=40; CarbonUnits=Total
          Thickness  Carbon  SoilCNRatio  FBiom  FInert    FOM
          200        2.61    12           0.03   0.511478  150
          100        1.815   12           0.035  0.668     122.81
          200        1.262   12           0.03   0.847     100.548
          200        0.878   12           0.025  0.855     82.322
          200        0.611   12           0.02   0.864     67.399
          250        0.425   12           0.017  0.873     55.182
          300        0.295   12           0.014  0.881     45.179
          300        0.205   12           0.011  0.89      36.99
          350        0.143   12           0.009  0.899     30.284
          250        0.099   12           0.007  0.908     24.795
        Chemical: PHUnits=Water
          Thickness  PH     CEC
          200        6.2    14.5304
          100        5.866  12.6983
          200        5.531  11.4107
          200        5.3    10.5033
          200        5.3    9.85921
          250        5.3    8.994055
          300        5.3    8.184523
          300        5.3    7.574244
          350        5.535  7.13148
          250        6.118  6.729016
          CEC source: Calculated
        Water: Thickness=[200, 100, 200, 200, 200, 250, 300, 300, 350, 250]; FilledFromTop=true
          InitialValues=[0.407, 0.387, 0.367, 0.348, 0.33, 0.328, 0.321, 0.319, 0.313, 0.312]
        Nutrient
        WaterBalance SoilWater: SummerDate=1-jun; SummerU=8.55; SummerCona=3.775; WinterDate=1-nov; WinterU=8.55; WinterCona=3.775; DiffusConst=40; DiffusSlope=16; Salb=0.13; CN2Bare=76; CNRed=20; CNCov=0.8; DischargeWidth=160; CatchmentArea=10000; PSIDul=-100; Thickness=[200, 100, 200, 200, 200, 250, 300, 300, 350, 250]
          SWCON=[0.152, 0.185, 0.219, 0.253, 0.286, 0.288, 0.29, 0.295, 0.295, 0.297]
        Solute NO3: Thickness=[200, 200, 200, 200, 200, 200, 200, 200, 200, 200]; InitialValuesUnits=ppm; WaterTableConcentration=0; D0=0; DepthConstant=0; MaxDepthSoluteAccessible=0; RunoffEffectivenessAtMovingSolute=0; MaxEffectiveRunoff=0
          InitialValues=[1.45, 1.342, 1.235, 1.096, 0.889, 0.683, 0.476, 0.269, 0.145, 0.145]
        Solute NH4: same as 3092.Field1.Muscatune:244911.NO3
        Solute Urea: same as 1101.Field1.Muscatune:244911.Urea
        SoilTemperature
      Manager Tillage
        Fraction = 0.65
        Depth = 350
        AppplyTillageOption = yes
        script: same as in Replacements.Tillage
      Manager fertilize in phases
        Crop = [Maize]
        FertiliserType = UreaNO3
        Amount = 245
        script: same as in 1101.Field1.fertilize in phases
      Manager Sow using a variable rule: same as Replacements.Sow using a variable rule
      Report gyield: same as Replacements.yield
    Memo: same as 1101.Memo
  Simulation 2091
    Clock: Start=2000-01-01; End=2016-12-31
    Summary SummaryFile
    Weather
      FileName=D:/My_BOX/Box/research temporal/analysis B/new_analysis/Iem_IA0200.met
    SoilArbitrator Soil Arbitrator
    Zone Field1: Area=1; Slope=2; AspectAngle=0; Altitude=50
      Report Carbon: same as 1101.Field1.Carbon_end
      Report WheatR: EventNames=[wheat].Harvesting
        VariableNames:
          [Clock].Today as date_in_wheat
          [Clock].Today.Year as Year_wheat
          [Clock].Today.Month as Month_in_wheat
          [Wheat].AboveGround.Wt *10 as w_AGB
      Report MaizeR: EventNames=[Maize].Harvesting
        VariableNames:
          [Clock].Today
          [Clock].Today.Year as Year
          [Maize].AboveGround.Wt*10  as M_AGB
          [Maize].AboveGround.N as MAIZE_AGB_NITROGEN
          [Maize].Grain.Total.Wt * 10 as Maize_Yield
          [Maize].Grain.Total.Wt * 10 as mYield
      Report Annual: same as 1101.Field1.Annual
      Report SoybeanR: EventNames=[Soybean].Harvesting
        VariableNames:
          [Clock].Today as date_in_soybean
          [Clock].Today.Year as Year_in_soybean
          [Soybean].AboveGround.Wt*10  as soy_AGB
          [Soybean].Grain.Total.Wt * 10 as SoyYield
      SurfaceOrganicMatter: InitialResidueName=grass; InitialResidueType=grass; InitialResidueMass=800; InitialStandingFraction=0; InitialCPR=0; InitialCNR=47
      Fertiliser
      Plant Maize
      MicroClimate: a_interception=0; b_interception=1; c_interception=0; d_interception=0; SoilHeatFluxFraction=0.4; MinimumHeightDiffForNewLayer=0; NightInterceptionFraction=0.5; ReferenceHeight=2
      Plant Soybean
      Plant Wheat
      Manager SowMaize
        Rotations = [Simple Rotation]
        Crop = [Maize]
        StartDate = 14-May
        EndDate = 15-May
        MinESW = 200
        MinRain = 5
        RainDays = 7
        CultivarName = A_112
        SowingDepth = 50
        RowSpacing = 750
        Population = 8.65
        MustSow = True
        script: same as in Replacements.SowMaize
      Manager SowWheat
        Rotations = [Simple Rotation]
        Crop = [Wheat]
        StartDate = 27-Sep
        EndDate = 5-Oct
        MinESW = 100
        MinRain = 15
        RainDays = 7
        CultivarName = MacKellar
        SowingDepth = 10
        RowSpacing = 250
        Population = 50
        MustSow = True
```csharp
using APSIM.Core;
using Models.Interfaces;
using APSIM.Shared.Utilities;
using Models.Utilities;
using Models.Soils;
using Models.PMF;
using Models.Core;
using System;
using Models.Climate;
using APSIM.Numerics;
using System.ComponentModel;           // for [Description]
using Models.Core.Attributes;          // for [Display], [Separator]

namespace Models
{
    [Serializable]
    public class Script : Model, IStructureDependency
    {
        [Link] private Clock Clock;
        [Link] private Summary Summary;
        private Accumulator accumulatedRain;

        [Link]
        private ISoilWater waterBalance;

        public IStructure Structure { private get; set; }
        
        [Description("Simple Rotation Manager")]
        public Manager Rotations { get; set; }
        
        [Separator("Sowing Info")]
        
        [Description("Crop")]
        public IPlant Crop { get; set; }

        [Description("Start of sowing window (d-mmm)")]
        public string StartDate { get; set; }

        [Description("End of sowing window (d-mmm)")]
        public string EndDate { get; set; }

        [Description("Minimum extractable soil water for sowing (mm)")]
        public double MinESW { get; set; }

        [Description("Accumulated rainfall required for sowing (mm)")]
        public double MinRain { get; set; }

        [Description("Duration of rainfall accumulation (d)")]
        public int RainDays { get; set; }

        [Display(Type = DisplayType.CultivarName)]
        [Description("Cultivar to be sown")]
        public string CultivarName { get; set; }

        [Description("Sowing depth (mm)")]
        public double SowingDepth { get; set; }

        [Description("Row spacing (mm)")]
        public double RowSpacing { get; set; }

        [Description("Plant population (/m2)")]
        public double Population { get; set; }
        
        [Description("Must sow by end date?")]
        public bool MustSow { get; set; }

        [EventSubscribe("StartOfSimulation")]
        private void OnSimulationCommencing(object sender, EventArgs e)
        {
            accumulatedRain = new Accumulator(this, "[Weather].Rain", RainDays);
        }

        [EventSubscribe("DoManagement")]
        private void OnDoManagement(object sender, EventArgs e)
        {
            accumulatedRain.Update();
            if (!Crop.IsAlive &&
                DateUtilities.WithinDates(StartDate, Clock.Today, EndDate))
            {
                var rainSum = accumulatedRain.Sum;
                var eswSum  = MathUtilities.Sum(waterBalance.ESW);

                if ((rainSum > MinRain && eswSum > MinESW) ||
                    (DateUtilities.DatesEqual(EndDate, Clock.Today) && MustSow))
                {
                    var thisCrop = Crop.Name.ToLower();
                    // Fix: use this class's Structure (avoid Rotations.Structure getter)
                    var nextCrop = (string)Structure.GetObject("Script.NextCrop")?.Value;

                    if (thisCrop == (nextCrop?.ToLower() ?? thisCrop))
                        Crop.Sow(population: Population,
                                 cultivar: CultivarName,
                                 depth: SowingDepth,
                                 rowSpacing: RowSpacing);
                }
            }
        }
    }
}
```
      Manager HarvestMaize: same as 1101.Field1.HarvestMaize
      Manager SowSoy
        Rotations = [Simple Rotation]
        Crop = [Soybean]
        StartDate = 15-may
        EndDate = 25-May
        MinESW = 200
        MinRain = 30
        RainDays = 3
        CultivarName = Pioneer92MGI_MG26
        SowingDepth = 50
        RowSpacing = 750
        Population = 30
        MustSow = True
```csharp
using APSIM.Core;
using Models.Interfaces;
using APSIM.Shared.Utilities;
using Models.Utilities;
using Models.Soils;
using Models.PMF;
using Models.Core;
using System;
using Models.Climate;
using APSIM.Numerics;
using System.ComponentModel;           // for [Description]
using Models.Core.Attributes;          // for [Display], [Separator]

namespace Models
{
    [Serializable]
    public class Script : Model, IStructureDependency
    {
        [Link] private Clock Clock;
        [Link] private Summary Summary;
        private Accumulator accumulatedRain;

        [Link]
        private ISoilWater waterBalance;

        // IStructureDependency
        public IStructure Structure { private get; set; }
        
        [Description("Simple Rotation Manager")]
        public Manager Rotations { get; set; }
        
        [Separator("Sowing Info")]
        
        [Description("Crop")]
        public IPlant Crop { get; set; }

        [Description("Start of sowing window (d-mmm)")]
        public string StartDate { get; set; }

        [Description("End of sowing window (d-mmm)")]
        public string EndDate { get; set; }

        [Description("Minimum extractable soil water for sowing (mm)")]
        public double MinESW { get; set; }

        [Description("Accumulated rainfall required for sowing (mm)")]
        public double MinRain { get; set; }

        [Description("Duration of rainfall accumulation (d)")]
        public int RainDays { get; set; }

        [Display(Type = DisplayType.CultivarName)]
        [Description("Cultivar to be sown")]
        public string CultivarName { get; set; }

        [Description("Sowing depth (mm)")]
        public double SowingDepth { get; set; }

        [Description("Row spacing (mm)")]
        public double RowSpacing { get; set; }

        [Description("Plant population (/m2)")]
        public double Population { get; set; }
        
        [Description("Must sow by end date?")]
        public bool MustSow { get; set; }
        
        [EventSubscribe("StartOfSimulation")]
        private void OnSimulationCommencing(object sender, EventArgs e)
        {
            accumulatedRain = new Accumulator(this, "[Weather].Rain", RainDays);
        }

        [EventSubscribe("DoManagement")]
        private void OnDoManagement(object sender, EventArgs e)
        {
            accumulatedRain.Update();
            if (!Crop.IsAlive &&
                DateUtilities.WithinDates(StartDate, Clock.Today, EndDate))
            {
                var rainSum = accumulatedRain.Sum;
                var eswSum  = MathUtilities.Sum(waterBalance.ESW);

                if ((rainSum > MinRain && eswSum > MinESW) ||
                    (DateUtilities.DatesEqual(EndDate, Clock.Today) && MustSow))
                {
                    var thisCrop = Crop.Name.ToLower();

                    // Use this class's Structure to avoid inaccessible getter on Manager.Structure
                    var nextCrop = (string)Structure.GetObject("Script.NextCrop")?.Value;

                    if (thisCrop == (nextCrop?.ToLower() ?? thisCrop))
                        Crop.Sow(population: Population,
                                 cultivar: CultivarName,
                                 depth: SowingDepth,
                                 rowSpacing: RowSpacing);
                }
            }
        }
    }
}
```
      Manager HarvestSoy
        Crop = [Soybean]
        Date = 19-sep
        script: same as in 1101.Field1.HarvestMaize
      Manager Simple Rotation: same as Replacements.Simple Rotation
      Manager AddfertlizerRotationWheat
        Crop = [Wheat]
        FertiliserType = UreaN
        Fraction = 0.3777778
        Amount = -
        FertiliserDates = 20-march
        AmountType = False
```csharp
using Models.Soils;
using System;
using Models.Core;
using Models.PMF;
using APSIM.Shared.Utilities;
namespace Models
{
    [Serializable]
    public class Script : Model
    {
        [Link] Clock Clock;
        
        [Link] Fertiliser Fertiliser;
        [Link] ISummary Summary;
        [Separator("Crop in the rotation to apply fertilizers")]
        [Description("Crop")]
        public IPlant Crop { get; set; }
        
        [Separator("Fertilizer application details")]

        [Description("Type of fertiliser to apply? Select from a list. ")] 
        [Display(Type = DisplayType.FertiliserType)]public string FertiliserType { get; set; }
        
        [Description("Fraction to apply at sowing (0-1). if it is a single application, it should be 1")]
        public double Fraction { get; set; }

        [Description("Enter the total amount of fertiliser to be applied (kg /ha)")] 
        public double Amount { get; set; }
        
        [Description("Enter other dates as dd-mmm with comma separation (any year information entered will be ignored): ")] 
        public string[] FertiliserDates { get; set; } 
        
        [Description("Is the remaining amount to be applied each time? (true/ticked)? Or is it the total annual amount across all dates (no(false)/unticked)")] 
        public bool AmountType { get; set; }
        
        [EventSubscribe("Sowing")]
        private void OnSowing(object sender, EventArgs e)
        {
            Model crop = sender as Model;
            var nit = Fraction * Amount;
            if (Crop != null && crop.Name.ToLower() == (Crop as IModel).Name.ToLower())
                Fertiliser.Apply(amount: nit, type: FertiliserType);
        }
        
        [EventSubscribe("DoManagement")]
        private void OnDoManagement(object sender, EventArgs e)
        {
            foreach (string ddMMM in FertiliserDates)
            {
             var nit = Fraction * Amount;
             var otherNapp = Amount - nit;
                if (Crop.IsAlive & DateUtilities.DatesEqual(ddMMM, Clock.Today))
                {
                    if (AmountType)
                        Fertiliser.Apply(amount: otherNapp, type: FertiliserType);
                        
                    else
                        Fertiliser.Apply(amount: otherNapp / FertiliserDates.Length, type: FertiliserType);
                        Summary.WriteMessage(this, $"At other date(s), {Crop.Name} received {otherNapp} Kg of Nitrogen applied as {FertiliserType}. {AmountType} was selected: true implies that the user specified amount was applied on each date and false implies that the amount was applied across dates", MessageType.Information);
                }
            }
        }
    }
}
```
      Manager HarvestWheat
        Crop = [Wheat]
        Date = 28-apr
        script: same as in 1101.Field1.HarvestMaize
      Soil Muscatune:244911: SoilType=Shaffton:67263817; Site=11; State=IL; Country=USA; ApsoilNumber=0; Latitude=41.763; Longitude=-90.6808
        DataSource=SSURGO https://SDMDataAccess.nrcs.usda.gov/Tabular/SDMTabularService.asmx through PyAPSIMX function Replace_Soilprofile. Date downloaded: 2022-12-27 02:49:44.558240
        Comments=cockey = 22743816 Shaffton loam, 0 to 2 percent slopes Component percentage: 95%
        Physical
          Thickness  ParticleSizeSand  ParticleSizeSilt  ParticleSizeClay  Rocks  BD       AirDry     LL15       DUL       SAT       KS
          200        1.7002            66.3125           32                0      1.305    0.056      0.112      0.406941  0.487547  792.45
          100        2.01345           66.2372           31.759            0      1.3171   0.0864154  0.108019   0.387198  0.482982  792.45
          200        2.32671           66.1619           31.5181           0      1.3292   0.0832307  0.104038   0.367455  0.478417  792.45
          200        2.63997           66.0866           31.2771           0      1.34129  0.100058   0.100058   0.347712  0.473852  792.45
          200        2.95322           66.0113           31.0361           0      1.35154  0.0960768  0.0960768  0.329708  0.469984  792.45
          250        2.81824           67.7725           29.3975           0      1.35339  0.0906041  0.0906041  0.327968  0.469287  792.45
          300        2.60467           69.8551           27.5145           0      1.37299  0.0848704  0.0848704  0.321469  0.461891  792.45
          300        2.32539           71.5934           26.0573           0      1.37344  0.0797372  0.0797372  0.319199  0.461719  792.45
          350        1.98345           73.0001           25.0068           0      1.39443  0.0751797  0.0751797  0.313231  0.453799  792.45
          250        1.6415            74.4069           23.9563           0      1.39489  0.0706221  0.0706221  0.312366  0.453626  792.45
          Rocks source: Calculated
          SoilCrop MaizeSoil
            LL=[0.112, 0.108019, 0.104038, 0.100058, 0.0960768, 0.0906041, 0.0848704, 0.0797372, 0.0751797, 0.0706221]
            KL=[0.08, 0.0654985, 0.0536256, 0.0439049, 0.0359463, 0.0294304, 0.0240955, 0.0197278, 0.0161517, 0.0132239]
            XF=[1, 1, 1, 1, 1, 1, 1, 1, 1, 1]
          SoilCrop SoybeanSoil: same as 2091.Field1.Muscatune:244911.Physical.MaizeSoil
          SoilCrop WheatSoil: same as 2091.Field1.Muscatune:244911.Physical.MaizeSoil
          SoilCrop TropicalPastureSoil: same as 2091.Field1.Muscatune:244911.Physical.MaizeSoil
        Organic: FOMCNRatio=40; CarbonUnits=Total
          Thickness  Carbon    SoilCNRatio  FBiom  FInert    FOM
          200        2.13      12           0.034  0.511478  150
          100        1.48141   12           0.035  0.668     122.81
          200        1.03031   12           0.03   0.846767  100.548
          200        0.716578  12           0.025  0.855277  82.3217
          200        0.498377  12           0.02   0.863873  67.3993
          250        0.34662   12           0.017  0.872555  55.1819
          300        0.241073  12           0.014  0.881324  45.1791
          300        0.167665  12           0.011  0.890182  36.9895
          350        0.11661   12           0.009  0.899128  30.2845
          250        0.081102  12           0.007  0.908165  24.7948
        Chemical: PHUnits=Water
          Thickness  PH     CEC
          200        6.2    13.4504
          100        5.866  11.9477
          200        5.531  10.8894
          200        5.3    10.1402
          200        5.3    9.60586
          250        5.3    8.81784
          300        5.3    8.06329
          300        5.3    7.49035
          350        5.535  7.07209
          250        6.118  6.6888
          CEC source: Calculated
        Water: same as 1101.Field1.Muscatune:244911.Water
        Nutrient
        WaterBalance SoilWater: same as 1101.Field1.Muscatune:244911.SoilWater
        Solute NO3: same as 3092.Field1.Muscatune:244911.NO3
        Solute NH4: same as 3092.Field1.Muscatune:244911.NO3
        Solute Urea: same as 1101.Field1.Muscatune:244911.Urea
        SoilTemperature
      Manager Tillage
        Fraction = 0.98
        Depth = 350
        AppplyTillageOption = yes
        script: same as in Replacements.Tillage
      Manager fertilize in phases: same as 1101.Field1.fertilize in phases
  Simulation 4061
    Clock: Start=1904-01-01; End=2020-12-31
    Summary SummaryFile
    Weather: FileName=C:/Users/rmagala/OneDrive/simulations/urbana_mp_128yrs.met
    SoilArbitrator Soil Arbitrator
    Zone Field: Area=1; Slope=0; AspectAngle=0; Altitude=50
      Report yield: same as Replacements.yield
      Fertiliser
      SurfaceOrganicMatter: InitialResidueName=maize_stubble; InitialResidueType=grass; InitialResidueMass=500; InitialStandingFraction=0; InitialCPR=0; InitialCNR=100
      MicroClimate: a_interception=0; b_interception=1; c_interception=0; d_interception=0; SoilHeatFluxFraction=0.4; MinimumHeightDiffForNewLayer=0; NightInterceptionFraction=0.5; ReferenceHeight=2
      Plant Maize
      Manager HarvestingMaize
        Crop = [Maize]
```csharp
using APSIM.Shared.Utilities;
using Models.Utilities;
using Models.Soils;
using Models.PMF;
using Models.Core;
using System;

namespace Models
{
    [Serializable] 
    public class Script : Model
    {
        [Description("Crop")]
        public IPlant Crop { get; set; }
        
        [EventSubscribe("DoManagement")]
        private void OnDoManagement(object sender, EventArgs e)
        {
            if (Crop.IsReadyForHarvesting)
            {
                Crop.Harvest();
                Crop.EndCrop();
            }
        }
    }
}
```
      Report water
        VariableNames:
          [Clock].Today.Year as year
          Mean of Sum([Soil].SoilWater.SWmm) from [Maize].Sowing to [Maize].Harvesting as InCropMeanSoilWater
          Mean of Sum([Soil].SoilWater.SWmm[:2]) from [Maize].Sowing  to [Maize].Harvesting as InCropMeanSoilWaterTopThreeLayers
      Report carbon_change: EventNames=[Clock].EndOfSimulation
        VariableNames=diff of [Soil].Nutrient.Catm[1] from [Clock].StartOfSimulation to [Clock].EndOfSimulation as c_balance
      Soil Flanagan:242965: SoilType=Sable silty clay loam, 0 to 2 percent slopes; LocalName=Sable; Latitude=40.9305556; Longitude=-90.7272; Comments=number of layers: 10, max depth: 2400mm
        DataSource:
          Sable: downloaded by apsimNGpy: `DownloadsurgoSoiltables`
           accessed from SSURGO on: 2025-11-03T04:49:54
        Physical
          Thickness  ParticleSizeSand  ParticleSizeSilt  ParticleSizeClay  Rocks  BD        AirDry     LL15       DUL       SAT       KS
          200        3                 70.5              26.5              0      1.305     0.0478333  0.0956667  0.498333  0.508333  792.45
          200        2.91134           68.4164           25.7168           0      1.229     0.0450477  0.0900955  0.469313  0.47873   792.45
          200        2.82529           66.3944           24.9568           0      1.15743   0.0424244  0.0848487  0.441982  0.450851  792.45
          252        2.74179           64.4321           24.2192           0      1.09003   0.0399538  0.0799075  0.416243  0.424596  792.45
          254        2.66076           62.5279           23.5034           0      1.02655   0.037627   0.0752541  0.392003  0.399869  792.45
          255        2.58212           60.6799           22.8088           0      0.966768  0.0354358  0.0708716  0.369174  0.376583  792.45
          257        2.50581           58.8865           22.1347           0      0.910468  0.0333722  0.0667444  0.347675  0.354652  792.45
          258        2.43175           57.1462           21.4805           0      0.857446  0.0314287  0.0628575  0.327428  0.333999  792.45
          260        2.35988           55.4573           20.8456           0      0.807512  0.0295985  0.0591969  0.30836   0.314548  792.45
          261        2.29014           53.8183           20.2296           0      0.760486  0.0278748  0.0557496  0.290403  0.29623   792.45
          Rocks source: Calculated (layer 1, 2, 3, 4, 5, 6, 7, 8)
          SoilCrop MaizeSoil
            LL=[0.1085, 0.126889, 0.145279, 0.163668, 0.182058, 0.175693, 0.164614, 0.152861, 0.140418, 0.127975]
            KL=[0.08, 0.0654985, 0.0536256, 0.0439049, 0.0359463, 0.0294304, 0.0240955, 0.0197278, 0.0161517, 0.0132239]
            XF=[1, 1, 1, 1, 1, 1, 1, 1, 1, 1]
          SoilCrop SoybeanSoil: same as 4061.Field.Flanagan:242965.Physical.MaizeSoil
          SoilCrop WheatSoil: same as 4061.Field.Flanagan:242965.Physical.MaizeSoil
        WaterBalance SoilWater: SummerDate=1-Nov; SummerU=5; SummerCona=5; WinterDate=1-Apr; WinterU=5; WinterCona=5; DiffusConst=40; DiffusSlope=16; Salb=0.12; CN2Bare=73; CNRed=20; CNCov=0.8; PSIDul=-100; Thickness=[200, 200, 200, 252, 254, 255, 257, 258, 260, 261]
          SWCON=[0.152205, 0.185065, 0.218597, 0.252821, 0.285615, 0.287759, 0.290492, 0.294741, 0.295375, 0.296551]
        Organic: FOMCNRatio=40; CarbonUnits=Total
          Thickness  Carbon     SoilCNRatio  FBiom  FInert  FOM
          200        2.61628    12           0.04   0.55    150
          200        2.08233    12           0.035  0.668   122.81
          200        1.54839    12           0.03   0.847   100.548
          252        1.01444    12           0.025  0.855   82.3217
          254        0.480492   12           0.02   0.864   67.3993
          255        0.316367   12           0.017  0.873   55.1819
          257        0.222219   12           0.014  0.881   45.1791
          258        0.158148   12           0.011  0.89    36.9895
          260        0.125109   12           0.009  0.899   30.2845
          261        0.0920698  12           0.007  0.908   24.7948
        Chemical: PHUnits=Water
          Thickness  PH       CEC
          200        6        13.1631
          200        6.28846  11.7467
          200        6.57692  10.3366
          252        6.86538  8.93271
          254        7.15385  7.53478
          255        7.34318  6.97477
          257        7.51364  6.57784
          258        7.62803  6.25405
          260        7.68485  6.00539
          261        7.74167  5.76189
          CEC source: Calculated
        Water: Thickness=[200, 200, 200, 252, 254, 255, 257, 258, 260, 261]; FilledFromTop=true
          InitialValues=[0.498333, 0.469313, 0.441982, 0.416243, 0.392003, 0.369174, 0.347675, 0.327428, 0.30836, 0.290403]
        Nutrient
        Solute NO3: Thickness=[200, 200, 200, 252, 254, 255, 257, 258, 260, 261]; InitialValuesUnits=ppm; WaterTableConcentration=0; D0=0; DepthConstant=0; MaxDepthSoluteAccessible=0; RunoffEffectivenessAtMovingSolute=0; MaxEffectiveRunoff=0
          InitialValues=[0.5, 0.495025, 0.490099, 0.485223, 0.480395, 0.475615, 0.470882, 0.466197, 0.461558, 0.456966]
        Solute NH4: Thickness=[200, 200, 200, 252, 254, 255, 257, 258, 260, 261]; InitialValuesUnits=ppm; WaterTableConcentration=0; D0=0; DepthConstant=0; MaxDepthSoluteAccessible=0; RunoffEffectivenessAtMovingSolute=0; MaxEffectiveRunoff=0
          InitialValues=[0.05, 0.0495025, 0.0490099, 0.0485223, 0.0480395, 0.0475615, 0.0470882, 0.0466197, 0.0461558, 0.0456966]
        Solute Urea: Thickness=[200, 200, 200, 252, 254, 255, 257, 258, 260, 261]; InitialValues=[0, 0, 0, 0, 0, 0, 0, 0, 0, 0]; InitialValuesUnits=kg/ha; WaterTableConcentration=0; D0=0; DepthConstant=0; MaxDepthSoluteAccessible=0; RunoffEffectivenessAtMovingSolute=0; MaxEffectiveRunoff=0
        SoilTemperature Temperature
      Manager Sow using a variable rule
        Crop = [Maize]
        StartDate = 10-may
        EndDate = 15-may
        MinESW = 100
        MinRain = 5
        RainDays = 7
        CultivarName = B_110___edited
        SowingDepth = 25
        RowSpacing = 760
        Population = 8.65
        script: same as in Replacements.Sow using a variable rule
      Report carbon: EventNames=1-jan
        VariableNames:
          [Clock].Today
          [Simulation].Name as Plotid
          [Clock].Today.Year as year
          sum([Nutrient].FOM.C)  from 01-jan to [Clock].Today as FOM.c
          sum([Nutrient].TotalOrganicN[1])  from 01-jan to [Clock].Today as TON
          sum([Soil].Nutrient.TotalC)/1000 from 01-jan to [clock].Today as soc
          [SurfaceOrganicMatter].C as Total_surfaceCArbon
          [SurfaceOrganicMatter].wt as surface_organic_matter
          sum([Nutrient].Catm) as Soil_Respiration
          sum([Soil].Nutrient.TotalC[3:5])/1000 as Deeplayer_soil_Carbon
          sum([Soil].Nutrient.TotalC[1:3])/1000 as Toplayer_soil_Carbon
          sum of sum([Nutrient].N2Oatm[1:3]) from [carbon].DayAfterLastOutput to [Clock].Today as n20
          sum of sum([Nutrient].N2Oatm[1:6] from 01-jan to [Clock].Today as N20D20cm
          sum of sum([Nutrient].N2Oatm[1:9]) from 01-jan to [Clock].Today as N20
          [Soil].Nutrient.TotalC[1]/1000 from [carbon].DayAfterLastOutput to [clock].Today as SOC_0_15CM // soil carbon in the first layer
          [Soil].Nutrient.TotalC[2]/1000 from [clock].StartOfSimulation to [clock].Today as SOC_1_2
          SOC_1_2 + SOC_0_15CM as soccx
          sum([Soil].Nutrient.TotalC[:1])/1000 as SOCD40CM
          sum of [Nutrient].Catm[1] from 1-jan to today as RespD20cm
          sum of [Nutrient].Catm[1] from 1-jan to today as RespD40cm
          [Soil].Water.Volumetric as DUL
          [Soil].SoilWater.PAW as PAW
          sum of ([Nutrient].Catm[1]) from 01-jan to [Clock].Today as Top_respiration
          sum of sum([Nutrient].Catm[1:9]) from 01-jan to [Clock].Today as whole_respiration
          [Maize].Root.Total.Wt * 10 as RootBiomass
          [Soil].Nutrient.TotalC[7] as deepC
          [Soil].Nutrient.TotalC[8] as deepC8
          [Soil].Nutrient.TotalC[9] as deepC9
          [Soil].Nutrient.TotalC[10] as deepC10
          mean of [Maize].LAI  from [carbon].DayAfterLastOutput to [Clock].Today as lai
          [Soil].Nutrient.TotalC[1]/1000 as carbo
          [Soil].Temperature.Value[1] as tmp1
          [Soil].Temperature.Value[2] as tmp2
          [Soil].Temperature.Value[1] + [Soil].Temperature.Value[2] as tmp
          // from mineralization report
          // convert to Mg
          sum of [Nutrient].Catm[1]/1000 from [carbon].DayAfterLastOutput  to [Clock].Today as top_carbon_mineralization
          sum of [Nutrient].Catm[2]/1000 from 1-jan to [Clock].Today as layer2_mineralization
          sum of [Nutrient].MineralisedN[1]  from [carbon].DayAfterLastOutput  to today as top_mineralized_N
          [Soil].Nutrient.TotalC[1]/1000 from 01-jan to [clock].Today as SOC1
          [Nutrient].Organic.C[1]/1000 as org_c
          [Nutrient].Microbial.C[1]/1000 as microbial_carbon
          [Nutrient].FOM.C[1] as FOM_C_kg
          [Weather].Rain as rain
          // Surface Organic Matter Carbon and Nitrogen
          [SurfaceOrganicMatter].C as SurfaceOrganicMatter_Carbon
          [SurfaceOrganicMatter].N as SurfaceOrganicMatter_Nitrogen
      Manager Tillage
        TillageDate = 1-Nov
        Fraction = 0.5
        Depth = 350
```csharp
using Models.Soils;
using System;
using System.Linq;
using Models.Core;
using Models.PMF;
using APSIM.Shared.Utilities;
using Models.Surface;

namespace Models
{
    [Serializable]
    public class Script : Model
    {
        [Link] Clock Clock;
        [Link] SurfaceOrganicMatter SOM;
        
        [Description("Tillage Date")]
        public string TillageDate { get; set; }
        
        [Description("Fraction of Residues To Incorporate (0-1)")]
        public double Fraction { get; set; }

        [Description("Depth of Tillage (mm)")]
        public double Depth { get; set; }

        [EventSubscribe("DoManagement")]
        private void OnDoManagement(object sender, EventArgs e)
        {
            if (DateUtilities.WithinDates(TillageDate, Clock.Today, TillageDate))
                SOM.Incorporate(Fraction, Depth);
        }
    }
}
```
      Memo
        01-jun, 02-jun, 03-jun, 04-jun, 05-jun, 06-jun, 07-jun, 08-jun, 09-jun
      Report Annual: EventNames=[Clock].EndOfYear
        VariableNames:
          // Time
          [Clock].Today as Date
          [Clock].Today.Year as an_Year
          [Clock].Today.Year as year
          [Simulation].Name as Plotid
          [Soil].Nutrient.TotalC[1]/1000 as SOC_0_15CM
          // Carbon
          [Soil].Nutrient.TotalC[1]/1000 as SOC1
          sum([Soil].Nutrient.TotalC[1:2])/1000 as SOC2
          sum of sum([Nutrient].Catm[1:10]) from 01-jan to [Clock].Today as Whole_repsiration
          sum of sum([Nutrient].Catm[1:6]) from 01-jan to [Clock].Today  as  Top_respiration
          sum([Soil].Nutrient.TotalC[1:2])/1000 as TPC
          // Nitrogen
          [NO3].Flow[1] as flowNitrate
          sum of Sum( [Soil].NO3.ppm[1:2]) from 01-jan to [Clock].Today as NConc
          [Soil].NO3.ppm[1] as N03Ncon
          [Soil].NO3.ppm[2] as N03Ncon2
          [Soil].NO3.ppm[3] *0.8 as N03Ncon3
          Sum of [Soil].SoilWater.LeachNO3 from 01-jan to [Clock].Today as CumuAnnualLeach
          sum([Soil].NO3.kgha) as NO3Total
          sum of sum([Nutrient].N2Oatm[1:6]) from 01-Mar to [Clock].Today as TopN2O
          sum of sum([Nutrient].N2Oatm[1:8]) from 01-Mar to [Clock].Today as  n20
          sum([Soil].Nutrient.NO3.kgha[1:2]) as MineralN
          sum of [Soil].SoilWater.LeachNO3 from [Annual].DayAfterLastOutput to [clock].Today as LeachNO3
          // Water
          sum of ([Soil].SoilWater.Runoff) from 01-jan to [Clock].Today as runoff
          sum of [Soil].SoilWater.Drainage from [Annual].DayAfterLastOutput to [clock].Today as drainaged_run_off
          SOC1 + SOC2 as total_carbon
          // Calculate Nitrate Loss. 0.01 converts to kg per hectare
          runoff * (N03Ncon + N03Ncon2 + N03Ncon3) *0.01  as Nloss
          // calculalate carbon dioxide equivalent
           n20 *(44/28) *165 as no2_eq
           TopN2O *(44/28) *165 as top_no2_eq
           // Weather and soil water
      Manager fertilize in phases: same as 1101.Field1.fertilize in phases
    Report mineralization: EventNames=1-jan
      VariableNames:
        [Clock].Today.Year as year
        [Simulation].Name as Plotid
        // convert to Mg
        sum of [Nutrient].Catm[1]/1000 from 1-jan to today as top_mineralization
        sum of [Nutrient].Catm[2]/1000 from 1-jan to today as layer2_mineralization
        sum of [Nutrient].MineralisedN[1] from 1-jan to today as top_mineralized_N
        [Soil].Nutrient.TotalC[1]/1000 from [clock].StartOfSimulation to [clock].Today as SOC_0_15CM
