Simulations: Version=206
  DataStore
  Folder Replacements
    Plant Maize
    Manager Sow using a variable rule
      Crop = [Maize]
      StartDate = 1-may
      EndDate = 15-may
      MinESW = 100
      MinRain = 5
      RainDays = 7
      CultivarName = Laila
      SowingDepth = 25
      RowSpacing = 750
      Population = 8.65
```csharp
using APSIM.Numerics;
using Models.Climate;
using System.Linq;
using System;
using Models.Core;
using Models.PMF;
using Models.Soils;
using Models.Utilities;
using APSIM.Shared.Utilities;
using Models.Interfaces;

namespace Models
{
    [Serializable]
    public class Script : Model
    {
        [Link] private Clock Clock;
        [Link] private Fertiliser Fertiliser;
        [Link] private Summary Summary;
        [Link] private Soil Soil;
        private Accumulator accumulatedRain;
        [Link]
        private ISoilWater waterBalance;
        
        [Description("Crop")]
        public IPlant Crop { get; set; }

        [Description("Start of sowing window (d-mmm)")]
        public string StartDate { get; set; }

        [Description("End of sowing window (d-mmm)")]
        public string EndDate { get; set; }

        [Description("Minimum extractable soil water for sowing (mm)")]
        public double MinESW { get; set; }

        [Description("Accumulated rainfall required for sowing (mm)")]
        public double MinRain { get; set; }

        [Description("Duration of rainfall accumulation (d)")]
        public int RainDays { get; set; }

        [Display(Type = DisplayType.CultivarName)]
        [Description("Cultivar to be sown")]
        public string CultivarName { get; set; }

        [Description("Sowing depth (mm)")]
        public double SowingDepth { get; set; }

        [Description("Row spacing (mm)")]
        public double RowSpacing { get; set; }

        [Description("Plant population (/m2)")]
        public double Population { get; set; }
        
        
        [EventSubscribe("StartOfSimulation")]
        private void OnSimulationCommencing(object sender, EventArgs e)
        {
            accumulatedRain = new Accumulator(this, "[Weather].Rain", RainDays);
        }

        [EventSubscribe("DoManagement")]
        private void OnDoManagement(object sender, EventArgs e)
        {
            accumulatedRain.Update();
            
            if (DateUtilities.WithinDates(StartDate, Clock.Today, EndDate) &&
                !Crop.IsAlive &&
                MathUtilities.Sum(waterBalance.ESW) > MinESW &&
                accumulatedRain.Sum > MinRain)
            {
                Crop.Sow(population: Population, cultivar: CultivarName, depth: SowingDepth, rowSpacing: RowSpacing);    
            }
        }
    }
}
```
    Manager Tillage
      Fraction = 0.98
      Depth = 150
      AppplyTillageOption = yes
```csharp
using Models.Soils;
using System;
using Models.Core;
using Models.PMF;
using APSIM.Shared.Utilities;
using Models.Surface;

namespace Models
{
    [Serializable]
    public class Script : Model
    {
        [Link] Clock Clock;
        [Link] SurfaceOrganicMatter SOM;
        [Link(IsOptional = true)] private IPlant existingCrop;
        [Link] ISummary Summary;
        [Separator("Applies tillage to an existing crop when it is ending")]
        //[Description("Crop")]
        //public IPlant Crop { get; set; }
        
        [Description("Fraction of Residues To Incorporate (0-1)")]
        public double Fraction { get; set; }
        
        [Description("Depth of Tillage (mm)")]
        public double Depth { get; set; }
        
        
        public enum ApplyTillage { yes, no }
        [Description("Do you want to till the land?")] 
        public ApplyTillage AppplyTillageOption { get; set; }

        [EventSubscribe("PlantEnding")]
        private void OnEndCrop(object sender, EventArgs e)
        {
            Model existingCrop = sender as Model;
            if (existingCrop != null && existingCrop.Name.ToLower() == (existingCrop as IModel).Name.ToLower()&& ApplyTillage.yes ==AppplyTillageOption)
            
            {
           
            SOM.Incorporate(Fraction, Depth);
            
           }
           
           
             Summary.WriteMessage(this, $"Tillage is applied to: {existingCrop.Name}", MessageType.Information);
        }
    }
}
```
    Clock: Start=2000-01-01; End=2016-12-31
    Soil Muscatune:244911: SoilType=Shaffton:67263817; Site=11; State=IL; Country=USA; ApsoilNumber=0; Latitude=41.763; Longitude=-90.6808
      DataSource=SSURGO https://SDMDataAccess.nrcs.usda.gov/Tabular/SDMTabularService.asmx through PyAPSIMX function Replace_Soilprofile. Date downloaded: 2022-12-27 02:49:44.558240
      Comments=cockey = 22743816 Shaffton loam, 0 to 2 percent slopes Component percentage: 95%
      Physical
        Thickness  ParticleSizeSand  ParticleSizeSilt  ParticleSizeClay  Rocks  BD       AirDry     LL15       DUL       SAT       KS
        200        1.7002            66.3125           32                0      1.32     0.0575     0.115      0.406941  0.481887  792.45
        100        2.01345           66.2372           31.759            0      1.33224  0.08873    0.110913   0.387198  0.477269  792.45
        200        2.32671           66.1619           31.5181           0      1.34447  0.0854601  0.106825   0.367455  0.472652  792.45
        200        2.63997           66.0866           31.2771           0      1.35671  0.102738   0.102738   0.347712  0.468034  792.45
        200        2.95322           66.0113           31.0361           0      1.36708  0.0986502  0.0986502  0.329708  0.464122  792.45
        250        2.81824           67.7725           29.3975           0      1.36895  0.093031   0.093031   0.327968  0.463416  792.45
        300        2.60467           69.8551           27.5145           0      1.38877  0.0871437  0.0871437  0.321469  0.455936  792.45
        300        2.32539           71.5934           26.0573           0      1.38923  0.0818731  0.0818731  0.319199  0.455762  792.45
        350        1.98345           73.0001           25.0068           0      1.41046  0.0771934  0.0771934  0.313231  0.44775   792.45
        250        1.6415            74.4069           23.9563           0      1.41092  0.0725138  0.0725138  0.312366  0.447576  792.45
        Rocks source: Calculated
        SoilCrop MaizeSoil
          LL=[0.115, 0.110913, 0.106825, 0.102738, 0.0986502, 0.093031, 0.0871437, 0.0818731, 0.0771934, 0.0725138]
          KL=[0.08, 0.0654985, 0.0536256, 0.0439049, 0.0359463, 0.0294304, 0.0240955, 0.0197278, 0.0161517, 0.0132239]
          XF=[1, 1, 1, 1, 1, 1, 1, 1, 1, 1]
        SoilCrop SoybeanSoil: same as Replacements.Muscatune:244911.Physical.MaizeSoil
        SoilCrop WheatSoil: same as Replacements.Muscatune:244911.Physical.MaizeSoil
        SoilCrop TropicalPastureSoil: same as Replacements.Muscatune:244911.Physical.MaizeSoil
      Organic: FOMCNRatio=40; CarbonUnits=Total
        Thickness  Carbon    SoilCNRatio  FBiom       FInert    FOM
        200        2.445     12           0.033823    0.511478  150
        100        1.70049   12           0.035       0.668     122.81
        200        1.18268   12           0.0301644   0.846767  100.548
        200        0.822551  12           0.0246965   0.855277  82.3217
        200        0.572081  12           0.0202198   0.863873  67.3993
        250        0.39788   12           0.0165546   0.872555  55.1819
        300        0.276724  12           0.0135537   0.881324  45.1791
        300        0.192461  12           0.0110969   0.890182  36.9895
        350        0.133856  12           0.00908534  0.899128  30.2845
        250        0.093096  12           0.00743845  0.908165  24.7948
      Chemical: PHUnits=Water
        Thickness  PH     CEC
        200        6.2    14.1592
        100        5.866  12.4407
        200        5.531  11.2322
        200        5.3    10.3786
        200        5.3    9.7717
        250        5.3    8.93317
        300        5.3    8.14351
        300        5.3    7.54614
        350        5.535  7.11089
        250        6.118  6.71579
        CEC source: Calculated
      Water: Thickness=[200, 100, 200, 200, 200, 250, 300, 300, 350, 250]; FilledFromTop=true
        InitialValues=[0.406941, 0.387198, 0.367455, 0.347712, 0.329708, 0.327968, 0.321469, 0.319199, 0.313231, 0.312366]
      Nutrient
      WaterBalance SoilWater: SummerDate=1-jun; SummerU=8.55; SummerCona=3.775; WinterDate=1-nov; WinterU=8.55; WinterCona=3.775; DiffusConst=40; DiffusSlope=16; Salb=0.13; CN2Bare=76; CNRed=20; CNCov=0.8; DischargeWidth=160; CatchmentArea=10000; PSIDul=-100; Thickness=[200, 100, 200, 200, 200, 250, 300, 300, 350, 250]
        SWCON=[0.3, 0.185, 0.219, 0.253, 0.286, 0.288, 0.29, 0.295, 0.295, 0.297]
      Solute NO3: Thickness=[200, 200, 200, 200, 200, 200, 200, 200, 200, 200]; InitialValuesUnits=ppm; WaterTableConcentration=0; D0=0; DepthConstant=0; MaxDepthSoluteAccessible=0; RunoffEffectivenessAtMovingSolute=0; MaxEffectiveRunoff=0
        InitialValues=[3.66, 5.897, 1.235, 1.096, 0.889, 0.683, 0.476, 0.269, 0.145, 0.145]
      Solute NH4: Thickness=[200, 200, 200, 200, 200, 200, 200, 200, 200, 200]; InitialValuesUnits=ppm; WaterTableConcentration=0; D0=0; DepthConstant=0; MaxDepthSoluteAccessible=0; RunoffEffectivenessAtMovingSolute=0; MaxEffectiveRunoff=0
        InitialValues=[0.212, 0.162, 1.235, 1.096, 0.889, 0.683, 0.476, 0.269, 0.145, 0.145]
      Solute Urea: Thickness=[200, 200, 200, 200, 200, 200, 200, 200, 200, 200]; InitialValues=[0, 0, 0, 0, 0, 0, 0, 0, 0, 0]; InitialValuesUnits=kg/ha; WaterTableConcentration=0; D0=0; DepthConstant=0; MaxDepthSoluteAccessible=0; RunoffEffectivenessAtMovingSolute=0; MaxEffectiveRunoff=0
      SoilTemperature Temperature1
  Simulation 1101
    Clock: Start=2000-01-01; End=2016-12-31
    Summary SummaryFile
    Weather
      FileName=D:/My_BOX/Box/research temporal/analysis B/new_analysis/Iem_IA0200.met
    SoilArbitrator Soil Arbitrator
    Zone Field1: Area=1; Slope=2; AspectAngle=0; Altitude=50
      Report Carbon: EventNames=[Clock].EndOfSimulation
        VariableNames:
          diff of ([Soil].Nutrient.TotalC[1])/1000 from [Clock].StartOfSimulation to [Clock].EndOfSimulation as changeincarbon
          diff of sum([Soil].Nutrient.TotalC[1:2])/1000 from [Clock].StartOfSimulation to [Clock].EndOfSimulation as changeincarbon2
          changeincarbon + changeincarbon2 as to_carb
          (-1 * to_carb *(44/12))*1000 as co_eq
          [Nutrient].NH4
      Report MaizeR: EventNames=[Maize].Harvesting
        VariableNames:
          [Clock].Today
          [Clock].Today.Year as Year
          [Maize].AboveGround.Wt*10  as M_AGB
          [Maize].AboveGround.N as MAIZE_AGB_NITROGEN
          [Maize].Grain.Total.Wt * 10 as Maize_Yield
          [Maize].Grain.Total.Wt * 10 as mYield
      Report Annual: EventNames=[Clock].EndOfYear
        VariableNames:
          // Time
          [Clock].Today as Date
          [Clock].Today.Year as an_Year
          // Carbon
          [Soil].Nutrient.TotalC[1]/1000 as SOC1
          sum([Soil].Nutrient.TotalC[1:2])/1000 as SOC2
          sum of sum([Nutrient].Catm[1:10]) from 01-jan to [Clock].Today as Whole_repsiration
          sum of sum([Nutrient].Catm[1:6]) from 01-jan to [Clock].Today  as  Top_respiration
          sum([Soil].Nutrient.TotalC[1:2])/1000 as TPC
          // Nitrogen
          [NO3].Flow[1] as flowNitrate
          sum of Sum( [Soil].NO3.ppm[1:2]) from 01-jan to [Clock].Today as NConc
          [Soil].NO3.ppm[1] as N03Ncon
          [Soil].NO3.ppm[2] as N03Ncon2
          [Soil].NO3.ppm[3] *0.8 as N03Ncon3
          Sum of [Soil].SoilWater.LeachNO3 from 01-jan to [Clock].Today as CumuAnnualLeach
          sum([Soil].NO3.kgha) as NO3Total
          sum of sum([Nutrient].N2Oatm[1:6]) from 01-Mar to [Clock].Today as TopN2O
          sum of sum([Nutrient].N2Oatm[1:8]) from 01-Mar to [Clock].Today as  n20
          sum([Soil].Nutrient.NO3.kgha[1:2]) as MineralN
          sum of [Soil].SoilWater.LeachNO3 from [Annual].DayAfterLastOutput to [clock].Today as LeachNO3
          // Water
          sum of ([Soil].SoilWater.Runoff) from 01-jan to [Clock].Today as runoff
          sum of [Soil].SoilWater.Drainage from [Annual].DayAfterLastOutput to [clock].Today as drainaged_run_off
          SOC1 + SOC2 as total_carbon
          // Calculate Nitrate Loss. 0.01 converts to kg per hectare
          runoff * (N03Ncon + N03Ncon2 + N03Ncon3) *0.01  as Nloss
          // calculalate carbon dioxide equivalent
           n20 *(44/28) *165 as no2_eq
           TopN2O *(44/28) *165 as top_no2_eq
           // Weather and soil water
          sum of [weather].rain from 01-jan to [clock].Today as mean_rain
          sum of [weather].MaxT  from 01-jan to [Clock].Today as mean_maxt
          sum  of [weather].MinT from 01-jan to [Clock].Today as mean_mint
          sum  of [weather].Radn from 01-jan to [Clock].Today as total_radn
          mean  of [Water].PAW[1] from 01-jan to [Clock].Today as PAWC1
          mean  of [Water].PAW[2] from 01-jan to [Clock].Today as PAWC2
          mean  of [Soil].SoilWater.SW[1] from 01-jan to [Clock].Today as SW1
          mean  of [Soil].SoilWater.SW[2] from 01-jan to [Clock].Today as SW2
          mean  of [Soil].SoilWater.SW[3] from 01-jan to [Clock].Today as SW3
          [Soilwater].SWCON
          [Nutrient].NH4.ppm[1] as nh4
          [Nutrient].NO3.ppm[1] as no3
          [Nutrient].NH4.ppm[2] as nh42
          [Nutrient].NO3.ppm[2] as no32
      SurfaceOrganicMatter: InitialResidueName=grass; InitialResidueType=grass; InitialResidueMass=800; InitialStandingFraction=0; InitialCPR=0; InitialCNR=100
      Fertiliser
      Plant Maize
      MicroClimate: a_interception=0; b_interception=1; c_interception=0; d_interception=0; SoilHeatFluxFraction=0.4; MinimumHeightDiffForNewLayer=0; NightInterceptionFraction=0.5; ReferenceHeight=2
      Manager HarvestMaize
        Crop = [Maize]
        Date = 25-Sep
```csharp
using APSIM.Shared.Utilities;
using Models.Utilities;
using Models.Soils;
using Models.PMF;
using Models.Core;
using System;

namespace Models
{
    [Serializable] 
    public class Script : Model
    {
        [Link] IClock Clock;
        
        [Separator("Harvesting script that forces harvesting")]
        [Description("Crop")]
        public IPlant Crop { get; set; }
        
        [Description("Date to force harvesting by if crop is not ready (d-mmm)")]
        public string Date { get; set; }
        
        [EventSubscribe("DoManagement")]
        private void OnDoManagement(object sender, EventArgs e)
        {
            if (Crop.IsReadyForHarvesting || 
                (DateUtilities.DatesAreEqual(Date, Clock.Today) && Crop.IsAlive))
            {
                Crop.Harvest();
                Crop.EndCrop();
            }
        }
    }
}
```
      Soil Muscatune:244911: SoilType=Shaffton:67263817; Site=11; State=IL; Country=USA; ApsoilNumber=0; Latitude=41.763; Longitude=-90.6808
        DataSource=SSURGO https://SDMDataAccess.nrcs.usda.gov/Tabular/SDMTabularService.asmx through PyAPSIMX function Replace_Soilprofile. Date downloaded: 2022-12-27 02:49:44.558240
        Comments=cockey = 22743816 Shaffton loam, 0 to 2 percent slopes Component percentage: 95%
        Physical: same as Replacements.Muscatune:244911.Physical
        Organic: same as Replacements.Muscatune:244911.Organic
        Chemical: same as Replacements.Muscatune:244911.Chemical
        Water: same as Replacements.Muscatune:244911.Water
        Nutrient
        WaterBalance SoilWater: SummerDate=1-jun; SummerU=8.55; SummerCona=3.775; WinterDate=1-nov; WinterU=8.55; WinterCona=3.775; DiffusConst=40; DiffusSlope=16; Salb=0.13; CN2Bare=76; CNRed=20; CNCov=0.8; DischargeWidth=160; CatchmentArea=10000; PSIDul=-100; Thickness=[200, 100, 200, 200, 200, 250, 300, 300, 350, 250]
          SWCON=[0.152205, 0.185154, 0.218778, 0.253098, 0.285504, 0.288136, 0.290212, 0.294941, 0.295102, 0.29676]
        Solute NO3: same as Replacements.Muscatune:244911.NO3
        Solute NH4: same as Replacements.Muscatune:244911.NH4
        Solute Urea: same as Replacements.Muscatune:244911.Urea
        SoilTemperature
      Manager Tillage
        Fraction = 0.95
        Depth = 350
        AppplyTillageOption = yes
        script: same as in Replacements.Tillage
      Report gyield: EventNames=[Maize].Harvesting
        VariableNames:
          [Clock].Today
          [Simulation].Name as Plotid
          [Clock].Today.Year as year
          [Maize].Phenology.CurrentStageName
          [Maize].AboveGround.Wt as Abiomas
          [Maize].Grain.Wt * 10 as grainwt
          [Maize].Total.Wt * 10 as maizeyield
          [Maize].Total.Wt * 10 as total_biomass
          [Maize].BelowGround.Wt as BBiomass
      Manager Sow using a variable rule: same as Replacements.Sow using a variable rule
      Manager Fertilise at sowing
        Crop = [Maize]
        FertiliserType = NO3N
        Amount = 245
```csharp
using Models.Soils;
using System;
using System.Linq;
using Models.Core;
using Models.PMF;
namespace Models
{
    [Serializable]
    public class Script : Model
    {
        [Link] Clock Clock;
        [Link] Fertiliser Fertiliser;
        
        [Description("Crop to be fertilised")]
        public IPlant Crop { get; set; }

        [Description("Type of fertiliser to apply? ")] 
        [Display(Type = DisplayType.FertiliserType)]public string FertiliserType { get; set; }
    
        [Description("Amount of fertiliser to be applied (kg/ha)")]
        public double Amount { get; set; }
        
        [EventSubscribe("Sowing")]
        private void OnSowing(object sender, EventArgs e)
        {
            Model crop = sender as Model;
            if (Crop != null && crop.Name.ToLower() == (Crop as IModel).Name.ToLower())
                Fertiliser.Apply(amount: Amount, type: FertiliserType);
        }
    }
}
```
    Memo
      When working with perennial crops that are harvested or grazed frequently, often an output that plots the accumulation of growth during a year is wanted. That output should be zeroed between years. If simulating a site in the Southern Hemisphere, usually the end of the year will be in June or July (winter). Here this is achieved as "CumulativeAnnualNetGrowth" using reporting at the end of the month (see in MonthlyReporting) and:

      		Sum of ([Ryegrass].NetGrowthWt + [WhiteClover].NetGrowthWt)
      			from 1-Jul to [Clock].Today as CumulativeAnnualNetGrowth

      with the output shown as the orange line below. Note that here it is necessary to calculate the output summing ryegrass and white clover. For comparison, the pattern of accumulation is plotted against the annual total (green line) and that was specified in AnnualReporting using:

      		Sum of ([Ryegrass].NetGrowthWt + [WhiteClover].NetGrowthWt)
      			from [AnnualReporting].DayAfterLastOutput to [Clock].Today
      			as SumYearlyNetGrowth
