Simulations: Version=201
  DataStore
  Folder Replacements
    Manager fertilize in phases
      Crop =
      FertiliserType = UreaN
      Depth2Apply = 1
      FractionToApplyFirst = 1
      Amount = 190
      FertiliserDates = 04-jun, 03-jun, 02-jun, 01-jun, 03-jun, 05-jun, 06-jun, 07-jun, 08-jun, 09-jun
```csharp
using Models;
using System;
using System.Collections.Generic;
using System.Globalization;
using System.Linq;
using APSIM.Shared.Utilities;
using Models.Climate;
using Models.Core;
using Models.PMF;

namespace Models
{
    [Serializable]
    public class Script : Model
    {
        [Link] private Clock Clock = null;
        [Link] private Fertiliser Fertiliser = null;
        [Link] private ISummary Summary = null;
        [Link] private Weather Weather = null;

        [Separator("Crop in the rotation to apply fertilizers")]
        [Description("Crop")]
        public IPlant Crop { get; set; }

        [Separator("Fertilizer application details")]
        [Description("Type of fertiliser to apply? Select from a list.")]
        [Display(Type = DisplayType.FertiliserType)]public string FertiliserType { get; set; }

        [Description("Depth to apply the fertilizer.")]
        public double Depth2Apply { get; set; }

        [Description("Fraction to apply at sowing (0-1). If it is a single application, set to 1.")]
        public double FractionToApplyFirst { get; set; }

        [Description("Enter the total amount of fertiliser to be applied (kg/ha).")]
        public double Amount { get; set; }

        [Description("Enter other potential dates as dd-MMM with comma separation (any year entered will be ignored).")]
        public string[] FertiliserDates { get; set; }

        private bool hasAppliedBalance = false;
        private DateTime sowingDate;
        private List<DateTime> candidateDatesThisSeason = new List<DateTime>();

        [EventSubscribe("Sowing")]
        private void OnSowing(object sender, EventArgs e)
        {
            var cropModel = sender as Model;

            // Only act for the selected crop in rotation
            if (Crop != null && cropModel != null &&
                cropModel.Name.Equals((Crop as IModel)?.Name, StringComparison.OrdinalIgnoreCase))
            {
                // Apply first fraction at sowing (if any)
                var firstN = FractionToApplyFirst * Amount;
                if (firstN > 0)
                    Fertiliser.Apply(amount: firstN, type: FertiliserType, depth: Depth2Apply);

                // Reset per-season state
                hasAppliedBalance = false;
                sowingDate = Clock.Today;
                candidateDatesThisSeason = BuildSeasonDates(FertiliserDates, sowingDate.Year)
                    // Keep only dates on/after sowing to avoid firing before crop exists
                    .Where(d => d >= sowingDate)
                    .OrderBy(d => d)
                    .ToList();
            }
        }

        [EventSubscribe("DoManagement")]
        private void OnDoManagement(object sender, EventArgs e)
        {
            // Already finished balance this season
            if (hasAppliedBalance)
                return;

            // No crop or crop not alive
            if (Crop == null || !Crop.IsAlive)
                return;

            // No candidate dates supplied
            if (FertiliserDates == null || FertiliserDates.Length == 0)
                return;

            // Remaining N (balance) after the sowing fraction
            var firstN = FractionToApplyFirst * Amount;
            var remainingN = Amount - firstN;

            if (remainingN <= 0)
            {
                hasAppliedBalance = true; // nothing left to apply
                return;
            }

            // Try to apply on any candidate that matches TODAY and has no rain
            foreach (var d in candidateDatesThisSeason)
            {
                // Use month/day equality (DateUtilities ignores year when given "dd-MMM")
                if (Clock.Today.Date == d.Date && Weather.Rain >=0)
                {
                    Fertiliser.Apply(amount: remainingN, type: FertiliserType, depth: Depth2Apply);

                    Summary.WriteMessage(this,
                        $"Applied remaining {remainingN:0.##} kg N as {FertiliserType} at {Depth2Apply} mm on {Clock.Today:dd-MMM-yyyy}.",
                        MessageType.Information);

                    Summary.WriteMessage(this, $"Rain was: {Weather.Rain:0.##} mm.", MessageType.Information);

                    hasAppliedBalance = true;
                    return;
                }
            }

            // If we've passed the last candidate date and still haven't applied, throw an error ONCE.
            if (candidateDatesThisSeason.Count > 0)
            {
                var lastCandidate = candidateDatesThisSeason[^1];
                if (Clock.Today.Date > lastCandidate.Date && !hasAppliedBalance && remainingN > 0)
                {
                    var listStr = string.Join(", ", candidateDatesThisSeason.Select(d => d.ToString("dd-MMM")));
                    var msg =
                        $"No rain-free candidate date was found among [{listStr}] for crop '{Crop.Name}'. " +
                        $"Remaining nitrogen ({remainingN:0.##} kg/ha) was not applied.";

                    // Log as error and stop the simulation so the issue is visible in batch runs
                    Summary.WriteMessage(this, msg, MessageType.Error);
                    throw new Exception(msg);
                }
            }
        }

        /// <summary>
        /// Parse user-supplied "dd-MMM" (or "dd-MMM-yyyy") strings into DateTimes in the given year.
        /// Any year provided in input is ignored; we force the supplied <paramref name="year"/>.
        /// </summary>
        private static IEnumerable<DateTime> BuildSeasonDates(IEnumerable<string> inputs, int year)
        {
            if (inputs == null)
                yield break;

            foreach (var raw in inputs)
            {
                if (string.IsNullOrWhiteSpace(raw))
                    continue;

                var s = raw.Trim();

                // Try parsing day-month (ignore any year), then replace year.
                // Accept both "dd-MMM" and "dd-MMM-yyyy".
                if (DateTime.TryParseExact(s, new[] { "dd-MMM", "d-MMM", "dd-MMM-yyyy", "d-MMM-yyyy" },
                                           CultureInfo.InvariantCulture, DateTimeStyles.None, out var dt))
                {
                    // Force to the requested season year (ignore any year that might have been in the string)
                    yield return new DateTime(year, dt.Month, dt.Day);
                }
                else
                {
                    // If format is wrong, fail fast so users can fix the input.
                    throw new FormatException(
                        $"Invalid fertiliser date '{s}'. Use 'dd-MMM' (e.g., 15-May) or 'dd-MMM-yyyy'.");
                }
            }
        }
    }
}
```
  Simulation 3092
    Clock: Start=2009-01-01; End=2020-12-31
    Summary SummaryFile
    Weather
      FileName=D:/My_BOX/Box/PhD thesis/Objective two/morrow plots 20250821/nwrec_nasa_1986_2022.met
    SoilArbitrator Soil Arbitrator
    Zone Field: Area=1; Slope=0; AspectAngle=0; Altitude=50
      Report yield: EventNames=[Maize].Harvesting
        VariableNames:
          [Clock].Today
          [Simulation].Name as Plotid
          [Clock].Today.Year as year
          [Maize].Phenology.CurrentStageName
          [Maize].AboveGround.Wt as Abiomas
          [Maize].Grain.Wt * 10 as grainwt
          [Maize].Total.Wt * 10 as maizeyield
          [Maize].Total.Wt * 10 as total_biomass
          [Maize].BelowGround.Wt as BBiomass
      Fertiliser
      SurfaceOrganicMatter: InitialResidueName=maize_stubble; InitialResidueType=grass; InitialResidueMass=500; InitialStandingFraction=0; InitialCPR=0; InitialCNR=100
      MicroClimate: a_interception=0; b_interception=1; c_interception=0; d_interception=0; SoilHeatFluxFraction=0.4; MinimumHeightDiffForNewLayer=0; NightInterceptionFraction=0.5; ReferenceHeight=2
      Plant Maize
      Manager HarvestingMaize
        Crop = [Maize]
```csharp
using APSIM.Shared.Utilities;
using Models.Utilities;
using Models.Soils;
using Models.PMF;
using Models.Core;
using System;

namespace Models
{
    [Serializable] 
    public class Script : Model
    {
        [Description("Crop")]
        public IPlant Crop { get; set; }
        
        [EventSubscribe("DoManagement")]
        private void OnDoManagement(object sender, EventArgs e)
        {
            if (Crop.IsReadyForHarvesting)
            {
                Crop.Harvest();
                Crop.EndCrop();
            }
        }
    }
}
```
      Report water
        VariableNames:
          [Clock].Today.Year as year
          Mean of Sum([Soil].SoilWater.SWmm) from [Maize].Sowing to [Maize].Harvesting as InCropMeanSoilWater
          Mean of Sum([Soil].SoilWater.SWmm[:2]) from [Maize].Sowing  to [Maize].Harvesting as InCropMeanSoilWaterTopThreeLayers
      Report carbon_change: EventNames=[Clock].EndOfSimulation
        VariableNames=diff of [Soil].Nutrient.Catm[1] from [Clock].StartOfSimulation to [Clock].EndOfSimulation as c_balance
      Soil Flanagan:242965: SoilType=Sable silty clay loam, 0 to 2 percent slopes; LocalName=Sable; Latitude=40.9305556; Longitude=-90.7272; Comments=number of layers: 10, max depth: 2400mm
        DataSource:
          Sable: downloaded by apsimNGpy: `DownloadsurgoSoiltables`
           accessed from SSURGO on: 2025-11-01T13:45:28
        Physical
          Thickness  ParticleSizeSand  ParticleSizeSilt  ParticleSizeClay  Rocks  BD        AirDry     LL15       DUL       SAT       KS
          200        2                 72                26                0      1.35167   0.0550833  0.110167   0.478333  0.49      792.45
          200        1.94089           69.8721           25.2316           0      1.27295   0.0518755  0.103751   0.450477  0.461465  792.45
          200        1.88353           67.807            24.4859           0      1.19882   0.0488545  0.0977091  0.424244  0.434591  792.45
          252        1.82786           65.803            23.7622           0      1.12901   0.0460095  0.0920189  0.399538  0.409282  792.45
          254        1.77384           63.8583           23.0599           0      1.06326   0.0433301  0.0866602  0.37627   0.385448  792.45
          255        1.72142           61.971            22.3784           0      1.00134   0.0408067  0.0816135  0.354358  0.363001  792.45
          257        1.67054           60.1395           21.717            0      0.943026  0.0384303  0.0768607  0.333722  0.341861  792.45
          258        1.62117           58.3621           21.0752           0      0.888108  0.0361923  0.0723847  0.314287  0.321953  792.45
          260        1.57326           56.6372           20.4523           0      0.836389  0.0340847  0.0681693  0.295985  0.303204  792.45
          261        1.52676           54.9633           19.8479           0      0.787681  0.0320997  0.0641994  0.278748  0.285547  792.45
          Rocks source: Calculated (layer 1, 2, 3, 4, 5, 6, 7, 8)
          SoilCrop MaizeSoil
            LL=[0.1085, 0.126889, 0.145279, 0.163668, 0.182058, 0.175693, 0.164614, 0.152861, 0.140418, 0.127975]
            KL=[0.08, 0.0654985, 0.0536256, 0.0439049, 0.0359463, 0.0294304, 0.0240955, 0.0197278, 0.0161517, 0.0132239]
            XF=[1, 1, 1, 1, 1, 1, 1, 1, 1, 1]
          SoilCrop SoybeanSoil: same as 3092.Field.Flanagan:242965.Physical.MaizeSoil
          SoilCrop WheatSoil: same as 3092.Field.Flanagan:242965.Physical.MaizeSoil
        WaterBalance SoilWater: SummerDate=1-Nov; SummerU=5; SummerCona=5; WinterDate=1-Apr; WinterU=5; WinterCona=5; DiffusConst=40; DiffusSlope=16; Salb=0.12; CN2Bare=73; CNRed=20; CNCov=0.8; PSIDul=-100; Thickness=[200, 200, 200, 252, 254, 255, 257, 258, 260, 261]
          SWCON=[0.152205, 0.185065, 0.218597, 0.252821, 0.285615, 0.287759, 0.290492, 0.294741, 0.295375, 0.296551]
        Organic: FOMCNRatio=40; CarbonUnits=Total
          Thickness  Carbon     SoilCNRatio  FBiom       FInert    FOM
          200        2.61628    12           0.0395      0.65      150
          200        2.08233    12           0.035       0.668     122.81
          200        1.54839    12           0.0301644   0.846767  100.548
          252        1.01444    12           0.0246965   0.855277  82.3217
          254        0.480492   12           0.0202198   0.863873  67.3993
          255        0.316367   12           0.0165546   0.872555  55.1819
          257        0.222219   12           0.0135537   0.881324  45.1791
          258        0.158148   12           0.0110969   0.890182  36.9895
          260        0.125109   12           0.00908534  0.899128  30.2845
          261        0.0920698  12           0.00743845  0.908165  24.7948
        Chemical: Thickness=[200, 200, 200, 252, 254, 255, 257, 258, 260, 261]; PHUnits=Water
          PH=[6, 6.28846, 6.57692, 6.86538, 7.15385, 7.34318, 7.51364, 7.62803, 7.68485, 7.74167]
        Water: Thickness=[200, 200, 200, 252, 254, 255, 257, 258, 260, 261]; FilledFromTop=true
          InitialValues=[0.478333, 0.450477, 0.424244, 0.399538, 0.37627, 0.354358, 0.333722, 0.314287, 0.295985, 0.278748]
        Nutrient
        Solute NO3: Thickness=[200, 200, 200, 252, 254, 255, 257, 258, 260, 261]; InitialValuesUnits=ppm; WaterTableConcentration=0; D0=0; DepthConstant=0; MaxDepthSoluteAccessible=0; RunoffEffectivenessAtMovingSolute=0; MaxEffectiveRunoff=0
          InitialValues=[0.5, 0.495025, 0.490099, 0.485223, 0.480395, 0.475615, 0.470882, 0.466197, 0.461558, 0.456966]
        Solute NH4: Thickness=[200, 200, 200, 252, 254, 255, 257, 258, 260, 261]; InitialValuesUnits=ppm; WaterTableConcentration=0; D0=0; DepthConstant=0; MaxDepthSoluteAccessible=0; RunoffEffectivenessAtMovingSolute=0; MaxEffectiveRunoff=0
          InitialValues=[0.05, 0.0495025, 0.0490099, 0.0485223, 0.0480395, 0.0475615, 0.0470882, 0.0466197, 0.0461558, 0.0456966]
        Solute Urea: Thickness=[200, 200, 200, 252, 254, 255, 257, 258, 260, 261]; InitialValues=[0, 0, 0, 0, 0, 0, 0, 0, 0, 0]; InitialValuesUnits=kg/ha; WaterTableConcentration=0; D0=0; DepthConstant=0; MaxDepthSoluteAccessible=0; RunoffEffectivenessAtMovingSolute=0; MaxEffectiveRunoff=0
        SoilTemperature Temperature
      Manager Sow using a variable rule
        Crop = [Maize]
        StartDate = 18-apr
        EndDate = 1-may
        MinESW = 100
        MinRain = 5
        RainDays = 7
        CultivarName = B_110
        SowingDepth = 25
        RowSpacing = 750
        Population = 8.65
```csharp
using APSIM.Numerics;
using Models.Climate;
using System.Linq;
using System;
using Models.Core;
using Models.PMF;
using Models.Soils;
using Models.Utilities;
using APSIM.Shared.Utilities;
using Models.Interfaces;

namespace Models
{
    [Serializable]
    public class Script : Model
    {
        [Link] private Clock Clock;
        [Link] private Fertiliser Fertiliser;
        [Link] private Summary Summary;
        [Link] private Soil Soil;
        private Accumulator accumulatedRain;
        [Link]
        private ISoilWater waterBalance;
        
        [Description("Crop")]
        public IPlant Crop { get; set; }

        [Description("Start of sowing window (d-mmm)")]
        public string StartDate { get; set; }

        [Description("End of sowing window (d-mmm)")]
        public string EndDate { get; set; }

        [Description("Minimum extractable soil water for sowing (mm)")]
        public double MinESW { get; set; }

        [Description("Accumulated rainfall required for sowing (mm)")]
        public double MinRain { get; set; }

        [Description("Duration of rainfall accumulation (d)")]
        public int RainDays { get; set; }

        [Display(Type = DisplayType.CultivarName)]
        [Description("Cultivar to be sown")]
        public string CultivarName { get; set; }

        [Description("Sowing depth (mm)")]
        public double SowingDepth { get; set; }

        [Description("Row spacing (mm)")]
        public double RowSpacing { get; set; }

        [Description("Plant population (/m2)")]
        public double Population { get; set; }
        
        
        [EventSubscribe("StartOfSimulation")]
        private void OnSimulationCommencing(object sender, EventArgs e)
        {
            accumulatedRain = new Accumulator(this, "[Weather].Rain", RainDays);
        }

        [EventSubscribe("DoManagement")]
        private void OnDoManagement(object sender, EventArgs e)
        {
            accumulatedRain.Update();
            
            if (DateUtilities.WithinDates(StartDate, Clock.Today, EndDate) &&
                !Crop.IsAlive &&
                MathUtilities.Sum(waterBalance.ESW) > MinESW &&
                accumulatedRain.Sum > MinRain)
            {
                Crop.Sow(population: Population, cultivar: CultivarName, depth: SowingDepth, rowSpacing: RowSpacing);    
            }
        }
    }
}
```
      Report carbon: EventNames=1-jan
        VariableNames:
          [Clock].Today
          [Simulation].Name as Plotid
          [Clock].Today.Year as year
          sum([Nutrient].FOM.C)  from 01-jan to [Clock].Today as FOM.c
          sum([Nutrient].TotalOrganicN[1])  from 01-jan to [Clock].Today as TON
          sum([Soil].Nutrient.TotalC)/1000 from 01-jan to [clock].Today as soc
          [SurfaceOrganicMatter].C as Total_surfaceCArbon
          [SurfaceOrganicMatter].wt as surface_organic_matter
          sum([Nutrient].Catm) as Soil_Respiration
          sum([Soil].Nutrient.TotalC[3:5])/1000 as Deeplayer_soil_Carbon
          sum([Soil].Nutrient.TotalC[1:3])/1000 as Toplayer_soil_Carbon
          sum of sum([Nutrient].N2Oatm[1:3]) from [carbon].DayAfterLastOutput to [Clock].Today as n20
          sum of sum([Nutrient].N2Oatm[1:6] from 01-jan to [Clock].Today as N20D20cm
          sum of sum([Nutrient].N2Oatm[1:9]) from 01-jan to [Clock].Today as N20
          [Soil].Nutrient.TotalC[1]/1000 from [carbon].DayAfterLastOutput to [clock].Today as SOC_0_15CM // soil carbon in the first layer
          [Soil].Nutrient.TotalC[2]/1000 from [clock].StartOfSimulation to [clock].Today as SOC_1_2
          SOC_1_2 + SOC_0_15CM as soccx
          sum([Soil].Nutrient.TotalC[:1])/1000 as SOCD40CM
          sum of [Nutrient].Catm[1] from 1-jan to today as RespD20cm
          sum of [Nutrient].Catm[1] from 1-jan to today as RespD40cm
          [Soil].Water.Volumetric as DUL
          [Soil].SoilWater.PAW as PAW
          [Report].Name as Plotid
          sum of ([Nutrient].Catm[1]) from 01-jan to [Clock].Today as Top_respiration
          sum of sum([Nutrient].Catm[1:9]) from 01-jan to [Clock].Today as whole_respiration
          [Maize].Root.Total.Wt * 10 as RootBiomass
          [Soil].Nutrient.TotalC[7] as deepC
          [Soil].Nutrient.TotalC[8] as deepC8
          [Soil].Nutrient.TotalC[9] as deepC9
          [Soil].Nutrient.TotalC[10] as deepC10
          mean of [Maize].LAI  from [carbon].DayAfterLastOutput to [Clock].Today as lai
          [Soil].Nutrient.TotalC[1]/1000 as carbo
          [Soil].Temperature.Value[1] as tmp1
          [Soil].Temperature.Value[2] as tmp2
          [Soil].Temperature.Value[1] + [Soil].Temperature.Value[2] as tmp
          // from mineralization report
          // convert to Mg
          sum of [Nutrient].Catm[1]/1000 from [carbon].DayAfterLastOutput  to [Clock].Today as top_carbon_mineralization
          sum of [Nutrient].Catm[2]/1000 from 1-jan to [Clock].Today as layer2_mineralization
          sum of [Nutrient].MineralisedN[1]  from [carbon].DayAfterLastOutput  to today as top_mineralized_N
          [Soil].Nutrient.TotalC[1]/1000 from 01-jan to [clock].Today as SOC1
          [Nutrient].Organic.C[1]/1000 as org_c
          [Nutrient].Microbial.C[1]/1000 as microbial_carbon
          [Nutrient].FOM.C[1] as FOM_C_kg
          [Weather].Rain as rain
          // Surface Organic Matter Carbon and Nitrogen
          [SurfaceOrganicMatter].C as SurfaceOrganicMatter_Carbon
          [SurfaceOrganicMatter].N as SurfaceOrganicMatter_Nitrogen
      Manager Tillage
        TillageDate = 1-Nov
        Fraction = 0.5
        Depth = 0
```csharp
using Models.Soils;
using System;
using System.Linq;
using Models.Core;
using Models.PMF;
using APSIM.Shared.Utilities;
using Models.Surface;

namespace Models
{
    [Serializable]
    public class Script : Model
    {
        [Link] Clock Clock;
        [Link] SurfaceOrganicMatter SOM;
        
        [Description("Tillage Date")]
        public string TillageDate { get; set; }
        
        [Description("Fraction of Residues To Incorporate (0-1)")]
        public double Fraction { get; set; }

        [Description("Depth of Tillage (mm)")]
        public double Depth { get; set; }

        [EventSubscribe("DoManagement")]
        private void OnDoManagement(object sender, EventArgs e)
        {
            if (DateUtilities.WithinDates(TillageDate, Clock.Today, TillageDate))
                SOM.Incorporate(Fraction, Depth);
        }
    }
}
```
      Memo
        01-jun, 02-jun, 03-jun, 04-jun, 05-jun, 06-jun, 07-jun, 08-jun, 09-jun
    Report mineralization: EventNames=1-jan
      VariableNames:
        [Clock].Today.Year as year
        [Simulation].Name as Plotid
        // convert to Mg
        sum of [Nutrient].Catm[1]/1000 from 1-jan to today as top_mineralization
        sum of [Nutrient].Catm[2]/1000 from 1-jan to today as layer2_mineralization
        sum of [Nutrient].MineralisedN[1] from 1-jan to today as top_mineralized_N
        [Soil].Nutrient.TotalC[1]/1000 from [clock].StartOfSimulation to [clock].Today as SOC_0_15CM
    Manager fertilize in phases
      Crop = [Maize]
      FertiliserType = UreaN
      Depth2Apply = 1
      FractionToApplyFirst = 1
      Amount = 190
      FertiliserDates = 04-jun, 03-jun, 02-jun, 01-jun, 03-jun, 05-jun, 06-jun, 07-jun, 08-jun, 09-jun
      script: same as in Replacements.fertilize in phases
  Simulation 2031
    Clock: Start=2009-01-01; End=2020-12-31
    Summary SummaryFile
    Weather
      FileName=D:/My_BOX/Box/PhD thesis/Objective two/morrow plots 20250821/nwrec_nasa_1986_2022.met
    SoilArbitrator Soil Arbitrator
    Zone Field: Area=1; Slope=0; AspectAngle=0; Altitude=50
      Report yield: same as 3092.Field.yield
      Fertiliser
      SurfaceOrganicMatter: InitialResidueName=maize_stubble; InitialResidueType=grass; InitialResidueMass=500; InitialStandingFraction=0; InitialCPR=0; InitialCNR=100
      MicroClimate: a_interception=0; b_interception=1; c_interception=0; d_interception=0; SoilHeatFluxFraction=0.4; MinimumHeightDiffForNewLayer=0; NightInterceptionFraction=0.5; ReferenceHeight=2
      Plant Maize
      Manager HarvestingMaize: same as 3092.Field.HarvestingMaize
      Report water
        VariableNames:
          [Clock].Today.Year as year
          Mean of Sum([Soil].SoilWater.SWmm) from [Maize].Sowing to [Maize].Harvesting as InCropMeanSoilWater
          Mean of Sum([Soil].SoilWater.SWmm[:2]) from [Maize].Sowing  to [Maize].Harvesting as InCropMeanSoilWaterTopThreeLayers
      Report carbon_change: EventNames=[Clock].EndOfSimulation
        VariableNames=diff of [Soil].Nutrient.Catm[1] from [Clock].StartOfSimulation to [Clock].EndOfSimulation as c_balance
      Soil Flanagan:242965: SoilType=Sable silty clay loam, 0 to 2 percent slopes; LocalName=Sable; Latitude=40.9305556; Longitude=-90.7272; Comments=number of layers: 10, max depth: 2400mm
        DataSource:
          Sable: downloaded by apsimNGpy: `DownloadsurgoSoiltables`
           accessed from SSURGO on: 2025-11-01T13:45:42
        Physical
          Thickness  ParticleSizeSand  ParticleSizeSilt  ParticleSizeClay  Rocks  BD        AirDry     LL15       DUL       SAT       KS
          200        3                 69.5              27.5              0      1.34167   0.0490833  0.0981667  0.456667  0.493333  792.45
          200        2.91134           67.446            26.6873           0      1.26353   0.0462249  0.0924499  0.430072  0.464604  792.45
          200        2.82529           65.4526           25.8985           0      1.18995   0.043533   0.087066   0.405027  0.437547  792.45
          252        2.74179           63.5182           25.1331           0      1.12065   0.0409978  0.0819957  0.38144   0.412067  792.45
          254        2.66076           61.641            24.3903           0      1.05539   0.0386103  0.0772206  0.359227  0.38807   792.45
          255        2.58212           59.8192           23.6695           0      0.993931  0.0363618  0.0727237  0.338307  0.36547   792.45
          257        2.50581           58.0513           22.9699           0      0.936049  0.0342443  0.0684886  0.318606  0.344187  792.45
          258        2.43175           56.3356           22.2911           0      0.881538  0.03225    0.0645001  0.300051  0.324143  792.45
          260        2.35988           54.6706           21.6323           0      0.830201  0.030372   0.0607439  0.282578  0.305266  792.45
          261        2.29014           53.0549           20.9929           0      0.781854  0.0286032  0.0572065  0.266122  0.287489  792.45
          Rocks source: Calculated (layer 1, 2, 3, 4, 5, 6, 7, 8)
          SoilCrop MaizeSoil: same as 3092.Field.Flanagan:242965.Physical.MaizeSoil
          SoilCrop SoybeanSoil: same as 3092.Field.Flanagan:242965.Physical.MaizeSoil
          SoilCrop WheatSoil: same as 3092.Field.Flanagan:242965.Physical.MaizeSoil
        WaterBalance SoilWater: same as 3092.Field.Flanagan:242965.SoilWater
        Organic: same as 3092.Field.Flanagan:242965.Organic
        Chemical: same as 3092.Field.Flanagan:242965.Chemical
        Water: Thickness=[200, 200, 200, 252, 254, 255, 257, 258, 260, 261]; FilledFromTop=true
          InitialValues=[0.456667, 0.430072, 0.405027, 0.38144, 0.359227, 0.338307, 0.318606, 0.300051, 0.282578, 0.266122]
        Nutrient
        Solute NO3: same as 3092.Field.Flanagan:242965.NO3
        Solute NH4: same as 3092.Field.Flanagan:242965.NH4
        Solute Urea: same as 3092.Field.Flanagan:242965.Urea
        SoilTemperature Temperature
      Manager Sow using a variable rule: same as 3092.Field.Sow using a variable rule
      Report carbon: same as 3092.Field.carbon
      Manager Tillage: same as 3092.Field.Tillage
      Memo
        01-jun, 02-jun, 03-jun, 04-jun, 05-jun, 06-jun, 07-jun, 08-jun, 09-jun
    Report mineralization: same as 3092.mineralization
    Manager fertilize in phases: same as 3092.fertilize in phases
  Simulation 1102
    Clock: Start=2009-01-01; End=2020-12-31
    Summary SummaryFile
    Weather
      FileName=D:/My_BOX/Box/PhD thesis/Objective two/morrow plots 20250821/nwrec_nasa_1986_2022.met
    SoilArbitrator Soil Arbitrator
    Zone Field: Area=1; Slope=0; AspectAngle=0; Altitude=50
      Report yield: same as 3092.Field.yield
      Fertiliser
      SurfaceOrganicMatter: InitialResidueName=maize_stubble; InitialResidueType=grass; InitialResidueMass=500; InitialStandingFraction=0; InitialCPR=0; InitialCNR=100
      MicroClimate: a_interception=0; b_interception=1; c_interception=0; d_interception=0; SoilHeatFluxFraction=0.4; MinimumHeightDiffForNewLayer=0; NightInterceptionFraction=0.5; ReferenceHeight=2
      Plant Maize
      Manager HarvestingMaize: same as 3092.Field.HarvestingMaize
      Report water
        VariableNames:
          [Clock].Today.Year as year
          Mean of Sum([Soil].SoilWater.SWmm) from [Maize].Sowing to [Maize].Harvesting as InCropMeanSoilWater
          Mean of Sum([Soil].SoilWater.SWmm[:2]) from [Maize].Sowing  to [Maize].Harvesting as InCropMeanSoilWaterTopThreeLayers
      Report carbon_change: EventNames=[Clock].EndOfSimulation
        VariableNames=diff of [Soil].Nutrient.Catm[1] from [Clock].StartOfSimulation to [Clock].EndOfSimulation as c_balance
      Soil Flanagan:242965: SoilType=Sable silty clay loam, 0 to 2 percent slopes; LocalName=Sable; Latitude=40.9305556; Longitude=-90.7272; Comments=number of layers: 10, max depth: 2400mm
        DataSource:
          Sable: downloaded by apsimNGpy: `DownloadsurgoSoiltables`
           accessed from SSURGO on: 2025-11-01T13:45:41
        Physical
          Thickness  ParticleSizeSand  ParticleSizeSilt  ParticleSizeClay  Rocks  BD        AirDry     LL15       DUL       SAT       KS
          200        2.5               68.5              29                0      1.355     0.0563333  0.112667   0.44      0.488333  792.45
          200        2.42611           66.4755           28.1429           0      1.27609   0.0530527  0.106105   0.414376  0.459895  792.45
          200        2.35441           64.5109           27.3112           0      1.20178   0.0499632  0.0999264  0.390245  0.433113  792.45
          252        2.28483           62.6043           26.504            0      1.13179   0.0470536  0.0941071  0.367519  0.40789   792.45
          254        2.2173            60.754            25.7207           0      1.06588   0.0443134  0.0886267  0.346116  0.384137  792.45
          255        2.15177           58.9585           24.9605           0      1.00381   0.0417328  0.0834655  0.32596   0.361766  792.45
          257        2.08818           57.216            24.2228           0      0.945351  0.0393024  0.0786049  0.306978  0.340699  792.45
          258        2.02646           55.525            23.5069           0      0.890298  0.0370136  0.0740273  0.289101  0.320858  792.45
          260        1.96657           53.884            22.8122           0      0.838451  0.0348581  0.0697163  0.272265  0.302173  792.45
          261        1.90845           52.2915           22.138            0      0.789624  0.0328282  0.0656563  0.256409  0.284575  792.45
          Rocks source: Calculated (layer 1, 2, 3, 4, 5, 6, 7, 8)
          SoilCrop MaizeSoil: same as 3092.Field.Flanagan:242965.Physical.MaizeSoil
          SoilCrop SoybeanSoil: same as 3092.Field.Flanagan:242965.Physical.MaizeSoil
          SoilCrop WheatSoil: same as 3092.Field.Flanagan:242965.Physical.MaizeSoil
        WaterBalance SoilWater: same as 3092.Field.Flanagan:242965.SoilWater
        Organic: same as 3092.Field.Flanagan:242965.Organic
        Chemical: same as 3092.Field.Flanagan:242965.Chemical
        Water: Thickness=[200, 200, 200, 252, 254, 255, 257, 258, 260, 261]; FilledFromTop=true
          InitialValues=[0.44, 0.414376, 0.390245, 0.367519, 0.346116, 0.32596, 0.306978, 0.289101, 0.272265, 0.256409]
        Nutrient
        Solute NO3: same as 3092.Field.Flanagan:242965.NO3
        Solute NH4: same as 3092.Field.Flanagan:242965.NH4
        Solute Urea: same as 3092.Field.Flanagan:242965.Urea
        SoilTemperature Temperature
      Manager Sow using a variable rule: same as 3092.Field.Sow using a variable rule
      Report carbon: same as 3092.Field.carbon
      Manager Tillage: same as 3092.Field.Tillage
      Memo
        01-jun, 02-jun, 03-jun, 04-jun, 05-jun, 06-jun, 07-jun, 08-jun, 09-jun
    Report mineralization: same as 3092.mineralization
    Manager fertilize in phases: same as 3092.fertilize in phases
  Simulation 4062
    Clock: Start=2009-01-01; End=2020-12-31
    Summary SummaryFile
    Weather
      FileName=D:/My_BOX/Box/PhD thesis/Objective two/morrow plots 20250821/nwrec_nasa_1986_2022.met
    SoilArbitrator Soil Arbitrator
    Zone Field: Area=1; Slope=0; AspectAngle=0; Altitude=50
      Report yield: same as 3092.Field.yield
      Fertiliser
      SurfaceOrganicMatter: InitialResidueName=maize_stubble; InitialResidueType=grass; InitialResidueMass=500; InitialStandingFraction=0; InitialCPR=0; InitialCNR=100
      MicroClimate: a_interception=0; b_interception=1; c_interception=0; d_interception=0; SoilHeatFluxFraction=0.4; MinimumHeightDiffForNewLayer=0; NightInterceptionFraction=0.5; ReferenceHeight=2
      Plant Maize
      Manager HarvestingMaize: same as 3092.Field.HarvestingMaize
      Report water
        VariableNames:
          [Clock].Today.Year as year
          Mean of Sum([Soil].SoilWater.SWmm) from [Maize].Sowing to [Maize].Harvesting as InCropMeanSoilWater
          Mean of Sum([Soil].SoilWater.SWmm[:2]) from [Maize].Sowing  to [Maize].Harvesting as InCropMeanSoilWaterTopThreeLayers
      Report carbon_change: EventNames=[Clock].EndOfSimulation
        VariableNames=diff of [Soil].Nutrient.Catm[1] from [Clock].StartOfSimulation to [Clock].EndOfSimulation as c_balance
      Soil Flanagan:242965: SoilType=Sable silty clay loam, 0 to 2 percent slopes; LocalName=Sable; Latitude=40.9305556; Longitude=-90.7272; Comments=number of layers: 10, max depth: 2400mm
        DataSource:
          Sable: downloaded by apsimNGpy: `DownloadsurgoSoiltables`
           accessed from SSURGO on: 2025-11-01T13:45:44
        Physical
          Thickness  ParticleSizeSand  ParticleSizeSilt  ParticleSizeClay  Rocks  BD        AirDry     LL15       DUL       SAT       KS
          200        3                 71                26                0      1.39167   0.04875    0.0975     0.453333  0.475     792.45
          200        2.91134           68.9016           25.2316           0      1.31062   0.045911   0.091822   0.426933  0.447338  792.45
          200        2.82529           66.8653           24.4859           0      1.2343    0.0432374  0.0864747  0.402071  0.421287  792.45
          252        2.74179           64.8891           23.7622           0      1.16242   0.0407194  0.0814388  0.378656  0.396753  792.45
          254        2.66076           62.9714           23.0599           0      1.09472   0.0383481  0.0766962  0.356605  0.373648  792.45
          255        2.58212           61.1103           22.3784           0      1.03097   0.0361149  0.0722298  0.335838  0.351889  792.45
          257        2.50581           59.3042           21.717            0      0.970933  0.0340117  0.0680234  0.31628   0.331396  792.45
          258        2.43175           57.5515           21.0752           0      0.91439   0.032031   0.0640621  0.297861  0.312097  792.45
          260        2.35988           55.8506           20.4523           0      0.86114   0.0301657  0.0603314  0.280515  0.293922  792.45
          261        2.29014           54.1999           19.8479           0      0.810991  0.028409   0.056818   0.264179  0.276805  792.45
          Rocks source: Calculated (layer 1, 2, 3, 4, 5, 6, 7, 8)
          SoilCrop MaizeSoil: same as 3092.Field.Flanagan:242965.Physical.MaizeSoil
          SoilCrop SoybeanSoil: same as 3092.Field.Flanagan:242965.Physical.MaizeSoil
          SoilCrop WheatSoil: same as 3092.Field.Flanagan:242965.Physical.MaizeSoil
        WaterBalance SoilWater: same as 3092.Field.Flanagan:242965.SoilWater
        Organic: same as 3092.Field.Flanagan:242965.Organic
        Chemical: same as 3092.Field.Flanagan:242965.Chemical
        Water: Thickness=[200, 200, 200, 252, 254, 255, 257, 258, 260, 261]; FilledFromTop=true
          InitialValues=[0.453333, 0.426933, 0.402071, 0.378656, 0.356605, 0.335838, 0.31628, 0.297861, 0.280515, 0.264179]
        Nutrient
        Solute NO3: same as 3092.Field.Flanagan:242965.NO3
        Solute NH4: same as 3092.Field.Flanagan:242965.NH4
        Solute Urea: same as 3092.Field.Flanagan:242965.Urea
        SoilTemperature Temperature
      Manager Sow using a variable rule: same as 3092.Field.Sow using a variable rule
      Report carbon: same as 3092.Field.carbon
      Manager Tillage: same as 3092.Field.Tillage
      Memo
        01-jun, 02-jun, 03-jun, 04-jun, 05-jun, 06-jun, 07-jun, 08-jun, 09-jun
    Report mineralization: same as 3092.mineralization
    Manager fertilize in phases: same as 3092.fertilize in phases
  Simulation 3091
    Clock: Start=2009-01-01; End=2020-12-31
    Summary SummaryFile
    Weather
      FileName=D:/My_BOX/Box/PhD thesis/Objective two/morrow plots 20250821/nwrec_nasa_1986_2022.met
    SoilArbitrator Soil Arbitrator
    Zone Field: Area=1; Slope=0; AspectAngle=0; Altitude=50
      Report yield: same as 3092.Field.yield
      Fertiliser
      SurfaceOrganicMatter: InitialResidueName=maize_stubble; InitialResidueType=grass; InitialResidueMass=500; InitialStandingFraction=0; InitialCPR=0; InitialCNR=100
      MicroClimate: a_interception=0; b_interception=1; c_interception=0; d_interception=0; SoilHeatFluxFraction=0.4; MinimumHeightDiffForNewLayer=0; NightInterceptionFraction=0.5; ReferenceHeight=2
      Plant Maize
      Manager HarvestingMaize: same as 3092.Field.HarvestingMaize
      Report water
        VariableNames:
          [Clock].Today.Year as year
          Mean of Sum([Soil].SoilWater.SWmm) from [Maize].Sowing to [Maize].Harvesting as InCropMeanSoilWater
          Mean of Sum([Soil].SoilWater.SWmm[:2]) from [Maize].Sowing  to [Maize].Harvesting as InCropMeanSoilWaterTopThreeLayers
      Report carbon_change: EventNames=[Clock].EndOfSimulation
        VariableNames=diff of [Soil].Nutrient.Catm[1] from [Clock].StartOfSimulation to [Clock].EndOfSimulation as c_balance
      Soil Flanagan:242965: SoilType=Sable silty clay loam, 0 to 2 percent slopes; LocalName=Sable; Latitude=40.9305556; Longitude=-90.7272; Comments=number of layers: 10, max depth: 2400mm
        DataSource:
          Sable: downloaded by apsimNGpy: `DownloadsurgoSoiltables`
           accessed from SSURGO on: 2025-11-01T13:45:45
        Physical
          Thickness  ParticleSizeSand  ParticleSizeSilt  ParticleSizeClay  Rocks  BD        AirDry     LL15       DUL       SAT       KS
          200        2                 71.5              26.5              0      1.37333   0.05575    0.1115     0.47      0.481667  792.45
          200        1.94089           69.3869           25.7168           0      1.29336   0.0525034  0.105007   0.442629  0.453617  792.45
          200        1.88353           67.3362           24.9568           0      1.21804   0.0494458  0.0988916  0.416853  0.4272    792.45
          252        1.82786           65.3461           24.2192           0      1.1471    0.0465663  0.0931326  0.392577  0.402322  792.45
          254        1.77384           63.4148           23.5034           0      1.0803    0.0438545  0.087709   0.369715  0.378892  792.45
          255        1.72142           61.5406           22.8088           0      1.01739   0.0413006  0.0826012  0.348185  0.356827  792.45
          257        1.67054           59.7218           22.1347           0      0.958142  0.0388955  0.0777909  0.327908  0.336047  792.45
          258        1.62117           57.9568           21.4805           0      0.902344  0.0366304  0.0732607  0.308812  0.316478  792.45
          260        1.57326           56.2439           20.8456           0      0.849796  0.0344972  0.0689943  0.290828  0.298047  792.45
          261        1.52676           54.5816           20.2296           0      0.800308  0.0324882  0.0649764  0.273892  0.28069   792.45
          Rocks source: Calculated (layer 1, 2, 3, 4, 5, 6, 7, 8)
          SoilCrop MaizeSoil: same as 3092.Field.Flanagan:242965.Physical.MaizeSoil
          SoilCrop SoybeanSoil: same as 3092.Field.Flanagan:242965.Physical.MaizeSoil
          SoilCrop WheatSoil: same as 3092.Field.Flanagan:242965.Physical.MaizeSoil
        WaterBalance SoilWater: same as 3092.Field.Flanagan:242965.SoilWater
        Organic: same as 3092.Field.Flanagan:242965.Organic
        Chemical: same as 3092.Field.Flanagan:242965.Chemical
        Water: Thickness=[200, 200, 200, 252, 254, 255, 257, 258, 260, 261]; FilledFromTop=true
          InitialValues=[0.47, 0.442629, 0.416853, 0.392577, 0.369715, 0.348185, 0.327908, 0.308812, 0.290828, 0.273892]
        Nutrient
        Solute NO3: same as 3092.Field.Flanagan:242965.NO3
        Solute NH4: same as 3092.Field.Flanagan:242965.NH4
        Solute Urea: same as 3092.Field.Flanagan:242965.Urea
        SoilTemperature Temperature
      Manager Sow using a variable rule: same as 3092.Field.Sow using a variable rule
      Report carbon: same as 3092.Field.carbon
      Manager Tillage: same as 3092.Field.Tillage
      Memo
        01-jun, 02-jun, 03-jun, 04-jun, 05-jun, 06-jun, 07-jun, 08-jun, 09-jun
    Report mineralization: same as 3092.mineralization
    Manager fertilize in phases: same as 3092.fertilize in phases
  Simulation 1101
    Clock: Start=2009-01-01; End=2020-12-31
    Summary SummaryFile
    Weather
      FileName=D:/My_BOX/Box/PhD thesis/Objective two/morrow plots 20250821/nwrec_nasa_1986_2022.met
    SoilArbitrator Soil Arbitrator
    Zone Field: Area=1; Slope=0; AspectAngle=0; Altitude=50
      Report yield: same as 3092.Field.yield
      Fertiliser
      SurfaceOrganicMatter: InitialResidueName=maize_stubble; InitialResidueType=grass; InitialResidueMass=500; InitialStandingFraction=0; InitialCPR=0; InitialCNR=100
      MicroClimate: a_interception=0; b_interception=1; c_interception=0; d_interception=0; SoilHeatFluxFraction=0.4; MinimumHeightDiffForNewLayer=0; NightInterceptionFraction=0.5; ReferenceHeight=2
      Plant Maize
      Manager HarvestingMaize: same as 3092.Field.HarvestingMaize
      Report water
        VariableNames:
          [Clock].Today.Year as year
          Mean of Sum([Soil].SoilWater.SWmm) from [Maize].Sowing to [Maize].Harvesting as InCropMeanSoilWater
          Mean of Sum([Soil].SoilWater.SWmm[:2]) from [Maize].Sowing  to [Maize].Harvesting as InCropMeanSoilWaterTopThreeLayers
      Report carbon_change: EventNames=[Clock].EndOfSimulation
        VariableNames=diff of [Soil].Nutrient.Catm[1] from [Clock].StartOfSimulation to [Clock].EndOfSimulation as c_balance
      Soil Flanagan:242965: SoilType=Sable silty clay loam, 0 to 2 percent slopes; LocalName=Sable; Latitude=40.9305556; Longitude=-90.7272; Comments=number of layers: 10, max depth: 2400mm
        DataSource:
          Sable: downloaded by apsimNGpy: `DownloadsurgoSoiltables`
           accessed from SSURGO on: 2025-11-01T13:45:46
        Physical
          Thickness  ParticleSizeSand  ParticleSizeSilt  ParticleSizeClay  Rocks  BD        AirDry     LL15       DUL       SAT       KS
          200        2                 70                28                0      1.30833   0.0558333  0.111667   0.455     0.508333  792.45
          200        1.94089           67.9312           27.1725           0      1.23214   0.0525819  0.105164   0.428503  0.47873   792.45
          200        1.88353           65.9235           26.3694           0      1.16039   0.0495197  0.0990394  0.403549  0.450851  792.45
          252        1.82786           63.9752           25.5901           0      1.09281   0.0466359  0.0932718  0.380048  0.424596  792.45
          254        1.77384           62.0844           24.8338           0      1.02917   0.0439201  0.0878401  0.357916  0.399869  792.45
          255        1.72142           60.2496           24.0998           0      0.969237  0.0413624  0.0827247  0.337072  0.376583  792.45
          257        1.67054           58.4689           23.3876           0      0.912793  0.0389536  0.0779072  0.317443  0.354652  792.45
          258        1.62117           56.7409           22.6964           0      0.859636  0.0366851  0.0733702  0.298956  0.333999  792.45
          260        1.57326           55.064            22.0256           0      0.809575  0.0345487  0.0690975  0.281546  0.314548  792.45
          261        1.52676           53.4366           21.3746           0      0.762429  0.0325368  0.0650736  0.26515   0.29623   792.45
          Rocks source: Calculated (layer 1, 2, 3, 4, 5, 6, 7, 8)
          SoilCrop MaizeSoil: same as 3092.Field.Flanagan:242965.Physical.MaizeSoil
          SoilCrop SoybeanSoil: same as 3092.Field.Flanagan:242965.Physical.MaizeSoil
          SoilCrop WheatSoil: same as 3092.Field.Flanagan:242965.Physical.MaizeSoil
        WaterBalance SoilWater: same as 3092.Field.Flanagan:242965.SoilWater
        Organic: same as 3092.Field.Flanagan:242965.Organic
        Chemical: same as 3092.Field.Flanagan:242965.Chemical
        Water: Thickness=[200, 200, 200, 252, 254, 255, 257, 258, 260, 261]; FilledFromTop=true
          InitialValues=[0.455, 0.428503, 0.403549, 0.380048, 0.357916, 0.337072, 0.317443, 0.298956, 0.281546, 0.26515]
        Nutrient
        Solute NO3: same as 3092.Field.Flanagan:242965.NO3
        Solute NH4: same as 3092.Field.Flanagan:242965.NH4
        Solute Urea: same as 3092.Field.Flanagan:242965.Urea
        SoilTemperature Temperature
      Manager Sow using a variable rule: same as 3092.Field.Sow using a variable rule
      Report carbon: same as 3092.Field.carbon
      Manager Tillage: same as 3092.Field.Tillage
      Memo
        01-jun, 02-jun, 03-jun, 04-jun, 05-jun, 06-jun, 07-jun, 08-jun, 09-jun
    Report mineralization: same as 3092.mineralization
    Manager fertilize in phases: same as 3092.fertilize in phases
  Simulation 4061
    Clock: Start=2009-01-01; End=2020-12-31
    Summary SummaryFile
    Weather
      FileName=D:/My_BOX/Box/PhD thesis/Objective two/morrow plots 20250821/nwrec_nasa_1986_2022.met
    SoilArbitrator Soil Arbitrator
    Zone Field: Area=1; Slope=0; AspectAngle=0; Altitude=50
      Report yield: same as 3092.Field.yield
      Fertiliser
      SurfaceOrganicMatter: InitialResidueName=maize_stubble; InitialResidueType=grass; InitialResidueMass=500; InitialStandingFraction=0; InitialCPR=0; InitialCNR=100
      MicroClimate: a_interception=0; b_interception=1; c_interception=0; d_interception=0; SoilHeatFluxFraction=0.4; MinimumHeightDiffForNewLayer=0; NightInterceptionFraction=0.5; ReferenceHeight=2
      Plant Maize
      Manager HarvestingMaize: same as 3092.Field.HarvestingMaize
      Report water
        VariableNames:
          [Clock].Today.Year as year
          Mean of Sum([Soil].SoilWater.SWmm) from [Maize].Sowing to [Maize].Harvesting as InCropMeanSoilWater
          Mean of Sum([Soil].SoilWater.SWmm[:2]) from [Maize].Sowing  to [Maize].Harvesting as InCropMeanSoilWaterTopThreeLayers
      Report carbon_change: EventNames=[Clock].EndOfSimulation
        VariableNames=diff of [Soil].Nutrient.Catm[1] from [Clock].StartOfSimulation to [Clock].EndOfSimulation as c_balance
      Soil Flanagan:242965: SoilType=Sable silty clay loam, 0 to 2 percent slopes; LocalName=Sable; Latitude=40.9305556; Longitude=-90.7272; Comments=number of layers: 10, max depth: 2400mm
        DataSource:
          Sable: downloaded by apsimNGpy: `DownloadsurgoSoiltables`
           accessed from SSURGO on: 2025-11-01T13:45:48
        Physical
          Thickness  ParticleSizeSand  ParticleSizeSilt  ParticleSizeClay  Rocks  BD        AirDry     LL15       DUL       SAT       KS
          200        3                 70.5              26.5              0      1.305     0.0478333  0.0956667  0.498333  0.508333  792.45
          200        2.91134           68.4164           25.7168           0      1.229     0.0450477  0.0900955  0.469313  0.47873   792.45
          200        2.82529           66.3944           24.9568           0      1.15743   0.0424244  0.0848487  0.441982  0.450851  792.45
          252        2.74179           64.4321           24.2192           0      1.09003   0.0399538  0.0799075  0.416243  0.424596  792.45
          254        2.66076           62.5279           23.5034           0      1.02655   0.037627   0.0752541  0.392003  0.399869  792.45
          255        2.58212           60.6799           22.8088           0      0.966768  0.0354358  0.0708716  0.369174  0.376583  792.45
          257        2.50581           58.8865           22.1347           0      0.910468  0.0333722  0.0667444  0.347675  0.354652  792.45
          258        2.43175           57.1462           21.4805           0      0.857446  0.0314287  0.0628575  0.327428  0.333999  792.45
          260        2.35988           55.4573           20.8456           0      0.807512  0.0295985  0.0591969  0.30836   0.314548  792.45
          261        2.29014           53.8183           20.2296           0      0.760486  0.0278748  0.0557496  0.290403  0.29623   792.45
          Rocks source: Calculated (layer 1, 2, 3, 4, 5, 6, 7, 8)
          SoilCrop MaizeSoil: same as 3092.Field.Flanagan:242965.Physical.MaizeSoil
          SoilCrop SoybeanSoil: same as 3092.Field.Flanagan:242965.Physical.MaizeSoil
          SoilCrop WheatSoil: same as 3092.Field.Flanagan:242965.Physical.MaizeSoil
        WaterBalance SoilWater: same as 3092.Field.Flanagan:242965.SoilWater
        Organic: same as 3092.Field.Flanagan:242965.Organic
        Chemical: same as 3092.Field.Flanagan:242965.Chemical
        Water: Thickness=[200, 200, 200, 252, 254, 255, 257, 258, 260, 261]; FilledFromTop=true
          InitialValues=[0.498333, 0.469313, 0.441982, 0.416243, 0.392003, 0.369174, 0.347675, 0.327428, 0.30836, 0.290403]
        Nutrient
        Solute NO3: same as 3092.Field.Flanagan:242965.NO3
        Solute NH4: same as 3092.Field.Flanagan:242965.NH4
        Solute Urea: same as 3092.Field.Flanagan:242965.Urea
        SoilTemperature Temperature
      Manager Sow using a variable rule: same as 3092.Field.Sow using a variable rule
      Report carbon: same as 3092.Field.carbon
      Manager Tillage: same as 3092.Field.Tillage
      Memo
        01-jun, 02-jun, 03-jun, 04-jun, 05-jun, 06-jun, 07-jun, 08-jun, 09-jun
    Report mineralization: same as 3092.mineralization
    Manager fertilize in phases: same as 3092.fertilize in phases
  Simulation 2032
    Clock: Start=2009-01-01; End=2020-12-31
    Summary SummaryFile
    Weather
      FileName=D:/My_BOX/Box/PhD thesis/Objective two/morrow plots 20250821/nwrec_nasa_1986_2022.met
    SoilArbitrator Soil Arbitrator
    Zone Field: Area=1; Slope=0; AspectAngle=0; Altitude=50
      Report yield: same as 3092.Field.yield
      Fertiliser
      SurfaceOrganicMatter: InitialResidueName=maize_stubble; InitialResidueType=grass; InitialResidueMass=500; InitialStandingFraction=0; InitialCPR=0; InitialCNR=100
      MicroClimate: a_interception=0; b_interception=1; c_interception=0; d_interception=0; SoilHeatFluxFraction=0.4; MinimumHeightDiffForNewLayer=0; NightInterceptionFraction=0.5; ReferenceHeight=2
      Plant Maize
      Manager HarvestingMaize: same as 3092.Field.HarvestingMaize
      Report water
        VariableNames:
          [Clock].Today.Year as year
          Mean of Sum([Soil].SoilWater.SWmm) from [Maize].Sowing to [Maize].Harvesting as InCropMeanSoilWater
          Mean of Sum([Soil].SoilWater.SWmm[:2]) from [Maize].Sowing  to [Maize].Harvesting as InCropMeanSoilWaterTopThreeLayers
      Report carbon_change: EventNames=[Clock].EndOfSimulation
        VariableNames=diff of [Soil].Nutrient.Catm[1] from [Clock].StartOfSimulation to [Clock].EndOfSimulation as c_balance
      Soil Flanagan:242965: SoilType=Sable silty clay loam, 0 to 2 percent slopes; LocalName=Sable; Latitude=40.9305556; Longitude=-90.7272; Comments=number of layers: 10, max depth: 2400mm
        DataSource:
          Sable: downloaded by apsimNGpy: `DownloadsurgoSoiltables`
           accessed from SSURGO on: 2025-11-01T13:45:49
        Physical
          Thickness  ParticleSizeSand  ParticleSizeSilt  ParticleSizeClay  Rocks  BD        AirDry     LL15       DUL       SAT       KS
          200        2.5               70.5              27                0      1.41333   0.0594167  0.118833   0.41      0.466667  792.45
          200        2.42611           68.4164           26.202            0      1.33103   0.0559565  0.111913   0.386123  0.43949   792.45
          200        2.35441           66.3944           25.4276           0      1.25351   0.0526979  0.105396   0.363637  0.413896  792.45
          252        2.28483           64.4321           24.6761           0      1.18052   0.049629   0.0992579  0.342461  0.389793  792.45
          254        2.2173            62.5279           23.9469           0      1.11177   0.0467388  0.0934776  0.322517  0.367093  792.45
          255        2.15177           60.6799           23.2391           0      1.04702   0.0440169  0.0880339  0.303735  0.345715  792.45
          257        2.08818           58.8865           22.5523           0      0.986049  0.0414536  0.0829072  0.286047  0.325582  792.45
          258        2.02646           57.1462           21.8858           0      0.928626  0.0390395  0.0780791  0.269389  0.306622  792.45
          260        1.96657           55.4573           21.239            0      0.874547  0.036766   0.0735321  0.253701  0.288766  792.45
          261        1.90845           53.8183           20.6112           0      0.823618  0.034625   0.0692499  0.238927  0.271949  792.45
          Rocks source: Calculated (layer 1, 2, 3, 4, 5, 6, 7, 8)
          SoilCrop MaizeSoil: same as 3092.Field.Flanagan:242965.Physical.MaizeSoil
          SoilCrop SoybeanSoil: same as 3092.Field.Flanagan:242965.Physical.MaizeSoil
          SoilCrop WheatSoil: same as 3092.Field.Flanagan:242965.Physical.MaizeSoil
        WaterBalance SoilWater: same as 3092.Field.Flanagan:242965.SoilWater
        Organic: same as 3092.Field.Flanagan:242965.Organic
        Chemical: same as 3092.Field.Flanagan:242965.Chemical
        Water: Thickness=[200, 200, 200, 252, 254, 255, 257, 258, 260, 261]; FilledFromTop=true
          InitialValues=[0.41, 0.386123, 0.363637, 0.342461, 0.322517, 0.303735, 0.286047, 0.269389, 0.253701, 0.238927]
        Nutrient
        Solute NO3: same as 3092.Field.Flanagan:242965.NO3
        Solute NH4: same as 3092.Field.Flanagan:242965.NH4
        Solute Urea: same as 3092.Field.Flanagan:242965.Urea
        SoilTemperature Temperature
      Manager Sow using a variable rule: same as 3092.Field.Sow using a variable rule
      Report carbon: same as 3092.Field.carbon
      Manager Tillage: same as 3092.Field.Tillage
      Memo
        01-jun, 02-jun, 03-jun, 04-jun, 05-jun, 06-jun, 07-jun, 08-jun, 09-jun
    Report mineralization: same as 3092.mineralization
    Manager fertilize in phases: same as 3092.fertilize in phases
