Simulations: Version=201
  DataStore
  Folder Replacements
    Plant Maize
      Cultivar B_110e
        Command:
          [Phenology].Juvenile.Target.FixedValue=293.25
          [Phenology].Photosensitive.Target.XYPairs.X=0, 12.5, 24
          [Phenology].Photosensitive.Target.XYPairs.Y=0, 0, 0
          [Phenology].FlagLeafToFlowering.Target.FixedValue=1
          [Phenology].FloweringToGrainFilling.Target.FixedValue=170
          [Phenology].GrainFilling.Target.FixedValue=519.86
          [Phenology].Maturing.Target.FixedValue=1
          [Phenology].MaturityToHarvestRipe.Target.FixedValue=92.47
          [Rachis].DMDemands.Structural.DMDemandFunction.MaximumOrganWt.FixedValue=36
          [Leaf].Photosynthesis.RUE.FixedValue=1.85
          [Root].RootFrontVelocity.PotentialRootFrontVelocity.PreFlowering.RootFrontVelocity.FixedValue=25
          [Root].MaxDailyNUptake.FixedValue=25
      Cultivar pioneer_e
        Command:
          [Phenology].Juvenile.Target.FixedValue=258.203641
          [Phenology].Photosensitive.Target.XYPairs.X=0, 12.5, 24
          [Phenology].Photosensitive.Target.XYPairs.Y=0, 0, 0
          [Phenology].FlagLeafToFlowering.Target.FixedValue=1
          [Phenology].FloweringToGrainFilling.Target.FixedValue=170
          [Phenology].GrainFilling.Target.FixedValue=522.579649
          [Phenology].Maturing.Target.FixedValue=1
          [Phenology].MaturityToHarvestRipe.Target.FixedValue=98.7984215
          [Rachis].DMDemands.Structural.DMDemandFunction.MaximumOrganWt.FixedValue=36
          [Leaf].Photosynthesis.RUE.FixedValue=1.97516019
          [Root].RootFrontVelocity.PotentialRootFrontVelocity.PreFlowering.RootFrontVelocity.FixedValue=28.3058903
          [Root].MaxDailyNUptake.FixedValue=19.1092362
          [Grain].MaximumGrainsPerCob.FixedValue=688.00471
    Plant Wheat
    Plant Soybean
    Plant TropicalPasture: PlantType=TropicalPasture
      AccumulateFunction Age: StartStageName=Germination; EndStageName=Emergence; FractionRemovedOnCut=0; FractionRemovedOnHarvest=0; FractionRemovedOnGraze=0; FractionRemovedOnPrune=0
        Constant day: FixedValue=49
      OrganArbitrator Arbitrator
        BiomassTypeArbitrator DMArbitration
          Folder PotentialPartitioningMethods
            ReallocationMethod
            AllocateFixationMethod
            RetranslocationMethod
            SendPotentialDMAllocationsMethod
          Folder AllocationMethods
            NutrientConstrainedAllocationMethod
            DryMatterAllocationsMethod
          RelativeAllocation ArbitrationMethod
        BiomassTypeArbitrator NArbitration
          Folder PotentialPartitioningMethods
            ReallocationMethod
          Folder ActualPartitioningMethods
            AllocateFixationMethod
            RetranslocationMethod
          Folder AllocationMethods
            NitrogenAllocationsMethod
          RelativeAllocation ArbitrationMethod
          AllocateUptakesMethod
        WaterUptakeMethod
        NitrogenUptakeMethod
      PhotoperiodFunction Photoperiod: Twilight=-6; DayLength=0
      PhotoperiodDeltaFunction PhotoperiodVariation: Twilight=-6
      Phenology
        MultiplyFunction ThermalTime
          SubDailyInterpolation BaseThermalTime: agregationMethod=0
            XYPairs Response: X=[0, 25, 45]; Y=[0, 13, 0]
            ThreeHourAirTemperature InterpolationMethod
        Memo Description
          The duration of each phenological phase in white clover is controlled either by the accumulation of thermal time or photoperiod.
        GerminatingPhase Germinating: Start=Sowing; End=Germination; IsEmerged=false
          VariableReference ThermalTime: VariableName=[Phenology].ThermalTime
          Memo Description
            Germination in most clover species is very variable (e.g. [HamptonEtAl1987]; [MurrayThesis2012]), with about 70-90% of seeds germinating for white clover. Temperatures between 5 and 20^o^C affect the speed of germination but not the final percentage ([HamptonEtAl1987]).  The model does not consider variable germination rate, thus the population should be adjusted by the user when sowing to account for less than 100% germination.
          Constant MinSoilTemperature: FixedValue=0
        EmergingPhase Emerging: Start=Germination; End=Emergence; IsEmerged=false; TTForTimeStep=0
          Memo Description
            White clover has small seeds and these need to be placed near the soil surface to emerge successfully.  Best emergence rates occur when seeds are sown at depth of 5mm ([Hyde1950]; [MurrayAndClements1993]), and few plants will emerge from seeds deeper than 40mm.  Variations in germination rate due to depth are not currently simulated by the model, however the sowing depth does affect timing of emergence, in combination with temperature.  This is controlled by the parameter ShootRate, which is the shoot elongation rate as function of thermal time (mm/oCd).
            Emergence of white clover occurs a few days after germination ([Hyde1950]; [MootEtAll2000]), but this is quite variable (taking 5-20 days).  Both temperature and depth of seed are important factors.  Thermal time for the emergence of white clover (cv. Huia and Nomad) has been reported as being approximately 150oCd ([MootEtAll2000]; [MurrayThesis2012]), and there seem to be no significant variations between NZ cultivars ([HamptonEtAl1987]).
          VariableReference ThermalTime: VariableName=[Phenology].ThermalTime
          Constant Target: FixedValue=400; Units=oCd
        GenericPhase Vegetative: Start=Emergence; End=Induction; IsEmerged=true
          Constant MaxThermalTimeToBolt: FixedValue=3200; Units=oCd
          Memo Description
            During this phase, white clover plants partition biomass to leaf+petiole, stolon, and root+taproot organs. Initially, this phase starts when plants emerge, but it is also triggered as phenology resets after the end of the reproductive phase.  The vegetative phase ends when the inductive phase starts.
            White clover is typically described as either short day or short-long day species ([Thomas1961]; [ChapterThomas1980]), which means induction is caused by exposure to short daylight lengths but reproductive growth may also be triggered by a period with long photoperiod.  Exposure to cold temperature can also lead to induction with subsequent initiation of inflorescence development when days become warmer and longer ([Thomas1981_SLD]; [BeattyThesis1959]). The variability in response of induction to environmental conditions are considerably large in white clover. In most stands at least some plants will show reproductive growth regardless of environmental conditions. The variations show some trend when contrasting large- to short-leaved cultivars or for cultivars from different origins (especially latitude), but the effect of genotypes within each group was not found to be significant (e.g. [ChapterThomas1980]; [Thomas1982_Comparison]; [Norris1984_daylength]; [BeattyThesis1959]).
            Inducing daylight length seem to be 12 hours or less, while temperatures need to be below about 10^o^C ([Thomas1979_Natural]; [Thomas1981_SLD]; [Thomas1982_Comparison]; [Norris1984_daylength]; [Norris1985_Temperature]). The base white clover model uses the accumulation of days under either low temperature or short photoperiod to trigger the end of the vegetative phase.
          Constant Target: FixedValue=25; Units=days
          AddFunction Progression
            LinearInterpolationFunction ShortDays
              XYPairs: X=[13, 16]; Y=[1, 1]
                LinearInterpolationFunction ShortDays
                  XYPairs: X=[13, 16]; Y=[1, 1]
                  VariableReference XValue: VariableName=[Phenology].Photoperiod
              VariableReference XValue: VariableName=[Phenology].Photoperiod
            LinearInterpolationFunction LowTemperatures
              XYPairs: X=[0, 2, 6.5, 8, 11, 15]; Y=[0, 0, 1, 1, 0, 0]
              VariableReference XValue: VariableName=[Phenology].ThermalTime
          VariableReference ThermalTime: VariableName=[Phenology].ThermalTime
        GenericPhase Inductive: Start=Induction; End=Flowering; IsEmerged=true
          Memo Description
            During this phase the switch plants await for the environmental cue to start the reproductive growth. Physiological and metabolic processes remain the same as for the vegetative phase; plants partition biomass to leaf+petiole, stolon, and root+taproot organs. The inductive phase starts when plants accumulate a given number of days under inductive conditions, i.e. low temperatures and/or short daylight lengths ([Thomas1979_Natural]; [Norris1984_daylength]; [Norris1985_Temperature]).  The phase ends when the plants start reproduction growth, with the emergence of flower buds.
            There is a large level of variation in white clover plants and their flowering response to environmental conditions, with some plants reaching reproductive growth in almost any stand ([Thomas1979_Natural]; [BeattyThesis1959]). Nonetheless, in natural conditions reproductive growth is typically triggered by long daylight lengths, with reported values around 14 hours ([ChapterThomas1980]; [Thomas1981_SLD];[Norris1984_daylength]).  The accumulation of days under long photoperiod is used by the model to trigger the end of the inductive phase.
          Constant Target: FixedValue=60; Units=days
          LinearInterpolationFunction Progression
            XYPairs: X=[10, 11.5, 14, 15, 16]; Y=[0, 0, 1, 1, 1]
            VariableReference XValue: VariableName=[Phenology].Photoperiod
        GenericPhase Reproductive: Start=Flowering; End=Ripening; IsEmerged=true
          Memo Description
            During this phase the plant is partitioning biomass to all organs, including reproductive organs (peduncles, inflorescence, and seeds). The current model does not describe the flower and seeds development explicitly, only a generic organ referred to as *inflorescence* is defined. The main reason for this is the variability and complex phenology of reproduction of white clover; with seeds maturing while new flowers are still being initiated over summer and early autumn (e.g. [HydeEtAl1959]; [Thomas1987Chapter]; [MedeirosAndSteiner2000]). Also due to their similarities and the fact that a population is described in the model (instead of single plants), peduncles and petioles are simulated as a single organ.
            Flower emergence typically starts in spring, peaks at the beginning of summer and continues until autumn ([ChapterThomas1980]; [MacfarlaneAndSheath1984]; [MarshalEtAl1993_Production]). The actual periods vary for different cultivars, and some have flowers nearly all year (albeit with low frequency over winter).  A drop in flower numbers in mid-summer and subsequent increase in early autumn has been shown in some cultivars and has been linked to water deficit or inhibition due to long days ([ChapterThomas1980]; [MacfarlaneAndSheath1984]).  Management practices, such as applying N fertiliser, irrigation and defoliations, have, in general, a positive impact on flower and seed production ([ChapterThomas1980]; [MedeirosAndSteiner2000]; [BissuelBelaygueEtAl2002_flower]), but there is large variation in the responses, depending on the cultivars as well as the extent and timing of the intervention. Currently, the model does not account for the effect of this practices explicitly, although it is expected that some effects are captured by changes in biomass allocation caused by actions such as irrigation of application of fertilisers.
          Constant Target: FixedValue=1; Units=days
          VariableReference ThermalTime: VariableName=[Phenology].ThermalTime
          LinearInterpolationFunction Progression
            XYPairs: X=[9, 11.5, 14, 15]; Y=[1, 1, 0, 0]
            VariableReference XValue: VariableName=[Phenology].Photoperiod
        GotoPhase PhenologyRewind: Start=Ripening; IsEmerged=true; PhaseNameToGoto=Vegetative; RemovalType=0
        PhotoperiodDeltaFunction PhotoperiodVariation: Twilight=-6
        PhotoperiodFunction Photoperiod: Twilight=-6; DayLength=0
      PerennialLeaf Leaf: MaintenanceRespiration=0; GrowthRespiration=0; Albedo=0.26; Gsmax350=0.006; R50=200; LAI=0; Height=0; FRGR=0; PotentialEP=0; WaterDemand=0
        MultiplyFunction InitialWtFunction
          Constant InitialPlantWt: FixedValue=0.8; Units=g/plant
          VariableReference Population: VariableName=[Plant].Population
        Constant ExtinctionCoefficient: FixedValue=0.65
          Memo
            For the Brazilian Brachiaria data (Brachiaria brizantha cv. BRS Piatã), the extinction coefficient was 0.65 [Bosi_et_al_2020a].
        Constant ExtinctionCoefficientDead: FixedValue=0.4
          Memo
            Value of 0.57 from
            Radiation Interception and Growth of Planted and Coppice Stands of Four Fast-GrowingTropical Trees
            Author(s): Robin A. Harrington and James H. Fownes
            Source: Journal of Applied Ecology, Vol. 32, No. 1 (Feb., 1995), pp. 1-8

            But their data suggests a value of 0.3
        LinearInterpolationFunction HeightFunction
          XYPairs: X=[0, 100, 1000]; Y=[100, 300, 1400]
          VariableReference XValue: VariableName=[TotalLive].Wt
        Constant MaximumNConc: FixedValue=0.021
        Constant MinimumNConc: FixedValue=0.005
        BiomassRemoval BiomassRemovalDefaults: HarvestFractionLiveToRemove=0; HarvestFractionDeadToRemove=0; HarvestFractionLiveToResidue=0; HarvestFractionDeadToResidue=0
        MultiplyFunction LeafResidenceTime
          Constant Potential: FixedValue=80; Units=days
          LinearInterpolationFunction LAIFactor
            XYPairs: X=[0, 5, 6, 7, 8, 9]; Y=[1, 1, 0.8, 0.7, 0.6, 0.2]
            VariableReference XValue: VariableName=[Leaf].LAI
            Memo
              This parameter calculates the effect of self-shading on senescence of leaves.
          LinearInterpolationFunction FloweringFactor
            XYPairs: X=[0, 5, 6, 7]; Y=[1, 1, 0.7, 0.7]
            VariableReference XValue: VariableName=[TropicalPasture].Phenology.Stage
            Memo
              This parameter calculates the effect of phenology on senescence of leaves.
          LinearInterpolationFunction WaterDeficitFactor
            XYPairs: X=[0, 0.9, 1]; Y=[1, 1, 1]
            VariableReference XValue: VariableName=[Leaf].Fw
            Memo
              This parameter calculates the effect of water stress on senescence of leaves.
        LinearInterpolationFunction LeafDetachmentTime
          XYPairs: X=[0, 1, 2, 3, 4, 5]; Y=[30, 30, 30, 30, 30, 30]
          VariableReference XValue: VariableName=[TropicalPasture].Phenology.Stage
          LinearInterpolationFunction SoilMoistureFactor
            XYPairs: X=[0, 0.5, 0.75, 1]; Y=[0.1, 0.1, 0.25, 1]
            VariableReference XValue: VariableName=[Leaf].Fw
        Constant NReallocationFactor: FixedValue=0.5
        Constant DMRetranslocationFactor: FixedValue=0
        Constant NRetranslocationFactor: FixedValue=0
        RUEModel Photosynthesis
          Constant RUE: FixedValue=1.44
            Memo
              [Bosi_et_al_2020a] found a RUE of 2.31 g/MJ PAR for Brachiaria brizantha cv. BRS Piata (C4 grass) in irrigated experiment, applying a correction factor for limiting temperature and not considering data in flowering period (it changes the partitioning). Converting this to total radiation was obtained 1.16 g/MJ and adding 20% to account for root production gives 1.44 g/MJ.
          WeightedTemperatureFunction FT: MaximumTemperatureWeighting=0.75
            XYPairs: X=[0, 30, 40, 43]; Y=[0, 1, 1, 0]
            Memo
              [Bosi_et_al_2020b] found a base temperature value of 8.9oC for Brachiaria brizantha cv. BRS Piata (C4 grass). Values of the two optimum temperatures and of maximum temperature were obtained from [Pequeno_et_al_2014].
          LinearInterpolationFunction FN
            VariableReference XValue: VariableName=[Leaf].Fn
            XYPairs: X=[0, 1, 1.5]; Y=[0, 1, 1]
          RUECO2Function FCO2: PhotosyntheticPathway=C4
          LinearInterpolationFunction FVPD
            XYPairs: X=[0, 10, 12.5, 40]; Y=[1, 1, 0.95, 0]
            VariableReference XValue: VariableName=[Leaf].Photosynthesis.VPD
          LinearInterpolationFunction FW
            VariableReference XValue: VariableName=[Leaf].Fw
            XYPairs: X=[0, 0.3]; Y=[0, 1]
          VariableReference RadnInt: VariableName=[Leaf].RadiationIntercepted
        MinimumFunction FRGRFunction
          VariableReference FT: VariableName=[Leaf].Photosynthesis.FT
          VariableReference FN: VariableName=[Leaf].Photosynthesis.FN
          VariableReference FVPD: VariableName=[Leaf].Photosynthesis.FVPD
          MultiplyFunction PotentialPhotosynthesis
            VariableReference RUE: VariableName=[Leaf].Photosynthesis.RUE
            MaximumFunction Radiation
              VariableReference RadnInt: VariableName=[Leaf].RadiationIntercepted
              Constant MinRadn: FixedValue=1e-05
        MultiplyFunction SpecificLeafAreaFunction
          LinearInterpolationFunction StandardSLA
            XYPairs: X=[0, 0.3, 0.7, 2]; Y=[0.015, 0.018, 0.02, 0.02]
            VariableReference XValue: VariableName=[TropicalPasture].Age
            Memo
              StandardSLA is the specific leaf area of plants that were not submitted to any stress. The values used here were obtained from [Bosi_et_al_2020b].
          LinearInterpolationFunction WaterFactor
            XYPairs: X=[0, 0.8, 1]; Y=[0, 0.4, 1]
            VariableReference XValue: VariableName=[Leaf].Fw
            Memo
              This factor calculates the effect of water deficit on specific leaf area. The values used here were calibrated by [Bosi_et_al_2020a].
        Constant MinimumLAI: FixedValue=0.03; Units=m2/m2
        Constant DMConversionEfficiency: FixedValue=1
        Constant CarbonConcentration: FixedValue=0.4
        Constant LeafDevelopmentRate: FixedValue=1
        Constant StomatalConductanceCO2Modifier: FixedValue=1
        NutrientPoolFunctions DMDemands
          MultiplyFunction Structural
            PartitionFractionDemandFunction DMDemandFunction
              LinearInterpolationFunction PartitionFraction
                XYPairs: X=[0, 1, 2, 3, 4, 5, 6, 7]; Y=[0.5, 0.5, 0.55, 0.55, 0.55, 0.55, 0.55, 0.55]
                VariableReference XValue: VariableName=[TropicalPasture].Phenology.Stage
                Memo
                  PartitionFraction is driven by phenology. The values used here were calibrated by [Bosi_et_al_2020a] for Brachiaria brizantha cv. BRS Piatã.
            Constant StructuralFraction: FixedValue=1
          Constant Metabolic: FixedValue=0
          StorageDMDemandFunction Storage
            SubtractFunction StorageFraction
              Constant One: FixedValue=1
              VariableReference StructuralFraction: VariableName=[Leaf].DMDemands.Structural.StructuralFraction
        NutrientPoolFunctions NDemands
          MultiplyFunction Structural
            VariableReference MinNconc: VariableName=[Leaf].minimumNconc
            VariableReference PotentialDMAllocation: VariableName=[Leaf].potentialDMAllocation.Structural
          Constant Metabolic: FixedValue=0
          StorageNDemandFunction Storage
            VariableReference MaxNconc: VariableName=[Leaf].MaximumNconc
            Constant NitrogenDemandSwitch: FixedValue=1
        MultiplyFunction SenescenceRate
          Memo Description
            The reference senescence rate is adjusted using generic relationships to environmental factors, such as temperature and soil moisture.  These are based on general knowledge from other plant models.
          VariableReference ReferenceRate: VariableName=[Leaf].SenescenceRate.ReferenceRate
          LinearInterpolationFunction StageFactor
            XYPairs: X=[3, 4, 5.5, 5.8, 6]; Y=[0.5, 1, 1, 1.5, 1.5]
            VariableReference XValue: VariableName=[Phenology].Stage
          LinearInterpolationFunction CoverFactor
            XYPairs: X=[0, 2, 4, 5, 7]; Y=[0, 0.1, 0.5, 0.5, 1.5]
            VariableReference XValue: VariableName=[Leaf].LAI
          WeightedTemperatureFunction TemperatureFactor: MaximumTemperatureWeighting=0.5
            XYPairs: X=[-20, -5, 0, 5, 17, 28, 45]; Y=[1.5, 0.25, 0.1, 0.1, 1, 1, 1.5]
          LinearInterpolationFunction SoilMoistureFactor
            XYPairs: X=[0, 0.5, 1]; Y=[2, 1, 1]
            VariableReference XValue: VariableName=[Leaf].Fw
        LinearInterpolationFunction LeafKillFraction
          XYPairs: X=[0, 2]; Y=[0.14, 0]
          VariableReference XValue: VariableName=[Weather].MinT
          Memo
            This function calculates the fraction of leaf live mass that is killed by frost. That fraction is calculated based on minimum air temperature.
        VariableReference ThermalTime: VariableName=[Phenology].ThermalTime
      GenericOrgan Stem: IsAboveGround=true
        Memo Description
          The stem organ is used to describe the growth of stem plus inflorescence.
        NutrientPoolFunctions InitialWt
          Constant Structural: FixedValue=0; Units=g/m^2
          Constant Metabolic: FixedValue=0
          Constant Storage: FixedValue=0
        Constant MaximumNConc: FixedValue=0.003
        Constant MinimumNConc: FixedValue=0.001
        VariableReference CriticalNConc: VariableName=[Stem].MinimumNConc
        Constant NitrogenDemandSwitch: FixedValue=1
        BiomassRemoval BiomassRemovalDefaults: HarvestFractionLiveToRemove=0; HarvestFractionDeadToRemove=0; HarvestFractionLiveToResidue=0; HarvestFractionDeadToResidue=0
        LinearInterpolationFunction SenescenceRate
          XYPairs: X=[0, 1, 2, 3, 4, 5, 6, 7]; Y=[0.005, 0.005, 0.005, 0.005, 0.005, 0.005, 0.015, 0.015]
          VariableReference XValue: VariableName=[TropicalPasture].Phenology.Stage
          Memo
            Stem senescence rate is driven by phenology. The values used here were calibrated by [Bosi_et_al_2020a] for Brachiaria brizantha cv. BRS Piatã.
        LinearInterpolationFunction DetachmentRateFunction
          XYPairs: X=[0, 1, 2, 3, 4, 5, 6, 7]; Y=[0.01, 0.01, 0.01, 0.01, 0.01, 0.01, 0.01, 0.01]
          VariableReference XValue: VariableName=[TropicalPasture].Phenology.Stage
        Constant DMReallocationFactor: FixedValue=0
        Constant NReallocationFactor: FixedValue=0
        Constant DMRetranslocationFactor: FixedValue=0
        Constant NRetranslocationFactor: FixedValue=0
        Constant DMConversionEfficiency: FixedValue=1; Units=0-1
        Constant MaintenanceRespirationFunction: FixedValue=0; Units=0-1
        Constant RemobilisationCost: FixedValue=0
        Constant CarbonConcentration: FixedValue=0.4
        NutrientDemandFunctions DMDemands
          MultiplyFunction Structural
            PartitionFractionDemandFunction DMDemandFunction
              LinearInterpolationFunction PartitionFraction
                XYPairs: X=[0, 1, 2, 3, 4, 5, 6, 7]; Y=[0.17, 0.17, 0.2, 0.25, 0.45, 0.45, 0.45, 0.25]
                VariableReference XValue: VariableName=[TropicalPasture].Phenology.Stage
                Memo
                  PartitionFraction is driven by phenology. The values used here were calibrated by [Bosi_et_al_2020a] for Brachiaria brizantha cv. BRS Piatã.
            Constant StructuralFraction: FixedValue=1; Units=g/g
          Constant Metabolic: FixedValue=0
          StorageDMDemandFunction Storage
            SubtractFunction StorageFraction
              Constant One: FixedValue=1
              VariableReference StructuralFraction: VariableName=[Stem].DMDemands.Structural.StructuralFraction
          Constant QStructuralPriority: FixedValue=1
          Constant QMetabolicPriority: FixedValue=1
          Constant QStoragePriority: FixedValue=1
        NutrientDemandFunctions NDemands
          MultiplyFunction Structural
            VariableReference MinNconc: VariableName=[Stem].minimumNconc
            VariableReference PotentialDMAllocation: VariableName=[Stem].potentialDMAllocation.Structural
          MultiplyFunction Metabolic
            SubtractFunction MetabolicNconc
              VariableReference CritNconc: VariableName=[Stem].criticalNConc
              VariableReference MinNconc: VariableName=[Stem].minimumNconc
            VariableReference PotentialDMAllocation: VariableName=[Stem].potentialDMAllocation.Structural
          StorageNDemandFunction Storage
            VariableReference NitrogenDemandSwitch: VariableName=[Stem].nitrogenDemandSwitch
            VariableReference MaxNconc: VariableName=[Stem].maximumNconc
          Constant QStructuralPriority: FixedValue=1
          Constant QMetabolicPriority: FixedValue=1
          Constant QStoragePriority: FixedValue=1
        RetranslocateNonStructural RetranslocateNitrogen
        Constant Photosynthesis: FixedValue=0
        VariableReference initialNConcFunction: VariableName=[Stem].MinimumNConc
      Root: GrowthRespiration=0; MaintenanceRespiration=0
        RootShapeCylinder RootShape
        NutrientPoolFunctions InitialWt
          Constant Structural: FixedValue=0.02; Units=g/plant
          Constant Metabolic: FixedValue=0
          Constant Storage: FixedValue=0
        Constant RootFrontVelocity: FixedValue=20
        Constant MaximumRootDepth: FixedValue=1000000
        Constant SpecificRootLength: FixedValue=100; Units=m/g
        Constant MaximumNConc: FixedValue=0.003
        Constant MinimumNConc: FixedValue=0.001
        VariableReference CriticalNConc: VariableName=[Root].MinimumNConc
        Constant NitrogenDemandSwitch: FixedValue=1
        Constant MaxDailyNUptake: FixedValue=8
        LinearInterpolationFunction KNO3
          XYPairs: X=[0, 0.003]; Y=[0.03, 0.03]
          VariableReference XValue: VariableName=[Root].LengthDensity
        LinearInterpolationFunction KNH4
          XYPairs: X=[0, 0.003]; Y=[0, 0]
          VariableReference XValue: VariableName=[Root].LengthDensity
        LinearInterpolationFunction NUptakeSWFactor
          XYPairs: X=[0, 0.5, 1]; Y=[1, 1, 1]
          VariableReference XValue: VariableName=[Root].RWC
        LinearInterpolationFunction KLModifier
          XYPairs: X=[0, 3, 10]; Y=[1, 1, 1]
          VariableReference XValue: VariableName=[Leaf].LAI
        BiomassRemoval BiomassRemovalDefaults: HarvestFractionLiveToRemove=0; HarvestFractionDeadToRemove=0; HarvestFractionLiveToResidue=0; HarvestFractionDeadToResidue=0
        Constant SenescenceRate: FixedValue=0.001
        Constant DMRetranslocationFactor: FixedValue=0
        Constant NRetranslocationFactor: FixedValue=0
        Constant DMConversionEfficiency: FixedValue=1
        Constant MaintenanceRespirationFunction: FixedValue=1
        Constant RemobilisationCost: FixedValue=0
        Constant CarbonConcentration: FixedValue=0.4
        NutrientDemandFunctions DMDemands
          MultiplyFunction Structural
            PartitionFractionDemandFunction DMDemandFunction
              LinearInterpolationFunction PartitionFraction
                XYPairs: X=[0, 1, 2, 3, 4, 5, 6, 7]; Y=[0.25, 0.25, 0.19, 0.15, 0, 0, 0, 0.15]
                VariableReference XValue: VariableName=[TropicalPasture].Phenology.Stage
                Memo
                  PartitionFraction is driven by phenology. The values used here were calibrated by [Bosi_et_al_2020a] for Brachiaria brizantha cv. BRS Piatã. Partitioning to root is considering 75% of the partitioning for belowground growth.
            Constant StructuralFraction: FixedValue=1; Units=g/g
          Constant Metabolic: FixedValue=0
          StorageDMDemandFunction Storage
            SubtractFunction StorageFraction
              Constant One: FixedValue=1
              VariableReference StructuralFraction: VariableName=[Root].DMDemands.Structural.StructuralFraction
          Constant QStructuralPriority: FixedValue=1
          Constant QMetabolicPriority: FixedValue=1
          Constant QStoragePriority: FixedValue=1
        NutrientDemandFunctions NDemands
          MultiplyFunction Structural
            VariableReference MinNconc: VariableName=[Root].minimumNconc
            VariableReference PotentialDMAllocation: VariableName=[Root].potentialDMAllocation.Structural
          MultiplyFunction Metabolic
            SubtractFunction MetabolicNconc
              VariableReference CritNconc: VariableName=[Root].criticalNConc
              VariableReference MinNconc: VariableName=[Root].minimumNconc
            VariableReference PotentialDMAllocation: VariableName=[Root].potentialDMAllocation.Structural
          StorageNDemandFunction Storage
            VariableReference NitrogenDemandSwitch: VariableName=[Root].nitrogenDemandSwitch
            VariableReference MaxNconc: VariableName=[Root].maximumNconc
          Constant QStructuralPriority: FixedValue=1
          Constant QMetabolicPriority: FixedValue=1
          Constant QStoragePriority: FixedValue=1
        Constant RootDepthStressFactor: FixedValue=1
      GenericOrgan StorageOrgan: IsAboveGround=false
        Memo Description
          StorageOrgan is used to describe the crown of bunch grasses and it may also be used to simulate stolon or rhizome for species that have these. Currently, this organ is considered as a belowground organ. Partitioning to StorageOrgan is considered 25% of the partitioning for belowground growth.
        NutrientPoolFunctions InitialWt: same as Replacements.TropicalPasture.Stem.InitialWt
        Constant MaximumNConc: FixedValue=0.003
        Constant MinimumNConc: FixedValue=0.001
        VariableReference CriticalNConc: VariableName=[StorageOrgan].MinimumNConc
        Constant NitrogenDemandSwitch: FixedValue=1
        BiomassRemoval BiomassRemovalDefaults: HarvestFractionLiveToRemove=0; HarvestFractionDeadToRemove=0; HarvestFractionLiveToResidue=0; HarvestFractionDeadToResidue=0
        Constant DetachmentRateFunction: FixedValue=1; Units=/d
        Constant DMReallocationFactor: FixedValue=0
        Constant NReallocationFactor: FixedValue=1
        MultiplyFunction DMRetranslocationFactor
          Constant Potential: FixedValue=0.499
          LinearInterpolationFunction FloweringFactor
            XYPairs: X=[0, 1, 2, 3, 4, 5, 6, 7]; Y=[1, 1, 1, 1, 1, 1, 1, 1]
            VariableReference XValue: VariableName=[TropicalPasture].Phenology.Stage
            Memo
              This parameter calculates the effect of phenology on DM retranslocation from the storage organ to other organs.
          LinearInterpolationFunction LAIFactor
            XYPairs: X=[0, 0.01, 0.77, 1.2, 1.21, 7, 8, 9]; Y=[2, 0.5, 0, 0, 0, 0, 0, 0]
            VariableReference XValue: VariableName=[TropicalPasture].Leaf.LAI
            Memo
              This parameter calculates the effect of LAI on DM retranslocation from the storage organ to other organs.
        MultiplyFunction NRetranslocationFactor
          Constant Potential: FixedValue=0
          LinearInterpolationFunction FnFactor
            XYPairs: X=[0, 0.5, 1]; Y=[1, 0, 0]
            VariableReference XValue: VariableName=[Leaf].Fn
            Memo
              This parameter calculates the effect of N stress on N retranslocation from the storage organ to other organs.
          LinearInterpolationFunction LAIFactor
            XYPairs: X=[0, 0.5, 7, 8, 9]; Y=[1, 1, 0, 0, 0]
            VariableReference XValue: VariableName=[Leaf].LAI
            Memo
              This parameter calculates the effect of LAI on N retranslocation from the storage organ to other organs.
        Constant DMConversionEfficiency: FixedValue=1; Units=0-1
        Constant MaintenanceRespirationFunction: FixedValue=0; Units=0-1
        Constant RemobilisationCost: FixedValue=0
        Constant CarbonConcentration: FixedValue=0.4
        NutrientDemandFunctions DMDemands
          MultiplyFunction Structural
            PartitionFractionDemandFunction DMDemandFunction
              LinearInterpolationFunction PartitionFraction
                XYPairs: X=[0, 1, 2, 3, 4, 5, 6, 7]; Y=[0.08, 0.08, 0.06, 0.05, 0, 0, 0, 0.05]
                VariableReference XValue: VariableName=[TropicalPasture].Phenology.Stage
                Memo
                  PartitionFraction is driven by phenology. The values used here were calibrated by [Bosi_et_al_2020a] for Brachiaria brizantha cv. BRS Piatã.
            Constant StructuralFraction: FixedValue=0.5; Units=g/g
          Constant Metabolic: FixedValue=0
          StorageDMDemandFunction Storage
            SubtractFunction StorageFraction
              Constant One: FixedValue=1
              VariableReference StructuralFraction: VariableName=[StorageOrgan].DMDemands.Structural.StructuralFraction
          Constant QStructuralPriority: FixedValue=1
          Constant QMetabolicPriority: FixedValue=1
          Constant QStoragePriority: FixedValue=1
        NutrientDemandFunctions NDemands
          MultiplyFunction Structural
            VariableReference MinNconc: VariableName=[StorageOrgan].minimumNconc
            VariableReference PotentialDMAllocation: VariableName=[StorageOrgan].potentialDMAllocation.Structural
          MultiplyFunction Metabolic
            SubtractFunction MetabolicNconc
              VariableReference CritNconc: VariableName=[StorageOrgan].criticalNConc
              VariableReference MinNconc: VariableName=[StorageOrgan].minimumNconc
            VariableReference PotentialDMAllocation: VariableName=[StorageOrgan].potentialDMAllocation.Structural
          StorageNDemandFunction Storage
            VariableReference NitrogenDemandSwitch: VariableName=[StorageOrgan].nitrogenDemandSwitch
            VariableReference MaxNconc: VariableName=[StorageOrgan].maximumNconc
          Constant QStructuralPriority: FixedValue=1
          Constant QMetabolicPriority: FixedValue=1
          Constant QStoragePriority: FixedValue=1
        RetranslocateNonStructural RetranslocateNitrogen
        Constant Photosynthesis: FixedValue=0
        VariableReference initialNConcFunction: VariableName=[StorageOrgan].MinimumNConc
        MultiplyFunction SenescenceRate
          Memo Description
            The reference senescence rate is adjusted using generic relationships to environmental factors, such as temperature and soil moisture.  These are based on general knowledge from other plant models.
          Constant ReferenceRate: FixedValue=0.01; Units=/day
          LinearInterpolationFunction StageFactor
            XYPairs: X=[3, 4, 6]; Y=[0.5, 1, 1]
            VariableReference XValue: VariableName=[Phenology].Stage
          WeightedTemperatureFunction TemperatureFactor: MaximumTemperatureWeighting=0.5
            XYPairs: X=[-20, -5, 0, 5, 17, 32.2, 45]; Y=[1.5, 0.25, 0.1, 0.1, 1, 1, 1.25]
          LinearInterpolationFunction SoilMoistureFactor
            XYPairs: X=[0, 0.5, 1]; Y=[2, 1, 1]
            VariableReference XValue: VariableName=[Leaf].Fw
      CompositeBiomass AboveGround: OrganNames=[Leaf, Stem]; IncludeLive=true; IncludeDead=true
      CompositeBiomass AboveGroundLive: OrganNames=[Leaf, Stem]; IncludeLive=true; IncludeDead=false
      CompositeBiomass AboveGroundDead: OrganNames=[Leaf, Stem]; IncludeLive=false; IncludeDead=true
      CompositeBiomass BelowGround: OrganNames=[Root, StorageOrgan]; IncludeLive=true; IncludeDead=true
      CompositeBiomass Total: OrganNames=[Leaf, Stem, Root, StorageOrgan]; IncludeLive=true; IncludeDead=true
      CompositeBiomass TotalLive: OrganNames=[Leaf, Stem, Root, StorageOrgan]; IncludeLive=true; IncludeDead=false
      CompositeBiomass TotalDead: OrganNames=[Leaf, Stem, Root, StorageOrgan]; IncludeLive=false; IncludeDead=true
      CompositeBiomass Forage: OrganNames=[Leaf, Stem]; IncludeLive=true; IncludeDead=true
      Constant MortalityRate: FixedValue=0
      Constant SeedMortalityRate: FixedValue=0
      Cultivar SwitchGrass8
        Command:
          [Leaf].Photosynthesis.RUE.FixedValue =2.45
          [Leaf].ExtinctionCoefficient.FixedValue = 0.65
          [Root].MaximumRootDepth.FixedValue = 3000
          //[Root].SpecificRootLength.FixedValue = 100
          /// frost kill ratio
          [Leaf].LeafKillFraction.XYPairs.X = -35,  -2, //0,  17, 28, 42, 45
          [Leaf].LeafKillFraction.XYPairs.Y = 0.014, 0.0, //0, 0, 0, 0, 0.001
          ///Temperature factors
          [Leaf].Photosynthesis.FT.XYPairs.X =     0, 2.5,  15,   32, 50
          [Leaf].Photosynthesis.FT.XYPairs.Y =      0,  0.0,  1,  1, 0
          [Leaf].Photosynthesis.FT.MaximumTemperatureWeighting = 0.75
          [Leaf].MinimumLAI.FixedValue = 0.1
          [Leaf].InitialWtFunction.InitialPlantWt.FixedValue = 0.8
          [Leaf].MaximumNConc.FixedValue = 0.023
          [Leaf].MinimumNConc.FixedValue = 0.0045
      Cultivar SwitchGrass72
        Command:
          [Leaf].Photosynthesis.RUE.FixedValue =2.45
          [Leaf].ExtinctionCoefficient.FixedValue = 0.5
          [Root].MaximumRootDepth.FixedValue = 3000
          //[Root].SpecificRootLength.FixedValue = 100
          /// frost kill ratio
          [Leaf].LeafKillFraction.XYPairs.X = -35,  -5,
          [Leaf].LeafKillFraction.XYPairs.Y = 0.014, 0.0,
          ///Temperature factors
          [Leaf].Photosynthesis.FT.XYPairs.X =     0, 2.5,  15,   32, 43
          [Leaf].Photosynthesis.FT.XYPairs.Y =      0,  0.0,  1,  1, 0
          [Leaf].Photosynthesis.FT.MaximumTemperatureWeighting = 0.75
          [Leaf].MinimumLAI.FixedValue = 0.1
          [Leaf].InitialWtFunction.InitialPlantWt.FixedValue = 0.8
          [Leaf].MaximumNConc.FixedValue = 0.023
          [Leaf].MinimumNConc.FixedValue = 0.0045
      Folder Cultivar
        Cultivar SwitchGrass9
          Command:
            [Leaf].Photosynthesis.RUE.FixedValue =4.75
            [Leaf].ExtinctionCoefficient.FixedValue = 0.65
            [Root].MaximumRootDepth.FixedValue = 3000
            //[Root].SpecificRootLength.FixedValue = 100
            /// frost kill ratio
            [Leaf].LeafKillFraction.XYPairs.X = -25,  -2,
            [Leaf].LeafKillFraction.XYPairs.Y = 0.014, 0.0,
            ///Temperature factors
            [Leaf].Photosynthesis.FT.XYPairs.X =     0, 6.5,  15,   32, 50
            [Leaf].Photosynthesis.FT.XYPairs.Y =      0,  0.0,  1,  1, 0
            //[Leaf].Photosynthesis.FT.XYPairs.X =     0,  6, 9, 12, 17, 21, 43
            //[Leaf].Photosynthesis.FT.XYPairs.Y =     0,  0, 0.4, 1,  1, 1, 0
            [Leaf].Photosynthesis.FT.MaximumTemperatureWeighting = 0.95
            [Leaf].MinimumLAI.FixedValue = 0.1
            [Leaf].InitialWtFunction.InitialPlantWt.FixedValue = 0.8
            [Leaf].MaximumNConc.FixedValue = 0.023
            //[Leaf].MinimumNConc.FixedValue = 0.0045
            [Leaf].MinimumNConc.FixedValue = 0.0045
            [Root].NUptakeSWFactor.XYPairs.X = 0, 1
            [Root].NUptakeSWFactor.XYPairs.Y = 0, 1
            [Phenology].Vegetative.Target.FixedValue =30
        Cultivar SwitchGrass8
          Command:
            [Leaf].Photosynthesis.RUE.FixedValue =3.45
            [Leaf].ExtinctionCoefficient.FixedValue = 0.65
            [Root].MaximumRootDepth.FixedValue = 3000
            //[Root].SpecificRootLength.FixedValue = 100
            /// frost kill ratio
            [Leaf].LeafKillFraction.XYPairs.X = -35,  -2, //0,  17, 28, 42, 45
            [Leaf].LeafKillFraction.XYPairs.Y = 0.014, 0.0, //0, 0, 0, 0, 0.001
            ///Temperature factors
            [Leaf].Photosynthesis.FT.XYPairs.X =     0, 2.5,  15,   32, 50
            [Leaf].Photosynthesis.FT.XYPairs.Y =      0,  0.0,  1,  1, 0
            [Leaf].Photosynthesis.FT.MaximumTemperatureWeighting = 0.75
            [Leaf].MinimumLAI.FixedValue = 0.1
            [Leaf].InitialWtFunction.InitialPlantWt.FixedValue = 0.8
            [Leaf].MaximumNConc.FixedValue = 0.023
            [Leaf].MinimumNConc.FixedValue = 0.0045
        Cultivar SwitchGrass7
          Command:
            [Leaf].Photosynthesis.RUE.FixedValue =2.45
            [Leaf].ExtinctionCoefficient.FixedValue = 0.5
            [Root].MaximumRootDepth.FixedValue = 3000
            //[Root].SpecificRootLength.FixedValue = 100
            /// frost kill ratio
            [Leaf].LeafKillFraction.XYPairs.X = -25,  -2,
            [Leaf].LeafKillFraction.XYPairs.Y = 0.014, 0.0,
            ///Temperature factors
            [Leaf].Photosynthesis.FT.XYPairs.X =     0, 6.5,  15,   32, 50
            [Leaf].Photosynthesis.FT.XYPairs.Y =      0,  0.0,  1,  1, 0
            [Leaf].Photosynthesis.FT.MaximumTemperatureWeighting = 0.5
            [Leaf].MinimumLAI.FixedValue = 0.1
            [Leaf].InitialWtFunction.InitialPlantWt.FixedValue = 0.8
            [Leaf].MaximumNConc.FixedValue = 0.023
            [Leaf].MinimumNConc.FixedValue = 0.0045
        Cultivar SwitchGrass6
          Command:
            [Leaf].Photosynthesis.RUE.FixedValue =1.80
            [Leaf].ExtinctionCoefficient.FixedValue = 0.5
            [Root].MaximumRootDepth.FixedValue = 3000
            //[Root].SpecificRootLength.FixedValue = 100
            /// frost kill ratio
            [Leaf].LeafKillFraction.XYPairs.X = -35,  -2, //0,  17, 28, 42, 45
            [Leaf].LeafKillFraction.XYPairs.Y = 0.014, 0.0, //0, 0, 0, 0, 0.001
            ///Temperature factors
            [Leaf].Photosynthesis.FT.XYPairs.X =      6.5,     32.5,  45
            [Leaf].Photosynthesis.FT.XYPairs.Y =       0.2,    1,  0
            [Leaf].Photosynthesis.FT.MaximumTemperatureWeighting = 0.5
            [Leaf].MinimumLAI.FixedValue = 0.1
            [Leaf].InitialWtFunction.InitialPlantWt.FixedValue = 0.8
            [Leaf].MaximumNConc.FixedValue = 0.023
            [Leaf].MinimumNConc.FixedValue = 0.0045
        Cultivar SwitchGrass5
          Command:
            [Leaf].Photosynthesis.RUE.FixedValue =1.80
            [Leaf].ExtinctionCoefficient.FixedValue = 0.5
            [Root].MaximumRootDepth.FixedValue = 3000
            //[Root].SpecificRootLength.FixedValue = 100
            /// frost kill ratio
            [Leaf].LeafKillFraction.XYPairs.X = -35,  -2, //0,  17, 28, 42, 45
            [Leaf].LeafKillFraction.XYPairs.Y = 0.014, 0.0, //0, 0, 0, 0, 0.001
            ///Temperature factors
            [Leaf].Photosynthesis.FT.XYPairs.X =     6.5,    32, 35, 45
            [Leaf].Photosynthesis.FT.XYPairs.Y =       0.2,   1,  1, 0
            [Leaf].Photosynthesis.FT.MaximumTemperatureWeighting = 0.5
            [Leaf].MinimumLAI.FixedValue = 0.1
            [Leaf].InitialWtFunction.InitialPlantWt.FixedValue = 0.8
            [Leaf].MaximumNConc.FixedValue = 0.023
            [Leaf].MinimumNConc.FixedValue = 0.0045
        Cultivar SwitchGrass4
          Command:
            [Leaf].Photosynthesis.RUE.FixedValue =1.7
            [Leaf].ExtinctionCoefficient.FixedValue = 0.5
            [Root].MaximumRootDepth.FixedValue = 3000
            //[Root].SpecificRootLength.FixedValue = 100
            /// frost kill ratio
            [Leaf].LeafKillFraction.XYPairs.X = -35,  -5, //0,  17, 28, 42, 45
            [Leaf].LeafKillFraction.XYPairs.Y = 0.014, 0.0, //0, 0, 0, 0, 0.001
            ///Temperature factors
            [Leaf].Photosynthesis.FT.XYPairs.X =     0, 6.5,    32, 32.5, 45
            [Leaf].Photosynthesis.FT.XYPairs.Y =     0,  0.2,   1,  1, 0
            [Leaf].Photosynthesis.FT.MaximumTemperatureWeighting = 0.5
            [Leaf].MinimumLAI.FixedValue = 0.1
            [Leaf].InitialWtFunction.InitialPlantWt.FixedValue = 0.01
            [TropicalPasture].AboveGroundHarvestable = 0.8
        Cultivar Cave_in_rock111
          Command:
            [Leaf].Photosynthesis.RUE.FixedValue =4.3370
            [Leaf].ExtinctionCoefficient.FixedValue = 0.465
            [Root].MaximumRootDepth.FixedValue = 2000
            //[Root].SpecificRootLength.FixedValue = 100
            /// frost kill ratio
            [Leaf].LeafKillFraction.XYPairs.X = -35,  -5, //0,  17, 28, 42, 45
            [Leaf].LeafKillFraction.XYPairs.Y = 0.014, 0.0, //0, 0, 0, 0, 0.001
            ///Temperature factors
            [Leaf].Photosynthesis.FT.XYPairs.X =    9, 12, 17, 21, 45
            [Leaf].Photosynthesis.FT.XYPairs.Y =   0.3, 0.5, 1, 1, 0
            [Leaf].Photosynthesis.FT.MaximumTemperatureWeighting = 0.5
            [Leaf].MinimumLAI.FixedValue = 0.1
            [Leaf].InitialWtFunction.InitialPlantWt.FixedValue = 0.2
            //Nitrogen variables
            [Leaf].MaximumNConc.FixedValue = 0.023
            [Leaf].MinimumNConc.FixedValue = 0.0045
        Cultivar BrachiariaBRSPiata
        Cultivar PanicumBambatsi
        Cultivar SwitchGrass3
          Command:
            [Leaf].Photosynthesis.RUE.FixedValue =1.70
            [Leaf].ExtinctionCoefficient.FixedValue = 0.5
            [Root].MaximumRootDepth.FixedValue = 3000
            //[Root].SpecificRootLength.FixedValue = 100
            /// frost kill ratio
            [Leaf].LeafKillFraction.XYPairs.X = -35,  -5, //0,  17, 28, 42, 45
            [Leaf].LeafKillFraction.XYPairs.Y = 0.014, 0.0, //0, 0, 0, 0, 0.001
            ///Temperature factors
            [Leaf].Photosynthesis.FT.XYPairs.X =    9, 12, 17, 21, 45
            [Leaf].Photosynthesis.FT.XYPairs.Y =  0.5, 0.5, 0.8, 1, 0
            [Leaf].Photosynthesis.FT.MaximumTemperatureWeighting = 0.75
            [Leaf].MinimumLAI.FixedValue = 0.1
            [Leaf].InitialWtFunction.InitialPlantWt.FixedValue = 0.5
        Memo Description
          This is a *large-leaf* cultivar developed in New Zealand from crossings between local varieties and north-american ladino genotypes.  It succeeded Pitau and Kopu cultivars, being more persistent than these due to greater stolon density; it has also greater resistance to nematodes and clover root weevil.  As a *large-leaf* cultivar, Kopu2 has leaves that are 25-50% larger than Huia, with corresponding longer petioles; it has a semi-prostrate growth habit, enabling higher harvest index than *medium-leaf* cultivars.  Kopu2 has been shown to produce high yields, especially in early season, being more winter active that the previous cultivars; it is intended for lowland pastures under rotational cattle grazing.
        Cultivar SwitchGrass71
          Command:
            [Leaf].Photosynthesis.RUE.FixedValue =1.65
            [Leaf].ExtinctionCoefficient.FixedValue = 0.65
            [Root].MaximumRootDepth.FixedValue = 3000
            [Root].SpecificRootLength.FixedValue = 100
            /// frost kill ratio
            [Leaf].LeafKillFraction.XYPairs.X = -35,  -5,
            [Leaf].LeafKillFraction.XYPairs.Y = 0.014, 0.0,
            ///Temperature factors
            //[Leaf].Photosynthesis.FT.XYPairs.X =     0, 6.5,  15,   32, 43
            //[Leaf].Photosynthesis.FT.XYPairs.Y =      0,  0.0,  1,  1, 0
            [Leaf].Photosynthesis.FT.MaximumTemperatureWeighting =0.75
            [Leaf].MinimumLAI.FixedValue = 0.1
            [Leaf].InitialWtFunction.InitialPlantWt.FixedValue = 0.01
            //[Leaf].MaximumNConc.FixedValue = 0.023
            //[Leaf].MinimumNConc.FixedValue = 0.0045
            [Leaf].MaximumNConc.FixedValue = 0.04
            [Leaf].MinimumNConc.FixedValue = 0.007
            //[Phenology].Vegetative.Target.FixedValue =90
            //[Phenology].Inductive.Target.FixedValue =45
        Cultivar SwitchGrass711
          Command:
            [Leaf].Photosynthesis.RUE.FixedValue =1.75
            [Leaf].ExtinctionCoefficient.FixedValue = 0.65
            [Root].MaximumRootDepth.FixedValue = 3000
            [Root].SpecificRootLength.FixedValue = 100
            /// frost kill ratio
            [Leaf].LeafKillFraction.XYPairs.X = -35,  -5,
            [Leaf].LeafKillFraction.XYPairs.Y = 0.014, 0.0,
            ///Temperature factors
            //[Leaf].Photosynthesis.FT.XYPairs.X =     0, 6.5,  15,   32, 43
            //[Leaf].Photosynthesis.FT.XYPairs.Y =      0,  0.0,  1,  1, 0
            [Leaf].Photosynthesis.FT.MaximumTemperatureWeighting =0.75
            [Leaf].MinimumLAI.FixedValue = 0.1
            [Leaf].InitialWtFunction.InitialPlantWt.FixedValue = 0.01
            //[Leaf].MaximumNConc.FixedValue = 0.023
            //[Leaf].MinimumNConc.FixedValue = 0.0045
            [Leaf].MaximumNConc.FixedValue = 0.047
            [Leaf].MinimumNConc.FixedValue = 0.007
            //[Phenology].Vegetative.Target.FixedValue =90
            //[Phenology].Inductive.Target.FixedValue =45
    Report Annual: EventNames=[Clock].EndOfYear
      VariableNames:
        // Time
        [Clock].Today as Date
        [Clock].Today.Year as an_Year
        [Simulation].Name as plotid
        // Carbon
        [Soil].Nutrient.TotalC[1]/1000 as SOC1
        sum([Soil].Nutrient.TotalC[1:2])/1000 as SOC2
        sum of sum([Nutrient].Catm[1:10]) from 01-jan to [Clock].Today as Whole_repsiration
        sum of sum([Nutrient].Catm[1:6]) from 01-jan to [Clock].Today  as  Top_respiration
        sum([Soil].Nutrient.TotalC[1:2])/1000 as TPC
        // Nitrogen
        [NO3].Flow[1] as flowNitrate
        sum of Sum( [Soil].NO3.ppm[1:2]) from 01-jan to [Clock].Today as NConc
        [Soil].NO3.ppm[1] as N03Ncon
        [Soil].NO3.ppm[2] as N03Ncon2
        [Soil].NO3.ppm[3] *0.8 as N03Ncon3
        Sum of [Soil].SoilWater.LeachNO3 from 01-jan to [Clock].Today as CumuAnnualLeach
        sum([Soil].NO3.kgha) as NO3Total
        sum of sum([Nutrient].N2Oatm[1:6]) from 01-Mar to [Clock].Today as TopN2O
        sum of sum([Nutrient].N2Oatm[1:8]) from 01-Mar to [Clock].Today as  n20
        sum([Soil].Nutrient.NO3.kgha[1:2]) as MineralN
        sum of [Soil].SoilWater.LeachNO3 from [Annual].DayAfterLastOutput to [clock].Today as LeachNO3
        // Water
        sum of ([Soil].SoilWater.Runoff) from 01-jan to [Clock].Today as runoff
        sum of [Soil].SoilWater.Drainage from [Annual].DayAfterLastOutput to [clock].Today as drainaged_run_off
        SOC1 + SOC2 as total_carbon
        // Calculate Nitrate Loss. 0.01 converts to kg per hectare
        runoff * (N03Ncon + N03Ncon2 + N03Ncon3) *0.01  as Nloss
        // calculalate carbon dioxide equivalent
         n20 *(44/28) *165 as no2_eq
         TopN2O *(44/28) *165 as top_no2_eq
         // Weather and soil water
        sum of [weather].rain from 01-jan to [clock].Today as mean_rain
        sum of [weather].MaxT  from 01-jan to [Clock].Today as mean_maxt
        sum  of [weather].MinT from 01-jan to [Clock].Today as mean_mint
        sum  of [weather].Radn from 01-jan to [Clock].Today as total_radn
        mean  of [Water].PAW[1] from 01-jan to [Clock].Today as PAWC1
        mean  of [Water].PAW[2] from 01-jan to [Clock].Today as PAWC2
        mean  of [Soil].SoilWater.SW[1] from 01-jan to [Clock].Today as SW1
        mean  of [Soil].SoilWater.SW[2] from 01-jan to [Clock].Today as SW2
        mean  of [Soil].SoilWater.SW[3] from 01-jan to [Clock].Today as SW3
        [SurfaceOrganicMatter].C as SurfaceOrganicMatter_Carbon
        [SurfaceOrganicMatter].N as SurfaceOrganicMatter_Nitrogen
        [Soil].Physical.BD[1] as Bd
        [Nutrient].TotalC[1]/1000 as apsim_soc_predicted
    Report MaizeR: EventNames=[Maize].Harvesting
      VariableNames:
        [Clock].Today
        [Clock].Today.Year as Year
        [Maize].AboveGround.Wt*10  as M_AGB
        [Maize].AboveGround.N as MAIZE_AGB_NITROGEN
        [Maize].Grain.Total.Wt * 10 as Maize_Yield
        [Maize].Grain.Total.Wt * 10 as mYield
        [Simulation].Name as plotid
  Simulation 1091
    Clock: Start=2000-01-01; End=2016-12-31
    Summary SummaryFile
    Weather
      FileName=D:/My_BOX/Box/research temporal/analysis B/new_analysis/Iem_IA0200.met
    SoilArbitrator Soil Arbitrator
    Zone Field1: Area=1; Slope=2; AspectAngle=0; Altitude=50
      Report Carbon: EventNames=[Clock].EndOfSimulation
        VariableNames:
          diff of ([Soil].Nutrient.TotalC[1])/1000 from [Clock].StartOfSimulation to [Clock].EndOfSimulation as changeincarbon
          diff of sum([Soil].Nutrient.TotalC[1:2])/1000 from [Clock].StartOfSimulation to [Clock].EndOfSimulation as changeincarbon2
          changeincarbon + changeincarbon2 as to_carb
          (-1 * to_carb *(44/12))*1000 as co_eq
      Report WheatR: EventNames=[wheat].Harvesting
        VariableNames:
          [Clock].Today as date_in_wheat
          [Clock].Today.Year as Year_wheat
          [Clock].Today.Month as Month_in_wheat
          [Wheat].AboveGround.Wt *10 as w_AGB
      Report MaizeR: EventNames=[Maize].Harvesting
        VariableNames:
          [Clock].Today
          [Clock].Today.Year as Year
          [Maize].AboveGround.Wt*10  as M_AGB
          [Maize].AboveGround.N as MAIZE_AGB_NITROGEN
          [Maize].Grain.Total.Wt * 10 as Maize_Yield
          [Maize].Grain.Total.Wt * 10 as mYield
      Report Annual: EventNames=[Clock].EndOfYear
        VariableNames:
          // Time
          [Clock].Today as Date
          [Clock].Today.Year as an_Year
          // Carbon
          [Soil].Nutrient.TotalC[1]/1000 as SOC1
          sum([Soil].Nutrient.TotalC[1:2])/1000 as SOC2
          sum of sum([Nutrient].Catm[1:10]) from 01-jan to [Clock].Today as Whole_repsiration
          sum of sum([Nutrient].Catm[1:6]) from 01-jan to [Clock].Today  as  Top_respiration
          sum([Soil].Nutrient.TotalC[1:2])/1000 as TPC
          // Nitrogen
          [NO3].Flow[1] as flowNitrate
          sum of Sum( [Soil].NO3.ppm[1:2]) from 01-jan to [Clock].Today as NConc
          [Soil].NO3.ppm[1] as N03Ncon
          [Soil].NO3.ppm[2] as N03Ncon2
          [Soil].NO3.ppm[3] *0.8 as N03Ncon3
          Sum of [Soil].SoilWater.LeachNO3 from 01-jan to [Clock].Today as CumuAnnualLeach
          sum([Soil].NO3.kgha) as NO3Total
          sum of sum([Nutrient].N2Oatm[1:6]) from 01-Mar to [Clock].Today as TopN2O
          sum of sum([Nutrient].N2Oatm[1:8]) from 01-Mar to [Clock].Today as  n20
          sum([Soil].Nutrient.NO3.kgha[1:2]) as MineralN
          sum of [Soil].SoilWater.LeachNO3 from [Annual].DayAfterLastOutput to [clock].Today as LeachNO3
          // Water
          sum of ([Soil].SoilWater.Runoff) from 01-jan to [Clock].Today as runoff
          sum of [Soil].SoilWater.Drainage from [Annual].DayAfterLastOutput to [clock].Today as drainaged_run_off
          SOC1 + SOC2 as total_carbon
          // Calculate Nitrate Loss. 0.01 converts to kg per hectare
          runoff * (N03Ncon + N03Ncon2 + N03Ncon3) *0.01  as Nloss
          // calculalate carbon dioxide equivalent
           n20 *(44/28) *165 as no2_eq
           TopN2O *(44/28) *165 as top_no2_eq
           // Weather and soil water
          sum of [weather].rain from 01-jan to [clock].Today as mean_rain
          sum of [weather].MaxT  from 01-jan to [Clock].Today as mean_maxt
          sum  of [weather].MinT from 01-jan to [Clock].Today as mean_mint
          sum  of [weather].Radn from 01-jan to [Clock].Today as total_radn
          mean  of [Water].PAW[1] from 01-jan to [Clock].Today as PAWC1
          mean  of [Water].PAW[2] from 01-jan to [Clock].Today as PAWC2
          mean  of [Soil].SoilWater.SW[1] from 01-jan to [Clock].Today as SW1
          mean  of [Soil].SoilWater.SW[2] from 01-jan to [Clock].Today as SW2
          mean  of [Soil].SoilWater.SW[3] from 01-jan to [Clock].Today as SW3
      Report SoybeanR: EventNames=[Soybean].Harvesting
        VariableNames:
          [Clock].Today as date_in_soybean
          [Clock].Today.Year as Year_in_soybean
          [Soybean].AboveGround.Wt*10  as soy_AGB
          [Soybean].Grain.Total.Wt * 10 as SoyYield
      SurfaceOrganicMatter: InitialResidueName=grass; InitialResidueType=grass; InitialResidueMass=800; InitialStandingFraction=0; InitialCPR=0; InitialCNR=46.8283
      Fertiliser
      Plant Maize
      MicroClimate: a_interception=0; b_interception=1; c_interception=0; d_interception=0; SoilHeatFluxFraction=0.4; MinimumHeightDiffForNewLayer=0; NightInterceptionFraction=0.5; ReferenceHeight=2
      Plant Soybean
      Plant Wheat
      Manager MaizeNitrogenManager
        Crop = [Maize]
        FertiliserType = UreaNO3
        Depth2Apply = 0
        FractionToApplyFirst = 1
        Amount = 202
        FertiliserDates = 29-may, 30-may, 31-may, 01-jul, 02-jul
```csharp
using Models.Soils;
using System;
using Models.Core;
using Models.PMF;
using Models.Climate;
using APSIM.Shared.Utilities;
namespace Models

{
    [Serializable]
    public class Script : Model
    {
        [Link] Clock Clock;
        
        [Link] Fertiliser Fertiliser;
        [Link] ISummary Summary;
        [Link] private Weather Weather;
        [Separator("Crop in the rotation to apply fertilizers")]
        [Description("Crop")]
        public IPlant Crop { get; set; }
        
        [Separator("Fertilizer application details")]

        [Description("Type of fertiliser to apply? Select from a list. ")] 
        [Display(Type = DisplayType.FertiliserType)]public string FertiliserType { get; set; }
        
        [Description("Depth to apply the fertilizer. ")] 
        public double Depth2Apply { get; set; }
        
        [Description("Fraction to apply at sowing (0-1). if it is a single application, it should be 1")]
        public double FractionToApplyFirst { get; set; }

        [Description("Enter the total amount of fertiliser to be applied (kg /ha)")] 
        public double Amount { get; set; }
        
        [Description("Enter other potential dates as dd-mmm with comma separation (any year information entered will be ignored): ")] 
        public string[] FertiliserDates { get; set; } 
        
        
        private double Rain;
        
        [EventSubscribe("Sowing")]
        private void OnSowing(object sender, EventArgs e)
        {
            Model crop = sender as Model;
            var nit = FractionToApplyFirst * Amount;
            if (Crop != null && crop.Name.ToLower() == (Crop as IModel).Name.ToLower())
                Fertiliser.Apply(amount: nit, type: FertiliserType, depth: Depth2Apply);
        }
        
        [EventSubscribe("DoManagement")]
        private void OnDoManagement(object sender, EventArgs e)
        {
         Depth2Apply  = 0.0;
         var Depth = 0.0;
         
        
            foreach (string ddMMM in FertiliserDates)
            {
             Rain = Weather.Rain;
             
             var nit = FractionToApplyFirst * Amount;
             var otherNapp = Amount - nit;
                if (Crop.IsAlive & DateUtilities.DatesEqual(ddMMM, Clock.Today)& Rain ==0)
                {
                        Fertiliser.Apply(amount: otherNapp / FertiliserDates.Length, type: FertiliserType, depth: Depth2Apply);
                        Summary.WriteMessage(this, $"At other date(s), {Crop.Name} received {otherNapp} Kg of Nitrogen applied as {FertiliserType}.", MessageType.Information);
                        Summary.WriteMessage(this, $"Rain was:, {Rain}",  MessageType.Information);
                    break;   
                }
            }
        }
    }
}
```
      Manager SowMaize
        Rotations = [Simple Rotation]
        Crop = [Maize]
        StartDate = 1-May
        EndDate = 15-May
        MinESW = 200
        MinRain = 30
        RainDays = 3
        CultivarName = B_110
        SowingDepth = 50
        RowSpacing = 750
        Population = 8.65
        MustSow = True
```csharp
using APSIM.Core;
using Models.Interfaces;
using APSIM.Shared.Utilities;
using Models.Utilities;
using Models.Soils;
using Models.PMF;
using Models.Core;
using System;
using Models.Climate;
using APSIM.Numerics;
using System.ComponentModel;           // for [Description]
using Models.Core.Attributes;          // for [Display], [Separator]

namespace Models
{
    [Serializable]
    public class Script : Model, IStructureDependency
    {
        [Link] private Clock Clock;
        [Link] private Summary Summary;
        private Accumulator accumulatedRain;

        [Link] private ISoilWater waterBalance;

        // IStructureDependency requirement
        public IStructure Structure { private get; set; }

        [Description("Simple Rotation Manager")]
        public Manager Rotations { get; set; }

        [Separator("Sowing Info")]

        [Description("Crop")]
        public IPlant Crop { get; set; }

        [Description("Start of sowing window (d-mmm)")]
        public string StartDate { get; set; }

        [Description("End of sowing window (d-mmm)")]
        public string EndDate { get; set; }

        [Description("Minimum extractable soil water for sowing (mm)")]
        public double MinESW { get; set; }

        [Description("Accumulated rainfall required for sowing (mm)")]
        public double MinRain { get; set; }

        [Description("Duration of rainfall accumulation (d)")]
        public int RainDays { get; set; }

        [Display(Type = DisplayType.CultivarName)]
        [Description("Cultivar to be sown")]
        public string CultivarName { get; set; }

        [Description("Sowing depth (mm)")]
        public double SowingDepth { get; set; }

        [Description("Row spacing (mm)")]
        public double RowSpacing { get; set; }

        [Description("Plant population (/m2)")]
        public double Population { get; set; }

        [Description("Must sow by end date?")]
        public bool MustSow { get; set; }

        [EventSubscribe("StartOfSimulation")]
        private void OnSimulationCommencing(object sender, EventArgs e)
        {
            accumulatedRain = new Accumulator(this, "[Weather].Rain", RainDays);
        }

        [EventSubscribe("DoManagement")]
        private void OnDoManagement(object sender, EventArgs e)
        {
            accumulatedRain.Update();

            if (!Crop.IsAlive &&
                DateUtilities.WithinDates(StartDate, Clock.Today, EndDate))
            {
                var rainSum = accumulatedRain.Sum;
                var eswSum  = MathUtilities.Sum(waterBalance.ESW);

                if ((rainSum > MinRain && eswSum > MinESW) ||
                    (DateUtilities.DatesEqual(EndDate, Clock.Today) && MustSow))
                {
                    var thisCrop = Crop.Name.ToLower();

                    // Use this class's Structure (avoid Rotations.Structure getter issue)
                    var nextCrop = (string)Structure.GetObject("Script.NextCrop")?.Value;

                    if (thisCrop == (nextCrop?.ToLower() ?? thisCrop))
                        Crop.Sow(population: Population,
                                 cultivar: CultivarName,
                                 depth: SowingDepth,
                                 rowSpacing: RowSpacing);
                }
            }
        }
    }
}
```
      Manager SowWheat
        Rotations = [Simple Rotation]
        Crop = [Wheat]
        StartDate = 27-Sep
        EndDate = 5-Oct
        MinESW = 100
        MinRain = 15
        RainDays = 7
        CultivarName = Amarok
        SowingDepth = 10
        RowSpacing = 250
        Population = 50
        MustSow = True
```csharp
using APSIM.Core;
using Models.Interfaces;
using APSIM.Shared.Utilities;
using Models.Utilities;
using Models.Soils;
using Models.PMF;
using Models.Core;
using System;
using Models.Climate;
using APSIM.Numerics;
using System.ComponentModel;           // for [Description]
using Models.Core.Attributes;          // for [Display], [Separator]

namespace Models
{
    [Serializable]
    public class Script : Model, IStructureDependency
    {
        [Link] private Clock Clock;
        [Link] private Summary Summary;
        private Accumulator accumulatedRain;

        [Link]
        private ISoilWater waterBalance;

        public IStructure Structure { private get; set; }
        
        [Description("Simple Rotation Manager")]
        public Manager Rotations { get; set; }
        
        [Separator("Sowing Info")]
        
        [Description("Crop")]
        public IPlant Crop { get; set; }

        [Description("Start of sowing window (d-mmm)")]
        public string StartDate { get; set; }

        [Description("End of sowing window (d-mmm)")]
        public string EndDate { get; set; }

        [Description("Minimum extractable soil water for sowing (mm)")]
        public double MinESW { get; set; }

        [Description("Accumulated rainfall required for sowing (mm)")]
        public double MinRain { get; set; }

        [Description("Duration of rainfall accumulation (d)")]
        public int RainDays { get; set; }

        [Display(Type = DisplayType.CultivarName)]
        [Description("Cultivar to be sown")]
        public string CultivarName { get; set; }

        [Description("Sowing depth (mm)")]
        public double SowingDepth { get; set; }

        [Description("Row spacing (mm)")]
        public double RowSpacing { get; set; }

        [Description("Plant population (/m2)")]
        public double Population { get; set; }
        
        [Description("Must sow by end date?")]
        public bool MustSow { get; set; }

        [EventSubscribe("StartOfSimulation")]
        private void OnSimulationCommencing(object sender, EventArgs e)
        {
            accumulatedRain = new Accumulator(this, "[Weather].Rain", RainDays);
        }

        [EventSubscribe("DoManagement")]
        private void OnDoManagement(object sender, EventArgs e)
        {
            accumulatedRain.Update();
            if (!Crop.IsAlive &&
                DateUtilities.WithinDates(StartDate, Clock.Today, EndDate))
            {
                var rainSum = accumulatedRain.Sum;
                var eswSum  = MathUtilities.Sum(waterBalance.ESW);

                if ((rainSum > MinRain && eswSum > MinESW) ||
                    (DateUtilities.DatesEqual(EndDate, Clock.Today) && MustSow))
                {
                    var thisCrop = Crop.Name.ToLower();
                    // Fix: use this class's Structure (avoid Rotations.Structure getter)
                    var nextCrop = (string)Structure.GetObject("Script.NextCrop")?.Value;

                    if (thisCrop == (nextCrop?.ToLower() ?? thisCrop))
                        Crop.Sow(population: Population,
                                 cultivar: CultivarName,
                                 depth: SowingDepth,
                                 rowSpacing: RowSpacing);
                }
            }
        }
    }
}
```
      Manager HarvestMaize
        Crop = [Maize]
        Date = 25-Sep
```csharp
using APSIM.Shared.Utilities;
using Models.Utilities;
using Models.Soils;
using Models.PMF;
using Models.Core;
using System;

namespace Models
{
    [Serializable] 
    public class Script : Model
    {
        [Link] IClock Clock;
        
        [Separator("Harvesting script that forces harvesting")]
        [Description("Crop")]
        public IPlant Crop { get; set; }
        
        [Description("Date to force harvesting by if crop is not ready (d-mmm)")]
        public string Date { get; set; }
        
        [EventSubscribe("DoManagement")]
        private void OnDoManagement(object sender, EventArgs e)
        {
            if (Crop.IsReadyForHarvesting || 
                (DateUtilities.DatesAreEqual(Date, Clock.Today) && Crop.IsAlive))
            {
                Crop.Harvest();
                Crop.EndCrop();
            }
        }
    }
}
```
      Manager SowSoy
        Rotations = [Simple Rotation]
        Crop = [Soybean]
        StartDate = 15-may
        EndDate = 25-May
        MinESW = 200
        MinRain = 30
        RainDays = 3
        CultivarName = Generic_MG2
        SowingDepth = 50
        RowSpacing = 750
        Population = 30
        MustSow = True
```csharp
using APSIM.Core;
using Models.Interfaces;
using APSIM.Shared.Utilities;
using Models.Utilities;
using Models.Soils;
using Models.PMF;
using Models.Core;
using System;
using Models.Climate;
using APSIM.Numerics;
using System.ComponentModel;           // for [Description]
using Models.Core.Attributes;          // for [Display], [Separator]

namespace Models
{
    [Serializable]
    public class Script : Model, IStructureDependency
    {
        [Link] private Clock Clock;
        [Link] private Summary Summary;
        private Accumulator accumulatedRain;

        [Link]
        private ISoilWater waterBalance;

        // IStructureDependency
        public IStructure Structure { private get; set; }
        
        [Description("Simple Rotation Manager")]
        public Manager Rotations { get; set; }
        
        [Separator("Sowing Info")]
        
        [Description("Crop")]
        public IPlant Crop { get; set; }

        [Description("Start of sowing window (d-mmm)")]
        public string StartDate { get; set; }

        [Description("End of sowing window (d-mmm)")]
        public string EndDate { get; set; }

        [Description("Minimum extractable soil water for sowing (mm)")]
        public double MinESW { get; set; }

        [Description("Accumulated rainfall required for sowing (mm)")]
        public double MinRain { get; set; }

        [Description("Duration of rainfall accumulation (d)")]
        public int RainDays { get; set; }

        [Display(Type = DisplayType.CultivarName)]
        [Description("Cultivar to be sown")]
        public string CultivarName { get; set; }

        [Description("Sowing depth (mm)")]
        public double SowingDepth { get; set; }

        [Description("Row spacing (mm)")]
        public double RowSpacing { get; set; }

        [Description("Plant population (/m2)")]
        public double Population { get; set; }
        
        [Description("Must sow by end date?")]
        public bool MustSow { get; set; }
        
        [EventSubscribe("StartOfSimulation")]
        private void OnSimulationCommencing(object sender, EventArgs e)
        {
            accumulatedRain = new Accumulator(this, "[Weather].Rain", RainDays);
        }

        [EventSubscribe("DoManagement")]
        private void OnDoManagement(object sender, EventArgs e)
        {
            accumulatedRain.Update();
            if (!Crop.IsAlive &&
                DateUtilities.WithinDates(StartDate, Clock.Today, EndDate))
            {
                var rainSum = accumulatedRain.Sum;
                var eswSum  = MathUtilities.Sum(waterBalance.ESW);

                if ((rainSum > MinRain && eswSum > MinESW) ||
                    (DateUtilities.DatesEqual(EndDate, Clock.Today) && MustSow))
                {
                    var thisCrop = Crop.Name.ToLower();

                    // Use this class's Structure to avoid inaccessible getter on Manager.Structure
                    var nextCrop = (string)Structure.GetObject("Script.NextCrop")?.Value;

                    if (thisCrop == (nextCrop?.ToLower() ?? thisCrop))
                        Crop.Sow(population: Population,
                                 cultivar: CultivarName,
                                 depth: SowingDepth,
                                 rowSpacing: RowSpacing);
                }
            }
        }
    }
}
```
      Manager HarvestSoy
        Crop = [Soybean]
        Date = 19-sep
        script: same as in 1091.Field1.HarvestMaize
      Manager Simple Rotation
        Crops = Maize, Soybean, Maize, Soybean, Maize
```csharp
using Models.Soils;
using System.Collections.Generic;
using APSIM.Shared.Utilities;
using Models.PMF;
using Models.Interfaces;
using Models.Core;
using System;

namespace Models
{
    [Serializable]
    public class Script : Model
    {
        [Link] IClock Clock;
        [Link] ISummary Summary;
        
        [Description("Rotation Sequence (comma separated crop names)")]
        public string[] Crops { get; set; }
        
        // Repeating cycle of input crops. Don't loop on this, loop on Crops
        private IEnumerable<string> cropsEnum()
        {
            var counter = 0;
            while (true)
            {
                yield return Crops[counter];
                ++counter;
                if (counter >= Crops.Length)
                    counter = 0;
            }
        }
        
        private IEnumerator<string> cropCycle;
        
        [Description("Next crop to sow in the simple rotation.")]
        public string NextCrop
        { get => cropCycle.Current; }
        
        [EventSubscribe("StartOfSimulation")]
        private void Init(object sender, EventArgs e)
        {
            // TODO: Error if Crops is empty.
            cropCycle = cropsEnum().GetEnumerator();
            // Set to first value.
            cropCycle.MoveNext();
        }

        [EventSubscribe("PlantEnding")]
        private void OnEndCrop(object sender, EventArgs e)
        {
            // Currently assumes only one crop in the ground, so does not check if the  
            // harvested crop is this script's current crop.
            var old = NextCrop;
            cropCycle.MoveNext();
            var _new = NextCrop;
            Summary.WriteMessage(this, $"Rotation finished with {old}, next up: {_new}.", MessageType.Information);
        }
    }
}
```
      Manager AddfertlizerRotationWheat
        Crop = [Wheat]
        FertiliserType = UreaN
        Fraction = 0.3777778
        Amount = -
        FertiliserDates = 20-march
        AmountType = False
```csharp
using Models.Soils;
using System;
using Models.Core;
using Models.PMF;
using APSIM.Shared.Utilities;
namespace Models
{
    [Serializable]
    public class Script : Model
    {
        [Link] Clock Clock;
        
        [Link] Fertiliser Fertiliser;
        [Link] ISummary Summary;
        [Separator("Crop in the rotation to apply fertilizers")]
        [Description("Crop")]
        public IPlant Crop { get; set; }
        
        [Separator("Fertilizer application details")]

        [Description("Type of fertiliser to apply? Select from a list. ")] 
        [Display(Type = DisplayType.FertiliserType)]public string FertiliserType { get; set; }
        
        [Description("Fraction to apply at sowing (0-1). if it is a single application, it should be 1")]
        public double Fraction { get; set; }

        [Description("Enter the total amount of fertiliser to be applied (kg /ha)")] 
        public double Amount { get; set; }
        
        [Description("Enter other dates as dd-mmm with comma separation (any year information entered will be ignored): ")] 
        public string[] FertiliserDates { get; set; } 
        
        [Description("Is the remaining amount to be applied each time? (true/ticked)? Or is it the total annual amount across all dates (no(false)/unticked)")] 
        public bool AmountType { get; set; }
        
        [EventSubscribe("Sowing")]
        private void OnSowing(object sender, EventArgs e)
        {
            Model crop = sender as Model;
            var nit = Fraction * Amount;
            if (Crop != null && crop.Name.ToLower() == (Crop as IModel).Name.ToLower())
                Fertiliser.Apply(amount: nit, type: FertiliserType);
        }
        
        [EventSubscribe("DoManagement")]
        private void OnDoManagement(object sender, EventArgs e)
        {
            foreach (string ddMMM in FertiliserDates)
            {
             var nit = Fraction * Amount;
             var otherNapp = Amount - nit;
                if (Crop.IsAlive & DateUtilities.DatesEqual(ddMMM, Clock.Today))
                {
                    if (AmountType)
                        Fertiliser.Apply(amount: otherNapp, type: FertiliserType);
                        
                    else
                        Fertiliser.Apply(amount: otherNapp / FertiliserDates.Length, type: FertiliserType);
                        Summary.WriteMessage(this, $"At other date(s), {Crop.Name} received {otherNapp} Kg of Nitrogen applied as {FertiliserType}. {AmountType} was selected: true implies that the user specified amount was applied on each date and false implies that the amount was applied across dates", MessageType.Information);
                }
            }
        }
    }
}
```
      Manager HarvestWheat
        Crop = [Wheat]
        Date = 28-apr
        script: same as in 1091.Field1.HarvestMaize
      Soil Muscatune:244911: SoilType=Shaffton:67263817; Site=11; State=IL; Country=USA; ApsoilNumber=0; Latitude=41.763; Longitude=-90.6808
        DataSource=SSURGO https://SDMDataAccess.nrcs.usda.gov/Tabular/SDMTabularService.asmx through PyAPSIMX function Replace_Soilprofile. Date downloaded: 2022-12-27 02:49:44.558240
        Comments=cockey = 22743816 Shaffton loam, 0 to 2 percent slopes Component percentage: 95%
        Physical
          Thickness  ParticleSizeSand  ParticleSizeSilt  ParticleSizeClay  BD       AirDry     LL15       DUL       SAT       KS
          200        1.7002            66.3125           32                1.215    0.0505     0.101      0.406941  0.521509  792.45
          100        2.01345           66.2372           31.759            1.22626  0.0779281  0.0974102  0.387198  0.517259  792.45
          200        2.32671           66.1619           31.5181           1.23753  0.0750563  0.0938203  0.367455  0.513009  792.45
          200        2.63997           66.0866           31.2771           1.24879  0.0902305  0.0902305  0.347712  0.508759  792.45
          200        2.95322           66.0113           31.0361           1.25833  0.0866406  0.0866406  0.329708  0.505158  792.45
          250        2.81824           67.7725           29.3975           1.26005  0.0817055  0.0817055  0.327968  0.504508  792.45
          300        2.60467           69.8551           27.5145           1.2783   0.0765349  0.0765349  0.321469  0.497623  792.45
          300        2.32539           71.5934           26.0573           1.27872  0.0719059  0.0719059  0.319199  0.497463  792.45
          350        1.98345           73.0001           25.0068           1.29827  0.067796   0.067796   0.313231  0.490088  792.45
          250        1.6415            74.4069           23.9563           1.29869  0.063686   0.063686   0.312366  0.489928  792.45
          SoilCrop MaizeSoil
            LL=[0.101, 0.0974102, 0.0938203, 0.0902305, 0.0866406, 0.0817055, 0.0765349, 0.0719059, 0.067796, 0.063686]
            KL=[0.08, 0.0654985, 0.0536256, 0.0439049, 0.0359463, 0.0294304, 0.0240955, 0.0197278, 0.0161517, 0.0132239]
            XF=[1, 1, 1, 1, 1, 1, 1, 1, 1, 1]
          SoilCrop SoybeanSoil: same as 1091.Field1.Muscatune:244911.Physical.MaizeSoil
          SoilCrop WheatSoil: same as 1091.Field1.Muscatune:244911.Physical.MaizeSoil
          SoilCrop TropicalPastureSoil: same as 1091.Field1.Muscatune:244911.Physical.MaizeSoil
        Organic: FOMCNRatio=40; CarbonUnits=Total
          Thickness  Carbon     SoilCNRatio  FBiom       FInert    FOM
          200        2.46       12           0.033823    0.511478  150
          100        1.71092    12           0.035       0.668     122.81
          200        1.18994    12           0.0301644   0.846767  100.548
          200        0.827598   12           0.0246965   0.855277  82.3217
          200        0.575591   12           0.0202198   0.863873  67.3993
          250        0.400321   12           0.0165546   0.872555  55.1819
          300        0.278422   12           0.0135537   0.881324  45.1791
          300        0.193641   12           0.0110969   0.890182  36.9895
          350        0.134677   12           0.00908534  0.899128  30.2845
          250        0.0936672  12           0.00743845  0.908165  24.7948
        Chemical: Thickness=[200, 100, 200, 200, 200, 250, 300, 300, 350, 250]; PH=[6.2, 5.866, 5.531, 5.3, 5.3, 5.3, 5.3, 5.3, 5.535, 6.118]; PHUnits=Water
        Water: Thickness=[200, 100, 200, 200, 200, 250, 300, 300, 350, 250]; FilledFromTop=true
          InitialValues=[0.406941, 0.387198, 0.367455, 0.347712, 0.329708, 0.327968, 0.321469, 0.319199, 0.313231, 0.312366]
        Nutrient
        WaterBalance SoilWater: SummerDate=1-jun; SummerU=8.55; SummerCona=3.775; WinterDate=1-nov; WinterU=8.55; WinterCona=3.775; DiffusConst=40; DiffusSlope=16; Salb=0.13; CN2Bare=76; CNRed=20; CNCov=0.8; DischargeWidth=160; CatchmentArea=10000; PSIDul=-100; Thickness=[200, 100, 200, 200, 200, 250, 300, 300, 350, 250]
          SWCON=[0.152205, 0.185154, 0.218778, 0.253098, 0.285504, 0.288136, 0.290212, 0.294941, 0.295102, 0.29676]
        Solute NO3: Thickness=[200, 200, 200, 200, 200, 200, 200, 200, 200, 200]; InitialValuesUnits=ppm; WaterTableConcentration=0; D0=0; DepthConstant=0; MaxDepthSoluteAccessible=0; RunoffEffectivenessAtMovingSolute=0; MaxEffectiveRunoff=0
          InitialValues=[1.45, 1.342, 1.235, 1.096, 0.889, 0.683, 0.476, 0.269, 0.145, 0.145]
        Solute NH4: same as 1091.Field1.Muscatune:244911.NO3
        Solute Urea: Thickness=[200, 200, 200, 200, 200, 200, 200, 200, 200, 200]; InitialValues=[0, 0, 0, 0, 0, 0, 0, 0, 0, 0]; InitialValuesUnits=kg/ha; WaterTableConcentration=0; D0=0; DepthConstant=0; MaxDepthSoluteAccessible=0; RunoffEffectivenessAtMovingSolute=0; MaxEffectiveRunoff=0
        SoilTemperature
      Manager Tillage
        Fraction = 0.65
        Depth = 350
        AppplyTillageOption = yes
```csharp
using Models.Soils;
using System;
using Models.Core;
using Models.PMF;
using APSIM.Shared.Utilities;
using Models.Surface;

namespace Models
{
    [Serializable]
    public class Script : Model
    {
        [Link] Clock Clock;
        [Link] SurfaceOrganicMatter SOM;
        [Link(IsOptional = true)] private IPlant existingCrop;
        [Link] ISummary Summary;
        [Separator("Applies tillage to an existing crop when it is ending")]
        //[Description("Crop")]
        //public IPlant Crop { get; set; }
        
        [Description("Fraction of Residues To Incorporate (0-1)")]
        public double Fraction { get; set; }
        
        [Description("Depth of Tillage (mm)")]
        public double Depth { get; set; }
        
        
        public enum ApplyTillage { yes, no }
        [Description("Do you want to till the land?")] 
        public ApplyTillage AppplyTillageOption { get; set; }

        [EventSubscribe("PlantEnding")]
        private void OnEndCrop(object sender, EventArgs e)
        {
            Model existingCrop = sender as Model;
            if (existingCrop != null && existingCrop.Name.ToLower() == (existingCrop as IModel).Name.ToLower()&& ApplyTillage.yes ==AppplyTillageOption)
            
            {
           
            SOM.Incorporate(Fraction, Depth);
            
           }
           
           
             Summary.WriteMessage(this, $"Tillage is applied to: {existingCrop.Name}", MessageType.Information);
        }
    }
}
```
    Memo
      When working with perennial crops that are harvested or grazed frequently, often an output that plots the accumulation of growth during a year is wanted. That output should be zeroed between years. If simulating a site in the Southern Hemisphere, usually the end of the year will be in June or July (winter). Here this is achieved as "CumulativeAnnualNetGrowth" using reporting at the end of the month (see in MonthlyReporting) and:

      		Sum of ([Ryegrass].NetGrowthWt + [WhiteClover].NetGrowthWt)
      			from 1-Jul to [Clock].Today as CumulativeAnnualNetGrowth

      with the output shown as the orange line below. Note that here it is necessary to calculate the output summing ryegrass and white clover. For comparison, the pattern of accumulation is plotted against the annual total (green line) and that was specified in AnnualReporting using:

      		Sum of ([Ryegrass].NetGrowthWt + [WhiteClover].NetGrowthWt)
      			from [AnnualReporting].DayAfterLastOutput to [Clock].Today
      			as SumYearlyNetGrowth
  Simulation 1101
    Clock: Start=2000-01-01; End=2016-12-31
    Summary SummaryFile
    Weather
      FileName=D:/My_BOX/Box/research temporal/analysis B/new_analysis/Iem_IA0200.met
    SoilArbitrator Soil Arbitrator
    Zone Field1: Area=1; Slope=2; AspectAngle=0; Altitude=50
      Report Carbon: same as 1091.Field1.Carbon
      Report WheatR: EventNames=[wheat].Harvesting
        VariableNames:
          [Clock].Today as date_in_wheat
          [Clock].Today.Year as Year_wheat
          [Clock].Today.Month as Month_in_wheat
          [Wheat].AboveGround.Wt *10 as w_AGB
      Report MaizeR: EventNames=[Maize].Harvesting
        VariableNames:
          [Clock].Today
          [Clock].Today.Year as Year
          [Maize].AboveGround.Wt*10  as M_AGB
          [Maize].AboveGround.N as MAIZE_AGB_NITROGEN
          [Maize].Grain.Total.Wt * 10 as Maize_Yield
          [Maize].Grain.Total.Wt * 10 as mYield
      Report Annual: same as 1091.Field1.Annual
      Report SoybeanR: EventNames=[Soybean].Harvesting
        VariableNames:
          [Clock].Today as date_in_soybean
          [Clock].Today.Year as Year_in_soybean
          [Soybean].AboveGround.Wt*10  as soy_AGB
          [Soybean].Grain.Total.Wt * 10 as SoyYield
      SurfaceOrganicMatter: InitialResidueName=grass; InitialResidueType=grass; InitialResidueMass=800; InitialStandingFraction=0; InitialCPR=0; InitialCNR=45.3889
      Fertiliser
      Plant Maize
      MicroClimate: a_interception=0; b_interception=1; c_interception=0; d_interception=0; SoilHeatFluxFraction=0.4; MinimumHeightDiffForNewLayer=0; NightInterceptionFraction=0.5; ReferenceHeight=2
      Plant Soybean
      Plant Wheat
      Manager MaizeNitrogenManager
        Crop = [Maize]
        FertiliserType = UreaNO3
        Depth2Apply = 0
        FractionToApplyFirst = 1
        Amount = 246
        FertiliserDates = 29-may, 30-may, 31-may, 01-jul, 02-jul
        script: same as in 1091.Field1.MaizeNitrogenManager
      Manager SowMaize: same as 1091.Field1.SowMaize
      Manager SowWheat
        Rotations = [Simple Rotation]
        Crop = [Wheat]
        StartDate = 27-Sep
        EndDate = 5-Oct
        MinESW = 100
        MinRain = 15
        RainDays = 7
        CultivarName = Crusader
        SowingDepth = 10
        RowSpacing = 250
        Population = 50
        MustSow = True
        script: same as in 1091.Field1.SowWheat
      Manager HarvestMaize: same as 1091.Field1.HarvestMaize
      Manager SowSoy: same as 1091.Field1.SowSoy
      Manager HarvestSoy: same as 1091.Field1.HarvestSoy
      Manager Simple Rotation
        Crops = Maize, Maize, Maize, Maize, Maize
        script: same as in 1091.Field1.Simple Rotation
      Manager AddfertlizerRotationWheat: same as 1091.Field1.AddfertlizerRotationWheat
      Manager HarvestWheat: same as 1091.Field1.HarvestWheat
      Soil Muscatune:244911: SoilType=Shaffton:67263817; Site=11; State=IL; Country=USA; ApsoilNumber=0; Latitude=41.763; Longitude=-90.6808
        DataSource=SSURGO https://SDMDataAccess.nrcs.usda.gov/Tabular/SDMTabularService.asmx through PyAPSIMX function Replace_Soilprofile. Date downloaded: 2022-12-27 02:49:44.558240
        Comments=cockey = 22743816 Shaffton loam, 0 to 2 percent slopes Component percentage: 95%
        Physical
          Thickness  ParticleSizeSand  ParticleSizeSilt  ParticleSizeClay  BD       AirDry     LL15       DUL       SAT       KS
          200        1.7002            66.3125           32                1.32     0.0575     0.115      0.406941  0.481887  792.45
          100        2.01345           66.2372           31.759            1.33224  0.08873    0.110913   0.387198  0.477269  792.45
          200        2.32671           66.1619           31.5181           1.34447  0.0854601  0.106825   0.367455  0.472652  792.45
          200        2.63997           66.0866           31.2771           1.35671  0.102738   0.102738   0.347712  0.468034  792.45
          200        2.95322           66.0113           31.0361           1.36708  0.0986502  0.0986502  0.329708  0.464122  792.45
          250        2.81824           67.7725           29.3975           1.36895  0.093031   0.093031   0.327968  0.463416  792.45
          300        2.60467           69.8551           27.5145           1.38877  0.0871437  0.0871437  0.321469  0.455936  792.45
          300        2.32539           71.5934           26.0573           1.38923  0.0818731  0.0818731  0.319199  0.455762  792.45
          350        1.98345           73.0001           25.0068           1.41046  0.0771934  0.0771934  0.313231  0.44775   792.45
          250        1.6415            74.4069           23.9563           1.41092  0.0725138  0.0725138  0.312366  0.447576  792.45
          SoilCrop MaizeSoil
            LL=[0.115, 0.110913, 0.106825, 0.102738, 0.0986502, 0.093031, 0.0871437, 0.0818731, 0.0771934, 0.0725138]
            KL=[0.08, 0.0654985, 0.0536256, 0.0439049, 0.0359463, 0.0294304, 0.0240955, 0.0197278, 0.0161517, 0.0132239]
            XF=[1, 1, 1, 1, 1, 1, 1, 1, 1, 1]
          SoilCrop SoybeanSoil: same as 1101.Field1.Muscatune:244911.Physical.MaizeSoil
          SoilCrop WheatSoil: same as 1101.Field1.Muscatune:244911.Physical.MaizeSoil
          SoilCrop TropicalPastureSoil: same as 1101.Field1.Muscatune:244911.Physical.MaizeSoil
        Organic: FOMCNRatio=40; CarbonUnits=Total
          Thickness  Carbon    SoilCNRatio  FBiom       FInert    FOM
          200        2.445     12           0.033823    0.511478  150
          100        1.70049   12           0.035       0.668     122.81
          200        1.18268   12           0.0301644   0.846767  100.548
          200        0.822551  12           0.0246965   0.855277  82.3217
          200        0.572081  12           0.0202198   0.863873  67.3993
          250        0.39788   12           0.0165546   0.872555  55.1819
          300        0.276724  12           0.0135537   0.881324  45.1791
          300        0.192461  12           0.0110969   0.890182  36.9895
          350        0.133856  12           0.00908534  0.899128  30.2845
          250        0.093096  12           0.00743845  0.908165  24.7948
        Chemical: Thickness=[200, 100, 200, 200, 200, 250, 300, 300, 350, 250]; PH=[6.2, 5.866, 5.531, 5.3, 5.3, 5.3, 5.3, 5.3, 5.535, 6.118]; PHUnits=Water
        Water: same as 1091.Field1.Muscatune:244911.Water
        Nutrient
        WaterBalance SoilWater: same as 1091.Field1.Muscatune:244911.SoilWater
        Solute NO3: same as 1091.Field1.Muscatune:244911.NO3
        Solute NH4: same as 1091.Field1.Muscatune:244911.NO3
        Solute Urea: same as 1091.Field1.Muscatune:244911.Urea
        SoilTemperature
      Manager Tillage: same as 1091.Field1.Tillage
    Memo: same as 1091.Memo
  Simulation 2091
    Clock: Start=2000-01-01; End=2016-12-31
    Summary SummaryFile
    Weather
      FileName=D:/My_BOX/Box/research temporal/analysis B/new_analysis/Iem_IA0200.met
    SoilArbitrator Soil Arbitrator
    Zone Field1: Area=1; Slope=2; AspectAngle=0; Altitude=50
      Report Carbon: same as 1091.Field1.Carbon
      Report WheatR: EventNames=[wheat].Harvesting
        VariableNames:
          [Clock].Today as date_in_wheat
          [Clock].Today.Year as Year_wheat
          [Clock].Today.Month as Month_in_wheat
          [Wheat].AboveGround.Wt *10 as w_AGB
      Report MaizeR: EventNames=[Maize].Harvesting
        VariableNames:
          [Clock].Today
          [Clock].Today.Year as Year
          [Maize].AboveGround.Wt*10  as M_AGB
          [Maize].AboveGround.N as MAIZE_AGB_NITROGEN
          [Maize].Grain.Total.Wt * 10 as Maize_Yield
          [Maize].Grain.Total.Wt * 10 as mYield
      Report Annual: same as 1091.Field1.Annual
      Report SoybeanR: EventNames=[Soybean].Harvesting
        VariableNames:
          [Clock].Today as date_in_soybean
          [Clock].Today.Year as Year_in_soybean
          [Soybean].AboveGround.Wt*10  as soy_AGB
          [Soybean].Grain.Total.Wt * 10 as SoyYield
      SurfaceOrganicMatter: InitialResidueName=grass; InitialResidueType=grass; InitialResidueMass=800; InitialStandingFraction=0; InitialCPR=0; InitialCNR=46.9542
      Fertiliser
      Plant Maize
      MicroClimate: a_interception=0; b_interception=1; c_interception=0; d_interception=0; SoilHeatFluxFraction=0.4; MinimumHeightDiffForNewLayer=0; NightInterceptionFraction=0.5; ReferenceHeight=2
      Plant Soybean
      Plant Wheat
      Manager MaizeNitrogenManager: same as 1091.Field1.MaizeNitrogenManager
      Manager SowMaize: same as 1091.Field1.SowMaize
      Manager SowWheat
        Rotations = [Simple Rotation]
        Crop = [Wheat]
        StartDate = 27-Sep
        EndDate = 5-Oct
        MinESW = 100
        MinRain = 15
        RainDays = 7
        CultivarName = MacKellar
        SowingDepth = 10
        RowSpacing = 250
        Population = 50
        MustSow = True
        script: same as in 1091.Field1.SowWheat
      Manager HarvestMaize: same as 1091.Field1.HarvestMaize
      Manager SowSoy: same as 1091.Field1.SowSoy
      Manager HarvestSoy: same as 1091.Field1.HarvestSoy
      Manager Simple Rotation: same as 1091.Field1.Simple Rotation
      Manager AddfertlizerRotationWheat: same as 1091.Field1.AddfertlizerRotationWheat
      Manager HarvestWheat: same as 1091.Field1.HarvestWheat
      Soil Muscatune:244911: SoilType=Shaffton:67263817; Site=11; State=IL; Country=USA; ApsoilNumber=0; Latitude=41.763; Longitude=-90.6808
        DataSource=SSURGO https://SDMDataAccess.nrcs.usda.gov/Tabular/SDMTabularService.asmx through PyAPSIMX function Replace_Soilprofile. Date downloaded: 2022-12-27 02:49:44.558240
        Comments=cockey = 22743816 Shaffton loam, 0 to 2 percent slopes Component percentage: 95%
        Physical
          Thickness  ParticleSizeSand  ParticleSizeSilt  ParticleSizeClay  BD       AirDry     LL15       DUL       SAT       KS
          200        1.7002            66.3125           32                1.305    0.056      0.112      0.406941  0.487547  792.45
          100        2.01345           66.2372           31.759            1.3171   0.0864154  0.108019   0.387198  0.482982  792.45
          200        2.32671           66.1619           31.5181           1.3292   0.0832307  0.104038   0.367455  0.478417  792.45
          200        2.63997           66.0866           31.2771           1.34129  0.100058   0.100058   0.347712  0.473852  792.45
          200        2.95322           66.0113           31.0361           1.35154  0.0960768  0.0960768  0.329708  0.469984  792.45
          250        2.81824           67.7725           29.3975           1.35339  0.0906041  0.0906041  0.327968  0.469287  792.45
          300        2.60467           69.8551           27.5145           1.37299  0.0848704  0.0848704  0.321469  0.461891  792.45
          300        2.32539           71.5934           26.0573           1.37344  0.0797372  0.0797372  0.319199  0.461719  792.45
          350        1.98345           73.0001           25.0068           1.39443  0.0751797  0.0751797  0.313231  0.453799  792.45
          250        1.6415            74.4069           23.9563           1.39489  0.0706221  0.0706221  0.312366  0.453626  792.45
          SoilCrop MaizeSoil
            LL=[0.112, 0.108019, 0.104038, 0.100058, 0.0960768, 0.0906041, 0.0848704, 0.0797372, 0.0751797, 0.0706221]
            KL=[0.08, 0.0654985, 0.0536256, 0.0439049, 0.0359463, 0.0294304, 0.0240955, 0.0197278, 0.0161517, 0.0132239]
            XF=[1, 1, 1, 1, 1, 1, 1, 1, 1, 1]
          SoilCrop SoybeanSoil: same as 2091.Field1.Muscatune:244911.Physical.MaizeSoil
          SoilCrop WheatSoil: same as 2091.Field1.Muscatune:244911.Physical.MaizeSoil
          SoilCrop TropicalPastureSoil: same as 2091.Field1.Muscatune:244911.Physical.MaizeSoil
        Organic: FOMCNRatio=40; CarbonUnits=Total
          Thickness  Carbon    SoilCNRatio  FBiom       FInert    FOM
          200        2.13      12           0.033823    0.511478  150
          100        1.48141   12           0.035       0.668     122.81
          200        1.03031   12           0.0301644   0.846767  100.548
          200        0.716578  12           0.0246965   0.855277  82.3217
          200        0.498377  12           0.0202198   0.863873  67.3993
          250        0.34662   12           0.0165546   0.872555  55.1819
          300        0.241073  12           0.0135537   0.881324  45.1791
          300        0.167665  12           0.0110969   0.890182  36.9895
          350        0.11661   12           0.00908534  0.899128  30.2845
          250        0.081102  12           0.00743845  0.908165  24.7948
        Chemical: Thickness=[200, 100, 200, 200, 200, 250, 300, 300, 350, 250]; PH=[6.2, 5.866, 5.531, 5.3, 5.3, 5.3, 5.3, 5.3, 5.535, 6.118]; PHUnits=Water
        Water: same as 1091.Field1.Muscatune:244911.Water
        Nutrient
        WaterBalance SoilWater: same as 1091.Field1.Muscatune:244911.SoilWater
        Solute NO3: same as 1091.Field1.Muscatune:244911.NO3
        Solute NH4: same as 1091.Field1.Muscatune:244911.NO3
        Solute Urea: same as 1091.Field1.Muscatune:244911.Urea
        SoilTemperature
      Manager Tillage: same as 1091.Field1.Tillage
    Memo: same as 1091.Memo
  Simulation 3092
    Clock: Start=2000-01-01; End=2016-12-31
    Summary SummaryFile
    Weather
      FileName=D:/My_BOX/Box/research temporal/analysis B/new_analysis/Iem_IA0200.met
    SoilArbitrator Soil Arbitrator
    Zone Field1: Area=1; Slope=2; AspectAngle=0; Altitude=50
      Report Carbon: same as 1091.Field1.Carbon
      Report WheatR: EventNames=[wheat].Harvesting
        VariableNames:
          [Clock].Today as date_in_wheat
          [Clock].Today.Year as Year_wheat
          [Clock].Today.Month as Month_in_wheat
          [Wheat].AboveGround.Wt *10 as w_AGB
      Report MaizeR: EventNames=[Maize].Harvesting
        VariableNames:
          [Clock].Today
          [Clock].Today.Year as Year
          [Maize].AboveGround.Wt*10  as M_AGB
          [Maize].AboveGround.N as MAIZE_AGB_NITROGEN
          [Maize].Grain.Total.Wt * 10 as Maize_Yield
          [Maize].Grain.Total.Wt * 10 as mYield
      Report Annual: same as 1091.Field1.Annual
      Report SoybeanR: EventNames=[Soybean].Harvesting
        VariableNames:
          [Clock].Today as date_in_soybean
          [Clock].Today.Year as Year_in_soybean
          [Soybean].AboveGround.Wt*10  as soy_AGB
          [Soybean].Grain.Total.Wt * 10 as SoyYield
      SurfaceOrganicMatter: InitialResidueName=grass; InitialResidueType=grass; InitialResidueMass=800; InitialStandingFraction=0; InitialCPR=0; InitialCNR=45.4466
      Fertiliser
      Plant Maize
      MicroClimate: a_interception=0; b_interception=1; c_interception=0; d_interception=0; SoilHeatFluxFraction=0.4; MinimumHeightDiffForNewLayer=0; NightInterceptionFraction=0.5; ReferenceHeight=2
      Plant Soybean
      Plant Wheat
      Manager MaizeNitrogenManager: same as 1101.Field1.MaizeNitrogenManager
      Manager SowMaize: same as 1091.Field1.SowMaize
      Manager SowWheat: same as 1101.Field1.SowWheat
      Manager HarvestMaize: same as 1091.Field1.HarvestMaize
      Manager SowSoy: same as 1091.Field1.SowSoy
      Manager HarvestSoy: same as 1091.Field1.HarvestSoy
      Manager Simple Rotation: same as 1101.Field1.Simple Rotation
      Manager AddfertlizerRotationWheat: same as 1091.Field1.AddfertlizerRotationWheat
      Manager HarvestWheat: same as 1091.Field1.HarvestWheat
      Soil Muscatune:244911: SoilType=Shaffton:67263817; Site=11; State=IL; Country=USA; ApsoilNumber=0; Latitude=41.763; Longitude=-90.6808
        DataSource=SSURGO https://SDMDataAccess.nrcs.usda.gov/Tabular/SDMTabularService.asmx through PyAPSIMX function Replace_Soilprofile. Date downloaded: 2022-12-27 02:49:44.558240
        Comments=cockey = 22743816 Shaffton loam, 0 to 2 percent slopes Component percentage: 95%
        Physical
          Thickness  ParticleSizeSand  ParticleSizeSilt  ParticleSizeClay  Rocks  BD     AirDry  LL15   DUL    SAT    KS
          200        1.7               66.312            32                0      1.36   0.065   0.131  0.407  0.467  792.45
          100        2.013             66.237            31.759            0      1.373  0.101   0.126  0.387  0.462  792.45
          200        2.327             66.162            31.518            0      1.385  0.097   0.121  0.367  0.457  792.45
          200        2.64              66.087            31.277            0      1.398  0.117   0.117  0.348  0.453  792.45
          200        2.953             66.011            31.036            0      1.409  0.112   0.112  0.33   0.448  792.45
          250        2.818             67.772            29.397            0      1.41   0.106   0.106  0.328  0.448  792.45
          300        2.605             69.855            27.514            0      1.431  0.099   0.099  0.321  0.44   792.45
          300        2.325             71.593            26.057            0      1.431  0.093   0.093  0.319  0.44   792.45
          350        1.983             73                25.007            0      1.453  0.088   0.088  0.313  0.432  792.45
          250        1.642             74.407            23.956            0      1.454  0.082   0.082  0.312  0.431  792.45
          Rocks source: Calculated
          SoilCrop MaizeSoil
            LL=[0.131, 0.126, 0.121, 0.117, 0.112, 0.106, 0.099, 0.093, 0.088, 0.082]
            KL=[0.08, 0.065, 0.054, 0.044, 0.036, 0.029, 0.024, 0.02, 0.016, 0.013]
            XF=[1, 1, 1, 1, 1, 1, 1, 1, 1, 1]
          SoilCrop SoybeanSoil: same as 3092.Field1.Muscatune:244911.Physical.MaizeSoil
          SoilCrop WheatSoil: same as 3092.Field1.Muscatune:244911.Physical.MaizeSoil
          SoilCrop TropicalPastureSoil: same as 3092.Field1.Muscatune:244911.Physical.MaizeSoil
        Organic: FOMCNRatio=40; CarbonUnits=Total
          Thickness  Carbon  SoilCNRatio  FBiom     FInert    FOM
          200        2.61    12           0.033823  0.511478  150
          100        1.815   12           0.035     0.668     122.81
          200        1.262   12           0.03      0.847     100.548
          200        0.878   12           0.025     0.855     82.322
          200        0.611   12           0.02      0.864     67.399
          250        0.425   12           0.017     0.873     55.182
          300        0.295   12           0.014     0.881     45.179
          300        0.205   12           0.011     0.89      36.99
          350        0.143   12           0.009     0.899     30.284
          250        0.099   12           0.007     0.908     24.795
        Chemical: Thickness=[200, 100, 200, 200, 200, 250, 300, 300, 350, 250]; PH=[6.2, 5.866, 5.531, 5.3, 5.3, 5.3, 5.3, 5.3, 5.535, 6.118]; PHUnits=Water
        Water: Thickness=[200, 100, 200, 200, 200, 250, 300, 300, 350, 250]; FilledFromTop=true
          InitialValues=[0.407, 0.387, 0.367, 0.348, 0.33, 0.328, 0.321, 0.319, 0.313, 0.312]
        Nutrient
        WaterBalance SoilWater: SummerDate=1-jun; SummerU=8.55; SummerCona=3.775; WinterDate=1-nov; WinterU=8.55; WinterCona=3.775; DiffusConst=40; DiffusSlope=16; Salb=0.13; CN2Bare=76; CNRed=20; CNCov=0.8; DischargeWidth=160; CatchmentArea=10000; PSIDul=-100; Thickness=[200, 100, 200, 200, 200, 250, 300, 300, 350, 250]
          SWCON=[0.152, 0.185, 0.219, 0.253, 0.286, 0.288, 0.29, 0.295, 0.295, 0.297]
        Solute NO3: same as 1091.Field1.Muscatune:244911.NO3
        Solute NH4: same as 1091.Field1.Muscatune:244911.NO3
        Solute Urea: same as 1091.Field1.Muscatune:244911.Urea
        SoilTemperature
      Manager Tillage: same as 1091.Field1.Tillage
    Memo: same as 1091.Memo
  Simulation 4092
    Clock: Start=2000-01-01; End=2016-12-31
    Summary SummaryFile
    Weather
      FileName=D:/My_BOX/Box/research temporal/analysis B/new_analysis/Iem_IA0200.met
    SoilArbitrator Soil Arbitrator
    Zone Field1: Area=1; Slope=2; AspectAngle=0; Altitude=50
      Report Carbon: same as 1091.Field1.Carbon
      Report WheatR: EventNames=[wheat].Harvesting
        VariableNames:
          [Clock].Today as date_in_wheat
          [Clock].Today.Year as Year_wheat
          [Clock].Today.Month as Month_in_wheat
          [Wheat].AboveGround.Wt *10 as w_AGB
      Report MaizeR: EventNames=[Maize].Harvesting
        VariableNames:
          [Clock].Today
          [Clock].Today.Year as Year
          [Maize].AboveGround.Wt*10  as M_AGB
          [Maize].AboveGround.N as MAIZE_AGB_NITROGEN
          [Maize].Grain.Total.Wt * 10 as Maize_Yield
          [Maize].Grain.Total.Wt * 10 as mYield
      Report Annual: same as 1091.Field1.Annual
      Report SoybeanR: EventNames=[Soybean].Harvesting
        VariableNames:
          [Clock].Today as date_in_soybean
          [Clock].Today.Year as Year_in_soybean
          [Soybean].AboveGround.Wt*10  as soy_AGB
          [Soybean].Grain.Total.Wt * 10 as SoyYield
      SurfaceOrganicMatter: InitialResidueName=grass; InitialResidueType=grass; InitialResidueMass=800; InitialStandingFraction=0; InitialCPR=0; InitialCNR=46.8831
      Fertiliser
      Plant Maize
      MicroClimate: a_interception=0; b_interception=1; c_interception=0; d_interception=0; SoilHeatFluxFraction=0.4; MinimumHeightDiffForNewLayer=0; NightInterceptionFraction=0.5; ReferenceHeight=2
      Plant Soybean
      Plant Wheat
      Manager MaizeNitrogenManager: same as 1091.Field1.MaizeNitrogenManager
      Manager SowMaize: same as 1091.Field1.SowMaize
      Manager SowWheat
        Rotations = [Simple Rotation]
        Crop = [Wheat]
        StartDate = 27-Sep
        EndDate = 5-Oct
        MinESW = 100
        MinRain = 15
        RainDays = 7
        CultivarName = Derrimut
        SowingDepth = 10
        RowSpacing = 250
        Population = 50
        MustSow = True
        script: same as in 1091.Field1.SowWheat
      Manager HarvestMaize: same as 1091.Field1.HarvestMaize
      Manager SowSoy: same as 1091.Field1.SowSoy
      Manager HarvestSoy: same as 1091.Field1.HarvestSoy
      Manager Simple Rotation: same as 1091.Field1.Simple Rotation
      Manager AddfertlizerRotationWheat: same as 1091.Field1.AddfertlizerRotationWheat
      Manager HarvestWheat: same as 1091.Field1.HarvestWheat
      Soil Muscatune:244911: SoilType=Shaffton:67263817; Site=11; State=IL; Country=USA; ApsoilNumber=0; Latitude=41.763; Longitude=-90.6808
        DataSource=SSURGO https://SDMDataAccess.nrcs.usda.gov/Tabular/SDMTabularService.asmx through PyAPSIMX function Replace_Soilprofile. Date downloaded: 2022-12-27 02:49:44.558240
        Comments=cockey = 22743816 Shaffton loam, 0 to 2 percent slopes Component percentage: 95%
        Physical
          Thickness  ParticleSizeSand  ParticleSizeSilt  ParticleSizeClay  BD       AirDry     LL15      DUL       SAT       KS
          200        4                 72                24                1.385    0.0515     0.103     0.40198   0.457358  792.45
          100        4                 71.2191           24.7809           1.38791  0.0827206  0.103401  0.398183  0.456259  792.45
          200        4                 70.4381           25.5619           1.39083  0.0830412  0.103802  0.394386  0.455159  792.45
          200        4                 69.6572           26.3428           1.39374  0.104202   0.104202  0.390589  0.454059  792.45
          200        4                 68.8763           27.1237           1.39666  0.104603   0.104603  0.386791  0.452959  792.45
          250        4                 68.0953           27.9047           1.39957  0.105004   0.105004  0.382994  0.451859  792.45
          300        4                 67.3144           28.6856           1.40249  0.105405   0.105405  0.379197  0.450759  792.45
          300        4                 66.5335           29.4665           1.4054   0.105805   0.105805  0.375399  0.449659  792.45
          350        4                 65.7525           30.2475           1.40832  0.106206   0.106206  0.371602  0.448559  792.45
          250        4                 65.2334           30.7666           1.41026  0.105755   0.105755  0.366541  0.447826  792.45
          SoilCrop MaizeSoil
            LL=[0.103, 0.103401, 0.103802, 0.104202, 0.104603, 0.105004, 0.105405, 0.105805, 0.106206, 0.105755]
            KL=[0.08, 0.0654985, 0.0536256, 0.0439049, 0.0359463, 0.0294304, 0.0240955, 0.0197278, 0.0161517, 0.0132239]
            XF=[1, 1, 1, 1, 1, 1, 1, 1, 1, 1]
          SoilCrop SoybeanSoil: same as 4092.Field1.Muscatune:244911.Physical.MaizeSoil
          SoilCrop WheatSoil: same as 4092.Field1.Muscatune:244911.Physical.MaizeSoil
          SoilCrop TropicalPastureSoil: same as 4092.Field1.Muscatune:244911.Physical.MaizeSoil
        Organic: FOMCNRatio=40; CarbonUnits=Total
          Thickness  Carbon    SoilCNRatio  FBiom       FInert    FOM
          200        1.595     12           0.033823    0.511478  150
          100        1.30588   12           0.035       0.668     122.81
          200        1.06916   12           0.0301644   0.846767  100.548
          200        0.875355  12           0.0246965   0.855277  82.3217
          200        0.71668   12           0.0202198   0.863873  67.3993
          250        0.586768  12           0.0165546   0.872555  55.1819
          300        0.480405  12           0.0135537   0.881324  45.1791
          300        0.393322  12           0.0110969   0.890182  36.9895
          350        0.322025  12           0.00908534  0.899128  30.2845
          250        0.263652  12           0.00743845  0.908165  24.7948
        Chemical: Thickness=[200, 100, 200, 200, 200, 250, 300, 300, 350, 250]; PH=[6.2, 5.866, 5.531, 5.3, 5.3, 5.3, 5.3, 5.3, 5.535, 6.118]; PHUnits=Water
        Water: Thickness=[200, 100, 200, 200, 200, 250, 300, 300, 350, 250]; FilledFromTop=true
          InitialValues=[0.40198, 0.398183, 0.394386, 0.390589, 0.386791, 0.382994, 0.379197, 0.375399, 0.371602, 0.366541]
        Nutrient
        WaterBalance SoilWater: SummerDate=1-jun; SummerU=8.55; SummerCona=3.775; WinterDate=1-nov; WinterU=8.55; WinterCona=3.775; DiffusConst=40; DiffusSlope=16; Salb=0.13; CN2Bare=76; CNRed=20; CNCov=0.8; DischargeWidth=160; CatchmentArea=10000; PSIDul=-100; Thickness=[200, 100, 200, 200, 200, 250, 300, 300, 350, 250]
          SWCON=[0.144722, 0.150786, 0.156879, 0.163002, 0.169153, 0.175334, 0.181545, 0.187785, 0.194056, 0.203748]
        Solute NO3: same as 1091.Field1.Muscatune:244911.NO3
        Solute NH4: same as 1091.Field1.Muscatune:244911.NO3
        Solute Urea: same as 1091.Field1.Muscatune:244911.Urea
        SoilTemperature
      Manager Tillage: same as 1091.Field1.Tillage
    Memo: same as 1091.Memo
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