Simulations: Version=206
  Memo Installation Instructions
    # Installation Instructions

    1) If you do not have R or Docker Desktop already installed, install R from [here](https://cran.r-project.org/bin/windows/base/release.htm).
    2) Make sure you install using default settings when prompted.
    3) Once R is installed, this simulation can be run. Note: the user interface will be unresponsive once the run button has been clicked.
    Depending on your machines resources, it may take 1-2 minutes before the simulation is complete.
  DataStore
  Morris FallowSensitivity: NumPaths=25; NumIntervals=20; Jump=10; TableName=Report; AggregationVariableName=Clock.Today; ParametersHaveChanged=true
    Parameters:
      {Name=ResidueWt, Path=Field.SurfaceOrganicMatter.InitialResidueMass, LowerBound=0, UpperBound=5000}
      {Name=CN2, Path=Field.Soil.SoilWater.CN2Bare, LowerBound=70, UpperBound=85}
      {Name=Cona, Path=Field.Soil.SoilWater.SummerCona, LowerBound=3, UpperBound=9}
      {Name=U, Path=Field.Soil.SoilWater.SummerU, LowerBound=1, UpperBound=9}
      {Name=ResidueCNR, Path=Field.SurfaceOrganicMatter.InitialCNR, LowerBound=40, UpperBound=120}
      {Name=SWCon, Path=Field.Soil.SoilWater.SWCON[1], LowerBound=0.1, UpperBound=0.5}
    AggregationValues=[4/30/1981 12:00:00 AM, 4/30/1982 12:00:00 AM, 4/30/1983 12:00:00 AM, 4/30/1984 12:00:00 AM, 4/30/1985 12:00:00 AM, 4/30/1986 12:00:00 AM, 4/30/1987 12:00:00 AM, 4/30/1988 12:00:00 AM, 4/30/1989 12:00:00 AM, 4/30/1990 12:00:00 AM]
    Simulation FallowSensitivityBase
      Clock: Start=1980-10-31; End=1990-12-31
      Summary SummaryFile
      Weather: FileName=%root%/Examples/WeatherFiles/AU_Dalby.met
      SoilArbitrator
      Zone Field: Area=1; Slope=0; AspectAngle=0; Altitude=50
        Report: EventNames=[ResetAndOutput].Script.Reporting
          VariableNames:
            [Clock].Today
            [Clock].Today.Year
            Sum of [Weather].Rain from [ResetAndOutput].Script.Reseting to [ResetAndOutput].Script.Reporting as FallowRainfall
            Sum of [Soil].SoilWater.Es from [ResetAndOutput].Script.Reseting to [ResetAndOutput].Script.Reporting as FallowEvaporation
            Sum of [Soil].SoilWater.Runoff from [ResetAndOutput].Script.Reseting to [ResetAndOutput].Script.Reporting as FallowRunoff
            sum([Soil].Water.MM) as TotalSW
            sum([Soil].SoilWater.ESW) as TotalESW
            (sum([Soil].NH4.kgha) + sum([Soil].NO3.kgha)) as TotalMinN
            [SurfaceOrganicMatter].Wt as FinalResidueWt
            [SurfaceOrganicMatter].Cover as FinalResidueCover
        Fertiliser
        Soil: ASCOrder=Vertosol; ASCSubOrder=Black; SoilType=Clay; Site=Norwin; NearestTown=Norwin; Region=Darling Downs and Granite Belt; State=Queensland; Country=Australia; NaturalVegetation=Qld. Bluegrass, possible Qld. Blue gum; ApsoilNumber=900; Latitude=-27.581836; Longitude=151.320206; LocationAccuracy=+/- 20m
          DataSource=CSIRO Sustainable Ecosystems, Toowoomba; Characteriesd as part of the GRDC funded project"Doing it better, doing it smarter, managing soil water in Australian agriculture' 2011
          Comments=OC, CLL for all crops estimated-based on Bongeen Mywybilla Soil No1
          Physical
            Thickness  BD       AirDry    LL15      DUL       SAT       KS
            150        1.01056  0.13025   0.2605    0.521     0.588655  20
            150        1.07146  0.198689  0.248362  0.496723  0.565677  20
            300        1.09394  0.28      0.28      0.488438  0.557193  20
            300        1.15861  0.28      0.28      0.480297  0.532787  20
            300        1.17301  0.28      0.28      0.471584  0.527354  20
            300        1.16287  0.28      0.28      0.457071  0.53118   20
            300        1.1875   0.28      0.28      0.452332  0.521888  20
            SoilCrop WheatSoil: LL=[0.261, 0.248, 0.28, 0.306, 0.36, 0.392, 0.446]; KL=[0.06, 0.06, 0.06, 0.04, 0.04, 0.02, 0.01]; XF=[1, 1, 1, 1, 1, 1, 1]
          WaterBalance SoilWater: SummerDate=1-Nov; SummerU=5; SummerCona=5; WinterDate=1-Apr; WinterU=5; WinterCona=5; DiffusConst=40; DiffusSlope=16; Salb=0.12; CN2Bare=73; CNRed=20; CNCov=0.8; PSIDul=-100; Thickness=[1800]; SWCON=[0.3]
          Organic: FOMCNRatio=40; CarbonUnits=Total
            Thickness  Carbon  SoilCNRatio  FBiom  FInert  FOM
            150        1.2     12           0.04   0.4     347.129
            150        0.96    12           0.02   0.6     270.344
            300        0.6     12           0.02   0.8     163.972
            300        0.3     12           0.02   1       99.4541
            300        0.18    12           0.01   1       60.322
            300        0.12    12           0.01   1       36.5871
            300        0.12    12           0.01   1       22.1912
          Chemical: Thickness=[150, 150, 300, 300, 300, 300, 300]; PH=[8, 8, 8, 8, 8, 8, 8]; PHUnits=Water
          Water: Thickness=[150, 150, 300, 300, 300, 300, 300]; InitialValues=[0.261, 0.248, 0.28, 0.306, 0.36, 0.392, 0.446]; FilledFromTop=true
          Nutrient
          Solute NO3: Thickness=[150, 150, 300, 300, 300, 300, 300]; InitialValues=[1, 1, 1, 1, 1, 1, 1]; InitialValuesUnits=ppm; WaterTableConcentration=0; D0=0; DepthConstant=0; MaxDepthSoluteAccessible=0; RunoffEffectivenessAtMovingSolute=0; MaxEffectiveRunoff=0
          Solute NH4: Thickness=[150, 150, 300, 300, 300, 300, 300]; InitialValues=[0.1, 0.1, 0.1, 0.1, 0.1, 0.1, 0.1]; InitialValuesUnits=ppm; WaterTableConcentration=0; D0=0; DepthConstant=0; MaxDepthSoluteAccessible=0; RunoffEffectivenessAtMovingSolute=0; MaxEffectiveRunoff=0
          Solute Urea: Thickness=[150, 150, 300, 300, 300, 300, 300]; InitialValues=[0, 0, 0, 0, 0, 0, 0]; InitialValuesUnits=kg/ha; WaterTableConcentration=0; D0=0; DepthConstant=0; MaxDepthSoluteAccessible=0; RunoffEffectivenessAtMovingSolute=0; MaxEffectiveRunoff=0
          SoilTemperature Temperature
        SurfaceOrganicMatter: InitialResidueName=wheat_stubble; InitialResidueType=wheat; InitialResidueMass=500; InitialStandingFraction=0; InitialCPR=0; InitialCNR=100
        MicroClimate: a_interception=0; b_interception=1; c_interception=0; d_interception=0; SoilHeatFluxFraction=0.4; MinimumHeightDiffForNewLayer=0; NightInterceptionFraction=0.5; ReferenceHeight=2
        Manager ResetAndOutput
          OutputDate = 30-Apr
          ResetDate = 1-Nov
          ResetWater = Yes
          ResetN = Yes
          ResetSOM = Yes
```csharp
using Models.Soils.Nutrients;
using System.Linq;
using System;
using Models.Core;
using Models.PMF;
using Models.Soils;
using Models.Soils.Nutrients;
using Models.Interfaces;
using Models.Utilities;
using Models.Surface;
using APSIM.Shared.Utilities;
using Models;

namespace Models
{
    [Serializable]
    public class Script : Model
    {
        [Link] private Clock Clock;
        [Link] private ISoilWater SoilWater;
        [Link] private INutrient Nutrient;
        [Link] private SurfaceOrganicMatter SOM;
        [Link] private Summary Summary;
        [Link] private Report Report;
        public  event EventHandler Reseting;
        public  event EventHandler Reporting;

        [Description("Date for output:")]
        public string OutputDate {get;set;}

        [Description("Date for reset:")]
        public string ResetDate {get;set;}

        [Description("Reset Water?")]
        public string ResetWater {get;set;}

        [Description("Reset Nitrogen?")]
        public string ResetN {get;set;}

        [Description("Reset Surface Organic Matter?")]
        public string ResetSOM {get;set;}

                /// <summary>Occurs when a plant is about to be harvested.</summary>
                /// <summary>Occurs when a plant is about to be harvested.</summary>


        [EventSubscribe("DoManagement")]
        private void OnDoManagement(object sender, EventArgs e)
        {
            if (DateUtilities.WithinDates(OutputDate, Clock.Today, OutputDate))
            {
               Reporting.Invoke(this, new EventArgs());
               //Report.DoOutput();
            }

            if (DateUtilities.WithinDates(ResetDate, Clock.Today, ResetDate))
            {
                if (ResetWater == "Yes")
                {
                    Summary.WriteMessage(this, "Reset Water", MessageType.Diagnostic);
                    SoilWater.Reset();
                }
                if (ResetN == "Yes")
                {
                    Summary.WriteMessage(this, "Reset Nitrogen", MessageType.Diagnostic);
                    Nutrient.Reset();
                }
                if (ResetSOM == "Yes")
                {
                    Summary.WriteMessage(this, "Reset Surface OM", MessageType.Diagnostic);
                    SOM.Reset();
                }

                Reseting.Invoke(this, new EventArgs());
            }
        }
    }
}
```
    Folder Morris Analysis
      Memo
        Results for this analysis are demonstrated here using the traditional Morris Sensitivity graphing format.  The overal parameter sensitivity (Mean Absolute Elementary Effect, MuStar) is on the X-axis.  The indication of non-linear response or parameter interaction (Standard deviation of Elementary Effect, Sigma) is on the Y axis.
        In the example, predictions for total soil water at the end of the fallow were most sensitive to ResidueWt, ConA, U and CN2.  Note that in some situations, the sensitivity to these parameters show high levels of interaction with other parameters.

        Each series within the graph includes results for 10 fallow seasons.  The variation within a given series demonstrates the impact of season on parameter sensitivity.  This is sometimes referred to as model placticity (ie model sensitivity varies in response to the prevailing conditions).  The high levels of variation within each series shows the importance of conducting sensitivity analyses over a range of seasons to get a full picture of parameter sensitivity.

        A second set of plots shows changes in parameter rankings between years.  These plots show values of MuStar for each parameter ploted against year.  Where lines cross, parameter sensitivity ranking has changed between years.
    Folder PathAnalysis
      Memo
        The Morris method uses a series of parameter paths (or trajectories) through the N-dimensional parameter space selected by the user.  It is important that this number of paths is sufficient to fully explore the parameter space, but also to account for responses in the model.  Graphs such as these indicate the impact of the number of paths on estimates of MuStar.  If the number of paths is sufficient, MuStar should not change significantly with increasing numbers of paths within the analysis.  In this example, some savings in execution time could potentially be gained from a reduction in the number of parameter paths.
    Folder ClimateAnalysis
      Memo
        The initial graphs for the Morris Sensitivity Analysis showed variation in parameter sensitivity (MuStar) and interaction (Sigma) across the seasons within this analysis.  These graphs explore some of the cause of the variation through plotting MuStar against rainfall within each fallow.  In many cases, clear trends in parameter sensitivity or interaction can be seen with seasonal rainfall.

        Any more detailed parameter sensitivity analysis could use information such as this to choose a subset of conditions for more detailed study rather than conducting the analysis for all years within a long term climate record.  This may provide a reduction in execution time.
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